// SBML level 3 version 1

function min(x, y)
  piecewise(x, x < y, y);
end

model rnadecay()
  // model units - substance: substance

  // Compartments:
  compartment c;

  // Species:
  species H2O in c = 309737899/c; H2O is "water";
  species H in c = 13042/c; H is "hydrogen ion";
  species AMP in c = 1449/c;
  species CMP in c = 1449/c;
  species GMP in c = 1449/c;
  species UMP in c = 1449/c;
  species ALA in c = 8303/c; ALA is "L-alanine";
  species ARG in c = 5991/c; ARG is "L-Arginine";
  species ASN in c = 11161/c; ASN is "L-Asparagine";
  species ASP in c = 9407/c; ASP is "L-Aspartate";
  species CYS in c = 2181/c; CYS is "L-Cysteine";
  species GLN in c = 7920/c; GLN is "L-glutamine";
  species GLU in c = 9518/c; GLU is "L-Glutamate";
  species GLY in c = 7679/c; GLY is "glycine";
  species HIS in c = 2933/c; HIS is "L-Histidine";
  species ILE in c = 14247/c; ILE is "L-Isoleucine";
  species LEU in c = 17971/c; LEU is "L-Leucine";
  species LYS in c = 15094/c; LYS is "L-Lysine";
  species MET in c = 2792/c; MET is "L-Methionine";
  species PHE in c = 7681/c; PHE is "L-phenylalanine";
  species PRO in c = 4140/c; PRO is "L-Proline";
  species SER in c = 8749/c; SER is "L-Serine";
  species THR in c = 4460/c; THR is "L-Threonine";
  species TRP in c = 1084/c; TRP is "L-tryptophan";
  species TYR in c = 5375/c; TYR is "L-tyrosine";
  species VAL in c = 9500/c; VAL is "L-Valine";
  species FMET in c = 0; FMET is "N-Formyl-L-methionine";
  species TU_001 in c = 0; TU_001 is "MG_001 - MG_002";
  species TU_002 in c = 0; TU_002 is "MG_003 - MG_004";
  species TU_003 in c = 1/c; TU_003 is "MG_005 - MG_009";
  species TU_004 in c = 0; TU_004 is "MG_010";
  species TU_005 in c = 0; TU_005 is "MG_011 - MG_012";
  species TU_006 in c = 0; TU_006 is "MG_013";
  species MG471 in c = 35/c;
  species MG472 in c = 36/c;
  species TU_008 in c = 0; TU_008 is "MG_014 - MG_015";
  species TU_009 in c = 0; TU_009 is "MG_018";
  species TU_010 in c = 0; TU_010 is "MG_019 - MG_021";
  species TU_011 in c = 0; TU_011 is "MG_022 - MG_024";
  species TU_012 in c = 0; TU_012 is "MG_025";
  species TU_013 in c = 0; TU_013 is "MG_026 - MG_028";
  species TU_014 in c = 0; TU_014 is "MG_029 - MG_031";
  species TU_015 in c = 0; TU_015 is "MG_032";
  species TU_016 in c = 0; TU_016 is "MG_033";
  species TU_017 in c = 0; TU_017 is "MG_034";
  species TU_018 in c = 0; TU_018 is "MG_035";
  species TU_019 in c = 0; TU_019 is "MG_036";
  species TU_020 in c = 0; TU_020 is "MG_037";
  species TU_021 in c = 0; TU_021 is "MG_038";
  species TU_022 in c = 0; TU_022 is "MG_039";
  species TU_023 in c = 0; TU_023 is "MG_040";
  species TU_024 in c = 0; TU_024 is "MG_041";
  species TU_025 in c = 0; TU_025 is "MG_042 - MG_044";
  species TU_026 in c = 0; TU_026 is "MG_045";
  species TU_027 in c = 0; TU_027 is "MG_046 - MG_047";
  species TU_028 in c = 0; TU_028 is "MG_048";
  species TU_029 in c = 1/c; TU_029 is "MG_049 - MG_051";
  species TU_030 in c = 0; TU_030 is "MG_052 - MG_053";
  species TU_031 in c = 1/c; TU_031 is "MG_054, MG_055, MG_473";
  species TU_032 in c = 0; TU_032 is "MG_056, MG_057, MG_474";
  species TU_033 in c = 0; TU_033 is "MG_058";
  species TU_034 in c = 0; TU_034 is "MG_059";
  species TU_035 in c = 0; TU_035 is "MG_060";
  species TU_036 in c = 0; TU_036 is "MG_061";
  species MG475 in c = 6/c;
  species TU_038 in c = 0; TU_038 is "MG_062";
  species TU_039 in c = 0; TU_039 is "MG_063";
  species TU_040 in c = 0; TU_040 is "MG_064 - MG_065";
  species TU_041 in c = 0; TU_041 is "MG_066";
  species TU_042 in c = 0; TU_042 is "MG_067 - MG_068";
  species TU_043 in c = 0; TU_043 is "MG_069";
  species TU_044 in c = 0; TU_044 is "MG_070";
  species TU_045 in c = 0; TU_045 is "MG_071";
  species TU_046 in c = 0; TU_046 is "MG_072";
  species TU_047 in c = 0; TU_047 is "MG_073";
  species TU_048 in c = 0; TU_048 is "MG_074";
  species TU_049 in c = 1/c; TU_049 is "MG_075";
  species TU_050 in c = 0; TU_050 is "MG_076";
  species TU_051 in c = 0; TU_051 is "MG_077 - MG_080";
  species TU_052 in c = 0; TU_052 is "MG_081 - MG_082";
  species TU_053 in c = 0; TU_053 is "MG_083";
  species TU_054 in c = 1/c; TU_054 is "MG_084 - MG_085";
  species TU_055 in c = 0; TU_055 is "MG_086 - MG_089";
  species TU_056 in c = 0; TU_056 is "MG_090";
  species TU_057 in c = 2/c; TU_057 is "MG_091";
  species TU_058 in c = 2/c; TU_058 is "MG_092";
  species TU_059 in c = 0; TU_059 is "MG_093 - MG_095";
  species TU_060 in c = 0; TU_060 is "MG_096";
  species TU_061 in c = 0; TU_061 is "MG_097";
  species TU_062 in c = 2/c; TU_062 is "MG_098 - MG_100";
  species TU_063 in c = 0; TU_063 is "MG_101 - MG_103";
  species TU_064 in c = 0; TU_064 is "MG_476";
  species TU_065 in c = 0; TU_065 is "MG_104";
  species TU_066 in c = 1/c; TU_066 is "MG_105";
  species TU_067 in c = 0; TU_067 is "MG_106";
  species TU_068 in c = 0; TU_068 is "MG_107 - MG_110";
  species TU_069 in c = 0; TU_069 is "MG_111 - MG_112";
  species TU_070 in c = 0; TU_070 is "MG_113";
  species TU_071 in c = 0; TU_071 is "MG_114";
  species TU_072 in c = 0; TU_072 is "MG_115";
  species TU_073 in c = 0; TU_073 is "MG_116 - MG_118";
  species TU_074 in c = 0; TU_074 is "MG_119 - MG_122";
  species TU_075 in c = 0; TU_075 is "MG_123";
  species TU_076 in c = 0; TU_076 is "MG_124 - MG_125";
  species TU_077 in c = 0; TU_077 is "MG_126";
  species TU_078 in c = 0; TU_078 is "MG_127 - MG_128";
  species TU_079 in c = 0; TU_079 is "MG_129";
  species TU_080 in c = 0; TU_080 is "MG_130";
  species TU_081 in c = 0; TU_081 is "MG_131";
  species TU_082 in c = 0; TU_082 is "MG_132";
  species TU_083 in c = 0; TU_083 is "MG_133";
  species TU_084 in c = 0; TU_084 is "MG_134";
  species TU_085 in c = 0; TU_085 is "MG_135";
  species TU_086 in c = 1/c; TU_086 is "MG_136 - MG_138";
  species TU_087 in c = 0; TU_087 is "MG_139";
  species MGrrnA16S in c = 0; MGrrnA16S is "16S ribosomal rRNA";
  species MGrrnA23S in c = 0; MGrrnA23S is "23S ribosomal rRNA";
  species MGrrnA5S in c = 29/c; MGrrnA5S is "5S ribosomal rRNA";
  species TU_089 in c = 0; TU_089 is "MG_140";
  species TU_090 in c = 0; TU_090 is "MG_141";
  species TU_091 in c = 0; TU_091 is "MG_477";
  species TU_092 in c = 1/c; TU_092 is "MG_142 - MG_144";
  species TU_093 in c = 0; TU_093 is "MG_145";
  species TU_094 in c = 1/c; TU_094 is "MG_146";
  species TU_095 in c = 0; TU_095 is "MG_147";
  species TU_096 in c = 0; TU_096 is "MG_148";
  species TU_097 in c = 0; TU_097 is "MG_149";
  species TU_098 in c = 0; TU_098 is "MG_478";
  species TU_099 in c = 1/c; TU_099 is "MG_150";
  species TU_100 in c = 0; TU_100 is "MG_151";
  species TU_101 in c = 1/c; TU_101 is "MG_152 - MG_153";
  species TU_102 in c = 0; TU_102 is "MG_154 - MG_163";
  species TU_103 in c = 0; TU_103 is "MG_164";
  species TU_104 in c = 1/c; TU_104 is "MG_165 - MG_169";
  species TU_105 in c = 1/c; TU_105 is "MG_170 - MG_173";
  species TU_106 in c = 0; TU_106 is "MG_174";
  species TU_107 in c = 1/c; TU_107 is "MG_175 - MG_177";
  species TU_108 in c = 0; TU_108 is "MG_178";
  species TU_109 in c = 0; TU_109 is "MG_179";
  species TU_110 in c = 0; TU_110 is "MG_180";
  species TU_111 in c = 0; TU_111 is "MG_181";
  species TU_112 in c = 0; TU_112 is "MG_182";
  species TU_113 in c = 0; TU_113 is "MG_183 - MG_184";
  species TU_114 in c = 0; TU_114 is "MG_185";
  species TU_115 in c = 0; TU_115 is "MG_186";
  species TU_116 in c = 0; TU_116 is "MG_187 - MG_189";
  species TU_117 in c = 1/c; TU_117 is "MG_190";
  species TU_118 in c = 0; TU_118 is "MG_191 - MG_192";
  species TU_119 in c = 0; TU_119 is "MG_194 - MG_195";
  species TU_120 in c = 1/c; TU_120 is "MG_196 - MG_198";
  species TU_121 in c = 0; TU_121 is "MG_199";
  species TU_122 in c = 0; TU_122 is "MG_200 - MG_202";
  species MG479 in c = 12/c;
  species TU_124 in c = 0; TU_124 is "MG_203 - MG_204";
  species TU_125 in c = 0; TU_125 is "MG_205";
  species TU_126 in c = 0; TU_126 is "MG_206";
  species TU_127 in c = 1/c; TU_127 is "MG_207";
  species TU_128 in c = 0; TU_128 is "MG_208 - MG_210";
  species TU_129 in c = 1/c; TU_129 is "MG_480";
  species TU_130 in c = 2/c; TU_130 is "MG_481";
  species TU_131 in c = 0; TU_131 is "MG_211, MG_212, MG_482";
  species TU_132 in c = 2/c; TU_132 is "MG_213 - MG_214";
  species TU_133 in c = 2/c; TU_133 is "MG_215 - MG_216";
  species MG483 in c = 5/c;
  species MG484 in c = 30/c;
  species MG485 in c = 6/c;
  species MG486 in c = 22/c;
  species MG487 in c = 10/c;
  species MG488 in c = 5/c;
  species MG489 in c = 42/c;
  species MG490 in c = 27/c;
  species TU_142 in c = 0; TU_142 is "MG_217";
  species TU_143 in c = 0; TU_143 is "MG_218, MG_491";
  species TU_144 in c = 0; TU_144 is "MG_219";
  species TU_145 in c = 0; TU_145 is "MG_220";
  species MG492 in c = 6/c;
  species TU_147 in c = 0; TU_147 is "MG_221 - MG_223";
  species TU_148 in c = 2/c; TU_148 is "MG_224";
  species TU_149 in c = 0; TU_149 is "MG_225 - MG_226";
  species TU_150 in c = 0; TU_150 is "MG_227";
  species TU_151 in c = 1/c; TU_151 is "MG_228 - MG_231";
  species TU_152 in c = 1/c; TU_152 is "MG_232 - MG_236";
  species TU_153 in c = 0; TU_153 is "MG_237";
  species TU_154 in c = 0; TU_154 is "MG_238";
  species TU_155 in c = 0; TU_155 is "MG_239";
  species TU_156 in c = 1/c; TU_156 is "MG_240";
  species TU_157 in c = 0; TU_157 is "MG_241";
  species TU_158 in c = 0; TU_158 is "MG_242";
  species TU_159 in c = 0; TU_159 is "MG_243 - MG_244";
  species TU_160 in c = 0; TU_160 is "MG_245";
  species TU_161 in c = 0; TU_161 is "MG_246";
  species TU_162 in c = 0; TU_162 is "MG_247";
  species TU_163 in c = 0; TU_163 is "MG_248 - MG_249";
  species TU_164 in c = 0; TU_164 is "MG_250 - MG_251";
  species TU_165 in c = 2/c; TU_165 is "MG_252 - MG_254";
  species MG493 in c = 25/c;
  species TU_167 in c = 0; TU_167 is "MG_255, MG_494";
  species MG495 in c = 3/c;
  species MG496 in c = 4/c;
  species TU_169 in c = 0; TU_169 is "MG_256";
  species TU_170 in c = 2/c; TU_170 is "MG_257 - MG_259";
  species TU_171 in c = 0; TU_171 is "MG_260";
  species MG497 in c = 4/c;
  species TU_173 in c = 0; TU_173 is "MG_261, MG_262, MG_498";
  species TU_174 in c = 0; TU_174 is "MG_263";
  species TU_175 in c = 0; TU_175 is "MG_264";
  species TU_176 in c = 0; TU_176 is "MG_265 - MG_267";
  species TU_177 in c = 0; TU_177 is "MG_268";
  species MG_0001 in c = 0; MG_0001 is "scRNA, signal recognition particle 4.5S RNA, MCS1";
  species TU_179 in c = 0; TU_179 is "MG_269";
  species TU_180 in c = 3/c; TU_180 is "MG_270 - MG_272";
  species MG_0002 in c = 21/c; MG_0002 is "MG170 RNA";
  species TU_182 in c = 6/c; TU_182 is "MG_273 - MG_275";
  species TU_183 in c = 0; TU_183 is "MG_276";
  species TU_184 in c = 0; TU_184 is "MG_277";
  species TU_185 in c = 0; TU_185 is "MG_278";
  species TU_186 in c = 0; TU_186 is "MG_279 - MG_281";
  species MG499 in c = 21/c;
  species MG500 in c = 30/c;
  species MG501 in c = 18/c;
  species MG502 in c = 37/c;
  species MG503 in c = 22/c;
  species TU_190 in c = 0; TU_190 is "MG_282";
  species TU_191 in c = 0; TU_191 is "MG_283";
  species TU_192 in c = 0; TU_192 is "MG_284 - MG_286";
  species TU_193 in c = 1/c; TU_193 is "MG_287";
  species MG504 in c = 4/c;
  species TU_195 in c = 0; TU_195 is "MG_288";
  species TU_196 in c = 0; TU_196 is "MG_289 - MG_291";
  species TU_197 in c = 1/c; TU_197 is "MG_505";
  species TU_198 in c = 0; TU_198 is "MG_292 - MG_294";
  species TU_199 in c = 0; TU_199 is "MG_295";
  species TU_200 in c = 0; TU_200 is "MG_296";
  species TU_201 in c = 0; TU_201 is "MG_297";
  species TU_202 in c = 1/c; TU_202 is "MG_298";
  species TU_203 in c = 0; TU_203 is "MG_299";
  species TU_204 in c = 0; TU_204 is "MG_300 - MG_301";
  species TU_205 in c = 0; TU_205 is "MG_302";
  species TU_206 in c = 0; TU_206 is "MG_303";
  species TU_207 in c = 0; TU_207 is "MG_304";
  species TU_208 in c = 0; TU_208 is "MG_305";
  species TU_209 in c = 0; TU_209 is "MG_306";
  species TU_210 in c = 0; TU_210 is "MG_307";
  species TU_211 in c = 0; TU_211 is "MG_308 - MG_309";
  species TU_212 in c = 0; TU_212 is "MG_310";
  species TU_213 in c = 0; TU_213 is "MG_311";
  species TU_214 in c = 1/c; TU_214 is "MG_312";
  species TU_215 in c = 0; TU_215 is "MG_313 - MG_315";
  species TU_216 in c = 0; TU_216 is "MG_316";
  species TU_217 in c = 0; TU_217 is "MG_317 - MG_318";
  species TU_218 in c = 0; TU_218 is "MG_319";
  species TU_219 in c = 0; TU_219 is "MG_320";
  species MG506 in c = 7/c;
  species MG507 in c = 11/c;
  species TU_222 in c = 0; TU_222 is "MG_321";
  species MG508 in c = 30/c;
  species MG509 in c = 28/c;
  species MG510 in c = 25/c;
  species MG511 in c = 27/c;
  species MG512 in c = 30/c;
  species MG513 in c = 27/c;
  species MG514 in c = 27/c;
  species TU_224 in c = 0; TU_224 is "MG_322";
  species TU_225 in c = 0; TU_225 is "MG_323";
  species MG_0003 in c = 0; MG_0003 is "Rnase P RNA, MCS5, M1 RNA";
  species MG_0004 in c = 2/c; MG_0004 is "transfer-messenger RNA, tmRNA, MCS6, 10Sa RNA";
  species TU_228 in c = 0; TU_228 is "MG_324, MG_325, MG_515";
  species TU_229 in c = 0; TU_229 is "MG_326";
  species TU_230 in c = 0; TU_230 is "MG_327";
  species TU_231 in c = 0; TU_231 is "MG_328";
  species TU_232 in c = 0; TU_232 is "MG_329";
  species TU_233 in c = 0; TU_233 is "MG_330 - MG_333";
  species TU_234 in c = 0; TU_234 is "MG_334";
  species TU_235 in c = 0; TU_235 is "MG_335";
  species TU_236 in c = 0; TU_236 is "MG_516";
  species TU_237 in c = 0; TU_237 is "MG_517";
  species TU_238 in c = 0; TU_238 is "MG_336";
  species TU_239 in c = 0; TU_239 is "MG_337";
  species TU_240 in c = 0; TU_240 is "MG_338";
  species TU_241 in c = 1/c; TU_241 is "MG_339";
  species TU_242 in c = 2/c; TU_242 is "MG_340 - MG_341";
  species TU_243 in c = 0; TU_243 is "MG_342";
  species TU_244 in c = 0; TU_244 is "MG_343";
  species TU_245 in c = 0; TU_245 is "MG_344";
  species TU_246 in c = 0; TU_246 is "MG_345";
  species TU_247 in c = 0; TU_247 is "MG_346 - MG_347";
  species MG518 in c = 9/c;
  species TU_249 in c = 0; TU_249 is "MG_348";
  species MG519 in c = 13/c;
  species TU_251 in c = 0; TU_251 is "MG_349 - MG_350";
  species MG520 in c = 16/c;
  species TU_253 in c = 0; TU_253 is "MG_521";
  species TU_254 in c = 0; TU_254 is "MG_351";
  species TU_255 in c = 0; TU_255 is "MG_352";
  species TU_256 in c = 0; TU_256 is "MG_353";
  species TU_257 in c = 0; TU_257 is "MG_354";
  species TU_258 in c = 1/c; TU_258 is "MG_355";
  species TU_259 in c = 0; TU_259 is "MG_356";
  species TU_260 in c = 0; TU_260 is "MG_357";
  species TU_261 in c = 0; TU_261 is "MG_358 - MG_359";
  species TU_262 in c = 0; TU_262 is "MG_360";
  species TU_263 in c = 0; TU_263 is "MG_361 - MG_363";
  species TU_264 in c = 0; TU_264 is "MG_522";
  species TU_265 in c = 0; TU_265 is "MG_364";
  species TU_266 in c = 0; TU_266 is "MG_365";
  species TU_267 in c = 0; TU_267 is "MG_366";
  species TU_268 in c = 0; TU_268 is "MG_367 - MG_369";
  species TU_269 in c = 0; TU_269 is "MG_370";
  species TU_270 in c = 0; TU_270 is "MG_371";
  species TU_271 in c = 0; TU_271 is "MG_372 - MG_375";
  species TU_272 in c = 0; TU_272 is "MG_376";
  species TU_273 in c = 0; TU_273 is "MG_377";
  species TU_274 in c = 0; TU_274 is "MG_378";
  species TU_275 in c = 0; TU_275 is "MG_379 - MG_381";
  species MG523 in c = 6/c;
  species TU_277 in c = 0; TU_277 is "MG_382";
  species TU_278 in c = 0; TU_278 is "MG_383";
  species TU_279 in c = 0; TU_279 is "MG_384";
  species TU_280 in c = 0; TU_280 is "MG_385, MG_524";
  species TU_281 in c = 0; TU_281 is "MG_386";
  species TU_282 in c = 0; TU_282 is "MG_387 - MG_388";
  species TU_283 in c = 0; TU_283 is "MG_389";
  species TU_284 in c = 0; TU_284 is "MG_390";
  species TU_285 in c = 2/c; TU_285 is "MG_391 - MG_393";
  species TU_286 in c = 0; TU_286 is "MG_394";
  species TU_287 in c = 0; TU_287 is "MG_395";
  species TU_288 in c = 0; TU_288 is "MG_396 - MG_397";
  species TU_289 in c = 0; TU_289 is "MG_398";
  species TU_290 in c = 0; TU_290 is "MG_399";
  species TU_291 in c = 0; TU_291 is "MG_400 - MG_401";
  species TU_292 in c = 0; TU_292 is "MG_402 - MG_405";
  species TU_293 in c = 0; TU_293 is "MG_406";
  species TU_294 in c = 1/c; TU_294 is "MG_407";
  species TU_295 in c = 0; TU_295 is "MG_408";
  species TU_296 in c = 0; TU_296 is "MG_409 - MG_412";
  species TU_297 in c = 0; TU_297 is "MG_414";
  species TU_298 in c = 0; TU_298 is "MG_525";
  species TU_299 in c = 1/c; TU_299 is "MG_417";
  species TU_300 in c = 0; TU_300 is "MG_418";
  species TU_301 in c = 0; TU_301 is "MG_419, MG_421, MG_422, MG_423";
  species TU_302 in c = 0; TU_302 is "MG_424";
  species TU_303 in c = 0; TU_303 is "MG_425";
  species TU_304 in c = 0; TU_304 is "MG_426";
  species TU_305 in c = 1/c; TU_305 is "MG_427";
  species TU_306 in c = 0; TU_306 is "MG_428";
  species TU_307 in c = 0; TU_307 is "MG_429 - MG_431";
  species TU_308 in c = 0; TU_308 is "MG_432";
  species TU_309 in c = 0; TU_309 is "MG_433";
  species TU_310 in c = 0; TU_310 is "MG_434";
  species TU_311 in c = 0; TU_311 is "MG_435";
  species TU_312 in c = 0; TU_312 is "MG_437";
  species TU_313 in c = 0; TU_313 is "MG_438";
  species TU_314 in c = 0; TU_314 is "MG_439";
  species TU_315 in c = 0; TU_315 is "MG_440 - MG_441";
  species TU_316 in c = 0; TU_316 is "MG_442 - MG_443";
  species TU_317 in c = 0; TU_317 is "MG_444 - MG_446";
  species TU_318 in c = 0; TU_318 is "MG_447";
  species TU_319 in c = 0; TU_319 is "MG_448";
  species TU_320 in c = 0; TU_320 is "MG_449";
  species TU_321 in c = 0; TU_321 is "MG_450 - MG_451";
  species TU_322 in c = 2/c; TU_322 is "MG_452 - MG_453";
  species TU_323 in c = 0; TU_323 is "MG_454";
  species TU_324 in c = 1/c; TU_324 is "MG_455";
  species TU_325 in c = 0; TU_325 is "MG_456";
  species TU_326 in c = 0; TU_326 is "MG_457";
  species TU_327 in c = 0; TU_327 is "MG_458";
  species TU_328 in c = 0; TU_328 is "MG_459";
  species TU_329 in c = 0; TU_329 is "MG_460";
  species TU_330 in c = 1/c; TU_330 is "MG_461 - MG_462";
  species TU_331 in c = 1/c; TU_331 is "MG_463 - MG_465";
  species TU_332 in c = 0; TU_332 is "MG_466";
  species TU_333 in c = 0; TU_333 is "MG_467 - MG_468";
  species TU_334 in c = 0; TU_334 is "MG_526";
  species TU_335 in c = 0; TU_335 is "MG_469 - MG_470";
  species MG471_aa in c = 72/c; MG471_aa is "MG471-AA";
  species MG472_aa in c = 72/c; MG472_aa is "MG472-AA";
  species MG475_aa in c = 14/c; MG475_aa is "MG475-AA";
  species MG479_aa in c = 25/c; MG479_aa is "MG479-AA";
  species MG483_aa in c = 10/c; MG483_aa is "MG483-AA";
  species MG484_aa in c = 61/c; MG484_aa is "MG484-AA";
  species MG485_aa in c = 14/c; MG485_aa is "MG485-AA";
  species MG486_aa in c = 46/c; MG486_aa is "MG486-AA";
  species MG487_aa in c = 20/c; MG487_aa is "MG487-AA";
  species MG488_aa in c = 11/c; MG488_aa is "MG488-AA";
  species MG489_aa in c = 84/c; MG489_aa is "MG489-AA";
  species MG490_aa in c = 55/c; MG490_aa is "MG490-AA";
  species MG492_aa in c = 13/c; MG492_aa is "MG492-AA";
  species MG493_aa in c = 51/c; MG493_aa is "MG493-AA";
  species MG495_aa in c = 8/c; MG495_aa is "MG495-AA";
  species MG496_aa in c = 9/c; MG496_aa is "MG496-AA";
  species MG497_aa in c = 9/c; MG497_aa is "MG497-AA";
  species MG499_aa in c = 42/c; MG499_aa is "MG499-AA";
  species MG500_aa in c = 60/c; MG500_aa is "MG500-AA";
  species MG501_aa in c = 36/c; MG501_aa is "MG501-AA";
  species MG502_aa in c = 75/c; MG502_aa is "MG502-AA";
  species MG503_aa in c = 46/c; MG503_aa is "MG503-AA";
  species MG504_aa in c = 10/c; MG504_aa is "MG504-AA";
  species MG506_aa in c = 16/c; MG506_aa is "MG506-AA";
  species MG507_aa in c = 23/c; MG507_aa is "MG507-AA";
  species MG508_aa in c = 61/c; MG508_aa is "MG508-AA";
  species MG509_aa in c = 56/c; MG509_aa is "MG509-AA";
  species MG510_aa in c = 50/c; MG510_aa is "MG510-AA";
  species MG511_aa in c = 55/c; MG511_aa is "MG511-AA";
  species MG512_aa in c = 62/c; MG512_aa is "MG512-AA";
  species MG513_aa in c = 54/c; MG513_aa is "MG513-AA";
  species MG514_aa in c = 56/c; MG514_aa is "MG514-AA";
  species MG518_aa in c = 19/c; MG518_aa is "MG518-AA";
  species MG519_aa in c = 26/c; MG519_aa is "MG519-AA";
  species MG520_aa in c = 33/c; MG520_aa is "MG520-AA";
  species MG523_aa in c = 14/c; MG523_aa is "MG523-AA";
  species MG_104_MONOMER in c = 15/c; MG_104_MONOMER is "ribonuclease R";
  species MG_083_MONOMER in c = 15/c; MG_083_MONOMER is "peptidyl-tRNA hydrolase";

  // Parameters:
  Km_RNA_decay = 5;
  k_dcy_TU_001 = 0.004717;
  k_dcy_TU_002 = 0.004532;
  k_dcy_TU_003 = 0.003323;
  k_dcy_TU_004 = 0.002611;
  k_dcy_TU_005 = 0.002618;
  k_dcy_TU_006 = 0.00361;
  k_dcy_MG471 = 0.000257;
  k_dcy_MG472 = 0.000257;
  k_dcy_TU_008 = 0.002593;
  k_dcy_TU_009 = 0.002611;
  k_dcy_TU_010 = 0.004244;
  k_dcy_TU_011 = 0.002831;
  k_dcy_TU_012 = 0.002611;
  k_dcy_TU_013 = 0.003241;
  k_dcy_TU_014 = 0.00268;
  k_dcy_TU_015 = 0.002611;
  k_dcy_TU_016 = 0.00152;
  k_dcy_TU_017 = 0.002222;
  k_dcy_TU_018 = 0.006418;
  k_dcy_TU_019 = 0.00361;
  k_dcy_TU_020 = 0.002611;
  k_dcy_TU_021 = 0.001627;
  k_dcy_TU_022 = 0.002962;
  k_dcy_TU_023 = 0.002611;
  k_dcy_TU_024 = 0.002611;
  k_dcy_TU_025 = 0.002254;
  k_dcy_TU_026 = 0.002687;
  k_dcy_TU_027 = 0.004069;
  k_dcy_TU_028 = 0.004126;
  k_dcy_TU_029 = 0.000903;
  k_dcy_TU_030 = 0.002087;
  k_dcy_TU_031 = 0.003123;
  k_dcy_TU_032 = 0.002526;
  k_dcy_TU_033 = 0.002611;
  k_dcy_TU_034 = 0.0021;
  k_dcy_TU_035 = 0.002611;
  k_dcy_TU_036 = 0.002611;
  k_dcy_MG475 = 0.000257;
  k_dcy_TU_038 = 0.00218;
  k_dcy_TU_039 = 0.003301;
  k_dcy_TU_040 = 0.002611;
  k_dcy_TU_041 = 0.003301;
  k_dcy_TU_042 = 0.002611;
  k_dcy_TU_043 = 0.002139;
  k_dcy_TU_044 = 0.002626;
  k_dcy_TU_045 = 0.000631;
  k_dcy_TU_046 = 0.004443;
  k_dcy_TU_047 = 0.002611;
  k_dcy_TU_048 = 0.002611;
  k_dcy_TU_049 = 0.002611;
  k_dcy_TU_050 = 0.002611;
  k_dcy_TU_051 = 0.003403;
  k_dcy_TU_052 = 0.003576;
  k_dcy_TU_053 = 0.002888;
  k_dcy_TU_054 = 0.002611;
  k_dcy_TU_055 = 0.002201;
  k_dcy_TU_056 = 0.001834;
  k_dcy_TU_057 = 0.001863;
  k_dcy_TU_058 = 0.001863;
  k_dcy_TU_059 = 0.002658;
  k_dcy_TU_060 = 0.002611;
  k_dcy_TU_061 = 0.002222;
  k_dcy_TU_062 = 0.00104;
  k_dcy_TU_063 = 0.002728;
  k_dcy_TU_064 = 0.002611;
  k_dcy_TU_065 = 0.004126;
  k_dcy_TU_066 = 0.002611;
  k_dcy_TU_067 = 0.00304;
  k_dcy_TU_068 = 0.003297;
  k_dcy_TU_069 = 0.003712;
  k_dcy_TU_070 = 0.006796;
  k_dcy_TU_071 = 0.002222;
  k_dcy_TU_072 = 0.002139;
  k_dcy_TU_073 = 0.002596;
  k_dcy_TU_074 = 0.002356;
  k_dcy_TU_075 = 0.002611;
  k_dcy_TU_076 = 0.003368;
  k_dcy_TU_077 = 0.002611;
  k_dcy_TU_078 = 0.002611;
  k_dcy_TU_079 = 0.002611;
  k_dcy_TU_080 = 0.002611;
  k_dcy_TU_081 = 0.002684;
  k_dcy_TU_082 = 0.002611;
  k_dcy_TU_083 = 0.002611;
  k_dcy_TU_084 = 0.002611;
  k_dcy_TU_085 = 0.002611;
  k_dcy_TU_086 = 0.004225;
  k_dcy_TU_087 = 0.002611;
  k_dcy_MGrrnA16S = 1e-5;
  k_dcy_MGrrnA23S = 1e-5;
  k_dcy_MGrrnA5S = 1e-5;
  k_dcy_TU_089 = 0.002611;
  k_dcy_TU_090 = 0.003209;
  k_dcy_TU_091 = 0.002611;
  k_dcy_TU_092 = 0.003585;
  k_dcy_TU_093 = 0.002611;
  k_dcy_TU_094 = 0.002611;
  k_dcy_TU_095 = 0.002611;
  k_dcy_TU_096 = 0.002611;
  k_dcy_TU_097 = 0.002611;
  k_dcy_TU_098 = 0.002611;
  k_dcy_TU_099 = 0.002265;
  k_dcy_TU_100 = 0.002222;
  k_dcy_TU_101 = 0.001838;
  k_dcy_TU_102 = 0.002195;
  k_dcy_TU_103 = 0.003851;
  k_dcy_TU_104 = 0.002806;
  k_dcy_TU_105 = 0.002866;
  k_dcy_TU_106 = 0.001834;
  k_dcy_TU_107 = 0.001571;
  k_dcy_TU_108 = 0.001777;
  k_dcy_TU_109 = 0.00304;
  k_dcy_TU_110 = 0.002027;
  k_dcy_TU_111 = 0.00304;
  k_dcy_TU_112 = 0.002611;
  k_dcy_TU_113 = 0.002611;
  k_dcy_TU_114 = 0.002611;
  k_dcy_TU_115 = 0.002611;
  k_dcy_TU_116 = 0.002977;
  k_dcy_TU_117 = 0.002611;
  k_dcy_TU_118 = 0.002611;
  k_dcy_TU_119 = 0.003512;
  k_dcy_TU_120 = 0.001836;
  k_dcy_TU_121 = 0.002611;
  k_dcy_TU_122 = 0.00335;
  k_dcy_MG479 = 0.000257;
  k_dcy_TU_124 = 0.00318;
  k_dcy_TU_125 = 0.002611;
  k_dcy_TU_126 = 0.004279;
  k_dcy_TU_127 = 0.002611;
  k_dcy_TU_128 = 0.002596;
  k_dcy_TU_129 = 0.002611;
  k_dcy_TU_130 = 0.004279;
  k_dcy_TU_131 = 0.002683;
  k_dcy_TU_132 = 0.002611;
  k_dcy_TU_133 = 0.003181;
  k_dcy_MG483 = 0.000257;
  k_dcy_MG484 = 0.000257;
  k_dcy_MG485 = 0.000257;
  k_dcy_MG486 = 0.000257;
  k_dcy_MG487 = 0.000257;
  k_dcy_MG488 = 0.000257;
  k_dcy_MG489 = 0.000257;
  k_dcy_MG490 = 0.000257;
  k_dcy_TU_142 = 0.002611;
  k_dcy_TU_143 = 0.002611;
  k_dcy_TU_144 = 0.002611;
  k_dcy_TU_145 = 0.002611;
  k_dcy_MG492 = 0.000257;
  k_dcy_TU_147 = 0.003036;
  k_dcy_TU_148 = 0.002611;
  k_dcy_TU_149 = 0.00284;
  k_dcy_TU_150 = 0.004126;
  k_dcy_TU_151 = 0.005667;
  k_dcy_TU_152 = 0.003383;
  k_dcy_TU_153 = 0.002611;
  k_dcy_TU_154 = 0.005023;
  k_dcy_TU_155 = 0.003398;
  k_dcy_TU_156 = 0.004814;
  k_dcy_TU_157 = 0.002611;
  k_dcy_TU_158 = 0.002611;
  k_dcy_TU_159 = 0.002956;
  k_dcy_TU_160 = 0.002611;
  k_dcy_TU_161 = 0.002611;
  k_dcy_TU_162 = 0.001462;
  k_dcy_TU_163 = 0.003712;
  k_dcy_TU_164 = 0.004847;
  k_dcy_TU_165 = 0.002786;
  k_dcy_MG493 = 0.000257;
  k_dcy_TU_167 = 0.002611;
  k_dcy_MG495 = 0.000257;
  k_dcy_MG496 = 0.000257;
  k_dcy_TU_169 = 0.002611;
  k_dcy_TU_170 = 0.002534;
  k_dcy_TU_171 = 0.002611;
  k_dcy_MG497 = 0.000257;
  k_dcy_TU_173 = 0.002428;
  k_dcy_TU_174 = 0.002611;
  k_dcy_TU_175 = 0.00361;
  k_dcy_TU_176 = 0.003404;
  k_dcy_TU_177 = 0.002611;
  k_dcy_MG_0001 = 1e-5;
  k_dcy_TU_179 = 0.002611;
  k_dcy_TU_180 = 0.001728;
  k_dcy_MG_0002 = 0.00013;
  k_dcy_TU_182 = 0.002112;
  k_dcy_TU_183 = 0.003398;
  k_dcy_TU_184 = 0.002611;
  k_dcy_TU_185 = 0.0011;
  k_dcy_TU_186 = 0.002611;
  k_dcy_MG499 = 0.000257;
  k_dcy_MG500 = 0.000257;
  k_dcy_MG501 = 0.000257;
  k_dcy_MG502 = 0.000257;
  k_dcy_MG503 = 0.000257;
  k_dcy_TU_190 = 0.002626;
  k_dcy_TU_191 = 0.004126;
  k_dcy_TU_192 = 0.002611;
  k_dcy_TU_193 = 0.00165;
  k_dcy_MG504 = 0.000257;
  k_dcy_TU_195 = 0.002684;
  k_dcy_TU_196 = 0.001939;
  k_dcy_TU_197 = 0.002611;
  k_dcy_TU_198 = 0.003279;
  k_dcy_TU_199 = 0.002265;
  k_dcy_TU_200 = 0.002611;
  k_dcy_TU_201 = 0.003398;
  k_dcy_TU_202 = 0.002611;
  k_dcy_TU_203 = 0.003984;
  k_dcy_TU_204 = 0.003173;
  k_dcy_TU_205 = 0.005776;
  k_dcy_TU_206 = 0.0011;
  k_dcy_TU_207 = 0.012836;
  k_dcy_TU_208 = 0.004814;
  k_dcy_TU_209 = 0.002611;
  k_dcy_TU_210 = 0.002611;
  k_dcy_TU_211 = 0.003445;
  k_dcy_TU_212 = 0.002611;
  k_dcy_TU_213 = 0.002611;
  k_dcy_TU_214 = 0.002611;
  k_dcy_TU_215 = 0.003281;
  k_dcy_TU_216 = 0.002611;
  k_dcy_TU_217 = 0.002611;
  k_dcy_TU_218 = 0.002611;
  k_dcy_TU_219 = 0.002611;
  k_dcy_MG506 = 0.000257;
  k_dcy_MG507 = 0.000257;
  k_dcy_TU_222 = 0.002611;
  k_dcy_MG508 = 0.000257;
  k_dcy_MG509 = 0.000257;
  k_dcy_MG510 = 0.000257;
  k_dcy_MG511 = 0.000257;
  k_dcy_MG512 = 0.000257;
  k_dcy_MG513 = 0.000257;
  k_dcy_MG514 = 0.000257;
  k_dcy_TU_224 = 0.014441;
  k_dcy_TU_225 = 0.003984;
  k_dcy_MG_0003 = 1e-5;
  k_dcy_MG_0004 = 0.00013;
  k_dcy_TU_228 = 0.002841;
  k_dcy_TU_229 = 0.002611;
  k_dcy_TU_230 = 0.002611;
  k_dcy_TU_231 = 0.002611;
  k_dcy_TU_232 = 0.002611;
  k_dcy_TU_233 = 0.002745;
  k_dcy_TU_234 = 0.005251;
  k_dcy_TU_235 = 0.00361;
  k_dcy_TU_236 = 0.002611;
  k_dcy_TU_237 = 0.002611;
  k_dcy_TU_238 = 0.002222;
  k_dcy_TU_239 = 0.002611;
  k_dcy_TU_240 = 0.002611;
  k_dcy_TU_241 = 0.002751;
  k_dcy_TU_242 = 0.003184;
  k_dcy_TU_243 = 0.004443;
  k_dcy_TU_244 = 0.002611;
  k_dcy_TU_245 = 0.002611;
  k_dcy_TU_246 = 0.005776;
  k_dcy_TU_247 = 0.00257;
  k_dcy_MG518 = 0.000257;
  k_dcy_TU_249 = 0.002611;
  k_dcy_MG519 = 0.000257;
  k_dcy_TU_251 = 0.002611;
  k_dcy_MG520 = 0.000257;
  k_dcy_TU_253 = 0.002611;
  k_dcy_TU_254 = 0.003851;
  k_dcy_TU_255 = 0.002611;
  k_dcy_TU_256 = 0.002611;
  k_dcy_TU_257 = 0.002611;
  k_dcy_TU_258 = 0.003501;
  k_dcy_TU_259 = 0.002611;
  k_dcy_TU_260 = 0.003209;
  k_dcy_TU_261 = 0.002325;
  k_dcy_TU_262 = 0.002063;
  k_dcy_TU_263 = 0.002558;
  k_dcy_TU_264 = 0.004814;
  k_dcy_TU_265 = 0.002611;
  k_dcy_TU_266 = 0.00361;
  k_dcy_TU_267 = 0.002611;
  k_dcy_TU_268 = 0.003035;
  k_dcy_TU_269 = 0.002611;
  k_dcy_TU_270 = 0.002611;
  k_dcy_TU_271 = 0.002456;
  k_dcy_TU_272 = 0.002611;
  k_dcy_TU_273 = 0.002611;
  k_dcy_TU_274 = 0.003501;
  k_dcy_TU_275 = 0.003266;
  k_dcy_MG523 = 0.000257;
  k_dcy_TU_277 = 0.002962;
  k_dcy_TU_278 = 0.0021;
  k_dcy_TU_279 = 0.002962;
  k_dcy_TU_280 = 0.002611;
  k_dcy_TU_281 = 0.002611;
  k_dcy_TU_282 = 0.003297;
  k_dcy_TU_283 = 0.002611;
  k_dcy_TU_284 = 0.002611;
  k_dcy_TU_285 = 0.003113;
  k_dcy_TU_286 = 0.004443;
  k_dcy_TU_287 = 0.002611;
  k_dcy_TU_288 = 0.001872;
  k_dcy_TU_289 = 0.006796;
  k_dcy_TU_290 = 0.002027;
  k_dcy_TU_291 = 0.001451;
  k_dcy_TU_292 = 0.002421;
  k_dcy_TU_293 = 0.002611;
  k_dcy_TU_294 = 0.002458;
  k_dcy_TU_295 = 0.003122;
  k_dcy_TU_296 = 0.002356;
  k_dcy_TU_297 = 0.002611;
  k_dcy_TU_298 = 0.002611;
  k_dcy_TU_299 = 0.002818;
  k_dcy_TU_300 = 0.002567;
  k_dcy_TU_301 = 0.003664;
  k_dcy_TU_302 = 0.002358;
  k_dcy_TU_303 = 0.004279;
  k_dcy_TU_304 = 0.003398;
  k_dcy_TU_305 = 0.00154;
  k_dcy_TU_306 = 0.002611;
  k_dcy_TU_307 = 0.003162;
  k_dcy_TU_308 = 0.002611;
  k_dcy_TU_309 = 0.003727;
  k_dcy_TU_310 = 0.002962;
  k_dcy_TU_311 = 0.004279;
  k_dcy_TU_312 = 0.002687;
  k_dcy_TU_313 = 0.002611;
  k_dcy_TU_314 = 0.002611;
  k_dcy_TU_315 = 0.002611;
  k_dcy_TU_316 = 0.002611;
  k_dcy_TU_317 = 0.001897;
  k_dcy_TU_318 = 0.002611;
  k_dcy_TU_319 = 0.001863;
  k_dcy_TU_320 = 0.002684;
  k_dcy_TU_321 = 0.002131;
  k_dcy_TU_322 = 0.002484;
  k_dcy_TU_323 = 0.00154;
  k_dcy_TU_324 = 0.005776;
  k_dcy_TU_325 = 0.002611;
  k_dcy_TU_326 = 0.005251;
  k_dcy_TU_327 = 0.001834;
  k_dcy_TU_328 = 0.002611;
  k_dcy_TU_329 = 0.0011;
  k_dcy_TU_330 = 0.003368;
  k_dcy_TU_331 = 0.003788;
  k_dcy_TU_332 = 0.002567;
  k_dcy_TU_333 = 0.002611;
  k_dcy_TU_334 = 0.002611;
  k_dcy_TU_335 = 0.004345;
  k_dcy_MG471_aa = 0.000257;
  k_dcy_MG472_aa = 0.000257;
  k_dcy_MG475_aa = 0.000257;
  k_dcy_MG479_aa = 0.000257;
  k_dcy_MG483_aa = 0.000257;
  k_dcy_MG484_aa = 0.000257;
  k_dcy_MG485_aa = 0.000257;
  k_dcy_MG486_aa = 0.000257;
  k_dcy_MG487_aa = 0.000257;
  k_dcy_MG488_aa = 0.000257;
  k_dcy_MG489_aa = 0.000257;
  k_dcy_MG490_aa = 0.000257;
  k_dcy_MG492_aa = 0.000257;
  k_dcy_MG493_aa = 0.000257;
  k_dcy_MG495_aa = 0.000257;
  k_dcy_MG496_aa = 0.000257;
  k_dcy_MG497_aa = 0.000257;
  k_dcy_MG499_aa = 0.000257;
  k_dcy_MG500_aa = 0.000257;
  k_dcy_MG501_aa = 0.000257;
  k_dcy_MG502_aa = 0.000257;
  k_dcy_MG503_aa = 0.000257;
  k_dcy_MG504_aa = 0.000257;
  k_dcy_MG506_aa = 0.000257;
  k_dcy_MG507_aa = 0.000257;
  k_dcy_MG508_aa = 0.000257;
  k_dcy_MG509_aa = 0.000257;
  k_dcy_MG510_aa = 0.000257;
  k_dcy_MG511_aa = 0.000257;
  k_dcy_MG512_aa = 0.000257;
  k_dcy_MG513_aa = 0.000257;
  k_dcy_MG514_aa = 0.000257;
  k_dcy_MG518_aa = 0.000257;
  k_dcy_MG519_aa = 0.000257;
  k_dcy_MG520_aa = 0.000257;
  k_dcy_MG523_aa = 0.000257;

  // Reactions:
  RNA_decay_TU_001: TU_001 + 2074 H2O -> 707 AMP + 283 CMP + 238 GMP + 847 UMP + 2074 H; k_dcy_TU_001*TU_001; RNA_decay_TU_001 is "RNA decay (MG_001 - MG_002)";
  RNA_decay_TU_002: TU_002 + 4477 H2O -> 1401 AMP + 870 CMP + 649 GMP + 1558 UMP + 4477 H; k_dcy_TU_002*TU_002; RNA_decay_TU_002 is "RNA decay (MG_003 - MG_004)";
  RNA_decay_TU_003: TU_003 + 4745 H2O -> 1564 AMP + 719 CMP + 598 GMP + 1865 UMP + 4745 H; k_dcy_TU_003*TU_003; RNA_decay_TU_003 is "RNA decay (MG_005 - MG_009)";
  RNA_decay_TU_004: TU_004 + 656 H2O -> 231 AMP + 103 CMP + 71 GMP + 252 UMP + 656 H; k_dcy_TU_004*TU_004; RNA_decay_TU_004 is "RNA decay (MG_010)";
  RNA_decay_TU_005: TU_005 + 1731 H2O -> 589 AMP + 253 CMP + 204 GMP + 686 UMP + 1731 H; k_dcy_TU_005*TU_005; RNA_decay_TU_005 is "RNA decay (MG_011 - MG_012)";
  RNA_decay_TU_006: TU_006 + 821 H2O -> 269 AMP + 127 CMP + 101 GMP + 325 UMP + 821 H; k_dcy_TU_006*TU_006; RNA_decay_TU_006 is "RNA decay (MG_013)";
  RNA_decay_MG471: MG471 + 75 H2O -> 19 AMP + 21 CMP + 18 GMP + 18 UMP + 75 H; k_dcy_MG471*MG471; RNA_decay_MG471 is "RNA decay (MG471)";
  RNA_decay_MG472: MG472 + 76 H2O -> 20 AMP + 20 CMP + 17 GMP + 20 UMP + 76 H; k_dcy_MG472*MG472; RNA_decay_MG472 is "RNA decay (MG472)";
  RNA_decay_TU_008: TU_008 + 3687 H2O -> 1344 AMP + 593 CMP + 487 GMP + 1264 UMP + 3687 H; k_dcy_TU_008*TU_008; RNA_decay_TU_008 is "RNA decay (MG_014 - MG_015)";
  RNA_decay_TU_009: TU_009 + 3095 H2O -> 1051 AMP + 472 CMP + 373 GMP + 1200 UMP + 3095 H; k_dcy_TU_009*TU_009; RNA_decay_TU_009 is "RNA decay (MG_018)";
  RNA_decay_TU_010: TU_010 + 3617 H2O -> 1219 AMP + 612 CMP + 483 GMP + 1304 UMP + 3617 H; k_dcy_TU_010*TU_010; RNA_decay_TU_010 is "RNA decay (MG_019 - MG_021)";
  RNA_decay_TU_011: TU_011 + 2413 H2O -> 790 AMP + 436 CMP + 301 GMP + 887 UMP + 2413 H; k_dcy_TU_011*TU_011; RNA_decay_TU_011 is "RNA decay (MG_022 - MG_024)";
  RNA_decay_TU_012: TU_012 + 896 H2O -> 313 AMP + 132 CMP + 129 GMP + 323 UMP + 896 H; k_dcy_TU_012*TU_012; RNA_decay_TU_012 is "RNA decay (MG_025)";
  RNA_decay_TU_013: TU_013 + 1601 H2O -> 537 AMP + 263 CMP + 210 GMP + 592 UMP + 1601 H; k_dcy_TU_013*TU_013; RNA_decay_TU_013 is "RNA decay (MG_026 - MG_028)";
  RNA_decay_TU_014: TU_014 + 5571 H2O -> 1778 AMP + 901 CMP + 806 GMP + 2087 UMP + 5571 H; k_dcy_TU_014*TU_014; RNA_decay_TU_014 is "RNA decay (MG_029 - MG_031)";
  RNA_decay_TU_015: TU_015 + 2000 H2O -> 644 AMP + 338 CMP + 294 GMP + 725 UMP + 2000 H; k_dcy_TU_015*TU_015; RNA_decay_TU_015 is "RNA decay (MG_032)";
  RNA_decay_TU_016: TU_016 + 776 H2O -> 285 AMP + 140 CMP + 128 GMP + 224 UMP + 776 H; k_dcy_TU_016*TU_016; RNA_decay_TU_016 is "RNA decay (MG_033)";
  RNA_decay_TU_017: TU_017 + 641 H2O -> 194 AMP + 106 CMP + 104 GMP + 238 UMP + 641 H; k_dcy_TU_017*TU_017; RNA_decay_TU_017 is "RNA decay (MG_034)";
  RNA_decay_TU_018: TU_018 + 1244 H2O -> 418 AMP + 209 CMP + 156 GMP + 462 UMP + 1244 H; k_dcy_TU_018*TU_018; RNA_decay_TU_018 is "RNA decay (MG_035)";
  RNA_decay_TU_019: TU_019 + 1652 H2O -> 529 AMP + 269 CMP + 230 GMP + 625 UMP + 1652 H; k_dcy_TU_019*TU_019; RNA_decay_TU_019 is "RNA decay (MG_036)";
  RNA_decay_TU_020: TU_020 + 1352 H2O -> 457 AMP + 232 CMP + 178 GMP + 486 UMP + 1352 H; k_dcy_TU_020*TU_020; RNA_decay_TU_020 is "RNA decay (MG_037)";
  RNA_decay_TU_021: TU_021 + 1526 H2O -> 455 AMP + 278 CMP + 237 GMP + 557 UMP + 1526 H; k_dcy_TU_021*TU_021; RNA_decay_TU_021 is "RNA decay (MG_038)";
  RNA_decay_TU_022: TU_022 + 1154 H2O -> 356 AMP + 186 CMP + 170 GMP + 443 UMP + 1154 H; k_dcy_TU_022*TU_022; RNA_decay_TU_022 is "RNA decay (MG_039)";
  RNA_decay_TU_023: TU_023 + 1775 H2O -> 571 AMP + 322 CMP + 256 GMP + 627 UMP + 1775 H; k_dcy_TU_023*TU_023; RNA_decay_TU_023 is "RNA decay (MG_040)";
  RNA_decay_TU_024: TU_024 + 266 H2O -> 79 AMP + 50 CMP + 39 GMP + 99 UMP + 266 H; k_dcy_TU_024*TU_024; RNA_decay_TU_024 is "RNA decay (MG_041)";
  RNA_decay_TU_025: TU_025 + 3379 H2O -> 1178 AMP + 537 CMP + 470 GMP + 1195 UMP + 3379 H; k_dcy_TU_025*TU_025; RNA_decay_TU_025 is "RNA decay (MG_042 - MG_044)";
  RNA_decay_TU_026: TU_026 + 1448 H2O -> 461 AMP + 252 CMP + 200 GMP + 536 UMP + 1448 H; k_dcy_TU_026*TU_026; RNA_decay_TU_026 is "RNA decay (MG_045)";
  RNA_decay_TU_027: TU_027 + 2082 H2O -> 703 AMP + 375 CMP + 298 GMP + 707 UMP + 2082 H; k_dcy_TU_027*TU_027; RNA_decay_TU_027 is "RNA decay (MG_046 - MG_047)";
  RNA_decay_TU_028: TU_028 + 1340 H2O -> 362 AMP + 244 CMP + 201 GMP + 534 UMP + 1340 H; k_dcy_TU_028*TU_028; RNA_decay_TU_028 is "RNA decay (MG_048)";
  RNA_decay_TU_029: TU_029 + 2643 H2O -> 845 AMP + 499 CMP + 339 GMP + 961 UMP + 2643 H; k_dcy_TU_029*TU_029; RNA_decay_TU_029 is "RNA decay (MG_049 - MG_051)";
  RNA_decay_TU_030: TU_030 + 2044 H2O -> 688 AMP + 357 CMP + 281 GMP + 719 UMP + 2044 H; k_dcy_TU_030*TU_030; RNA_decay_TU_030 is "RNA decay (MG_052 - MG_053)";
  RNA_decay_TU_031: TU_031 + 1478 H2O -> 443 AMP + 254 CMP + 197 GMP + 585 UMP + 1478 H; k_dcy_TU_031*TU_031; RNA_decay_TU_031 is "RNA decay (MG_054, MG_055, MG_473)";
  RNA_decay_TU_032: TU_032 + 1721 H2O -> 585 AMP + 259 CMP + 211 GMP + 667 UMP + 1721 H; k_dcy_TU_032*TU_032; RNA_decay_TU_032 is "RNA decay (MG_056, MG_057, MG_474)";
  RNA_decay_TU_033: TU_033 + 998 H2O -> 319 AMP + 183 CMP + 141 GMP + 356 UMP + 998 H; k_dcy_TU_033*TU_033; RNA_decay_TU_033 is "RNA decay (MG_058)";
  RNA_decay_TU_034: TU_034 + 437 H2O -> 138 AMP + 67 CMP + 56 GMP + 177 UMP + 437 H; k_dcy_TU_034*TU_034; RNA_decay_TU_034 is "RNA decay (MG_059)";
  RNA_decay_TU_035: TU_035 + 893 H2O -> 317 AMP + 143 CMP + 101 GMP + 333 UMP + 893 H; k_dcy_TU_035*TU_035; RNA_decay_TU_035 is "RNA decay (MG_060)";
  RNA_decay_TU_036: TU_036 + 1703 H2O -> 617 AMP + 312 CMP + 256 GMP + 519 UMP + 1703 H; k_dcy_TU_036*TU_036; RNA_decay_TU_036 is "RNA decay (MG_061)";
  RNA_decay_MG475: MG475 + 88 H2O -> 21 AMP + 27 CMP + 23 GMP + 18 UMP + 88 H; k_dcy_MG475*MG475; RNA_decay_MG475 is "RNA decay (MG475)";
  RNA_decay_TU_038: TU_038 + 2042 H2O -> 717 AMP + 370 CMP + 305 GMP + 651 UMP + 2042 H; k_dcy_TU_038*TU_038; RNA_decay_TU_038 is "RNA decay (MG_062)";
  RNA_decay_TU_039: TU_039 + 911 H2O -> 314 AMP + 142 CMP + 117 GMP + 339 UMP + 911 H; k_dcy_TU_039*TU_039; RNA_decay_TU_039 is "RNA decay (MG_063)";
  RNA_decay_TU_040: TU_040 + 5395 H2O -> 1819 AMP + 826 CMP + 787 GMP + 1964 UMP + 5395 H; k_dcy_TU_040*TU_040; RNA_decay_TU_040 is "RNA decay (MG_064 - MG_065)";
  RNA_decay_TU_041: TU_041 + 1946 H2O -> 631 AMP + 347 CMP + 293 GMP + 676 UMP + 1946 H; k_dcy_TU_041*TU_041; RNA_decay_TU_041 is "RNA decay (MG_066)";
  RNA_decay_TU_042: TU_042 + 2998 H2O -> 994 AMP + 447 CMP + 466 GMP + 1092 UMP + 2998 H; k_dcy_TU_042*TU_042; RNA_decay_TU_042 is "RNA decay (MG_067 - MG_068)";
  RNA_decay_TU_043: TU_043 + 2726 H2O -> 908 AMP + 534 CMP + 443 GMP + 842 UMP + 2726 H; k_dcy_TU_043*TU_043; RNA_decay_TU_043 is "RNA decay (MG_069)";
  RNA_decay_TU_044: TU_044 + 854 H2O -> 238 AMP + 137 CMP + 155 GMP + 325 UMP + 854 H; k_dcy_TU_044*TU_044; RNA_decay_TU_044 is "RNA decay (MG_070)";
  RNA_decay_TU_045: TU_045 + 2624 H2O -> 920 AMP + 509 CMP + 376 GMP + 820 UMP + 2624 H; k_dcy_TU_045*TU_045; RNA_decay_TU_045 is "RNA decay (MG_071)";
  RNA_decay_TU_046: TU_046 + 2420 H2O -> 721 AMP + 494 CMP + 372 GMP + 834 UMP + 2420 H; k_dcy_TU_046*TU_046; RNA_decay_TU_046 is "RNA decay (MG_072)";
  RNA_decay_TU_047: TU_047 + 1970 H2O -> 594 AMP + 348 CMP + 323 GMP + 706 UMP + 1970 H; k_dcy_TU_047*TU_047; RNA_decay_TU_047 is "RNA decay (MG_073)";
  RNA_decay_TU_048: TU_048 + 413 H2O -> 166 AMP + 62 CMP + 56 GMP + 130 UMP + 413 H; k_dcy_TU_048*TU_048; RNA_decay_TU_048 is "RNA decay (MG_074)";
  RNA_decay_TU_049: TU_049 + 3074 H2O -> 1029 AMP + 448 CMP + 501 GMP + 1097 UMP + 3074 H; k_dcy_TU_049*TU_049; RNA_decay_TU_049 is "RNA decay (MG_075)";
  RNA_decay_TU_050: TU_050 + 416 H2O -> 164 AMP + 75 CMP + 47 GMP + 131 UMP + 416 H; k_dcy_TU_050*TU_050; RNA_decay_TU_050 is "RNA decay (MG_076)";
  RNA_decay_TU_051: TU_051 + 6102 H2O -> 1973 AMP + 1045 CMP + 997 GMP + 2088 UMP + 6102 H; k_dcy_TU_051*TU_051; RNA_decay_TU_051 is "RNA decay (MG_077 - MG_080)";
  RNA_decay_TU_052: TU_052 + 1093 H2O -> 308 AMP + 201 CMP + 173 GMP + 412 UMP + 1093 H; k_dcy_TU_052*TU_052; RNA_decay_TU_052 is "RNA decay (MG_081 - MG_082)";
  RNA_decay_TU_053: TU_053 + 569 H2O -> 175 AMP + 112 CMP + 79 GMP + 204 UMP + 569 H; k_dcy_TU_053*TU_053; RNA_decay_TU_053 is "RNA decay (MG_083)";
  RNA_decay_TU_054: TU_054 + 1808 H2O -> 566 AMP + 327 CMP + 269 GMP + 647 UMP + 1808 H; k_dcy_TU_054*TU_054; RNA_decay_TU_054 is "RNA decay (MG_084 - MG_085)";
  RNA_decay_TU_055: TU_055 + 4156 H2O -> 1327 AMP + 815 CMP + 650 GMP + 1365 UMP + 4156 H; k_dcy_TU_055*TU_055; RNA_decay_TU_055 is "RNA decay (MG_086 - MG_089)";
  RNA_decay_TU_056: TU_056 + 626 H2O -> 169 AMP + 103 CMP + 113 GMP + 242 UMP + 626 H; k_dcy_TU_056*TU_056; RNA_decay_TU_056 is "RNA decay (MG_090)";
  RNA_decay_TU_057: TU_057 + 482 H2O -> 149 AMP + 84 CMP + 84 GMP + 166 UMP + 482 H; k_dcy_TU_057*TU_057; RNA_decay_TU_057 is "RNA decay (MG_091)";
  RNA_decay_TU_058: TU_058 + 317 H2O -> 80 AMP + 54 CMP + 57 GMP + 127 UMP + 317 H; k_dcy_TU_058*TU_058; RNA_decay_TU_058 is "RNA decay (MG_092)";
  RNA_decay_TU_059: TU_059 + 3042 H2O -> 939 AMP + 502 CMP + 497 GMP + 1105 UMP + 3042 H; k_dcy_TU_059*TU_059; RNA_decay_TU_059 is "RNA decay (MG_093 - MG_095)";
  RNA_decay_TU_060: TU_060 + 1952 H2O -> 620 AMP + 336 CMP + 305 GMP + 692 UMP + 1952 H; k_dcy_TU_060*TU_060; RNA_decay_TU_060 is "RNA decay (MG_096)";
  RNA_decay_TU_061: TU_061 + 737 H2O -> 242 AMP + 118 CMP + 120 GMP + 258 UMP + 737 H; k_dcy_TU_061*TU_061; RNA_decay_TU_061 is "RNA decay (MG_097)";
  RNA_decay_TU_062: TU_062 + 4295 H2O -> 1457 AMP + 695 CMP + 669 GMP + 1475 UMP + 4295 H; k_dcy_TU_062*TU_062; RNA_decay_TU_062 is "RNA decay (MG_098 - MG_100)";
  RNA_decay_TU_063: TU_063 + 2440 H2O -> 810 AMP + 422 CMP + 346 GMP + 863 UMP + 2440 H; k_dcy_TU_063*TU_063; RNA_decay_TU_063 is "RNA decay (MG_101 - MG_103)";
  RNA_decay_TU_064: TU_064 + 233 H2O -> 95 AMP + 43 CMP + 33 GMP + 63 UMP + 233 H; k_dcy_TU_064*TU_064; RNA_decay_TU_064 is "RNA decay (MG_476)";
  RNA_decay_TU_065: TU_065 + 2177 H2O -> 682 AMP + 374 CMP + 350 GMP + 772 UMP + 2177 H; k_dcy_TU_065*TU_065; RNA_decay_TU_065 is "RNA decay (MG_104)";
  RNA_decay_TU_066: TU_066 + 602 H2O -> 237 AMP + 98 CMP + 89 GMP + 179 UMP + 602 H; k_dcy_TU_066*TU_066; RNA_decay_TU_066 is "RNA decay (MG_105)";
  RNA_decay_TU_067: TU_067 + 581 H2O -> 178 AMP + 107 CMP + 79 GMP + 218 UMP + 581 H; k_dcy_TU_067*TU_067; RNA_decay_TU_067 is "RNA decay (MG_106)";
  RNA_decay_TU_068: TU_068 + 3322 H2O -> 1099 AMP + 561 CMP + 457 GMP + 1206 UMP + 3322 H; k_dcy_TU_068*TU_068; RNA_decay_TU_068 is "RNA decay (MG_107 - MG_110)";
  RNA_decay_TU_069: TU_069 + 1920 H2O -> 656 AMP + 310 CMP + 288 GMP + 667 UMP + 1920 H; k_dcy_TU_069*TU_069; RNA_decay_TU_069 is "RNA decay (MG_111 - MG_112)";
  RNA_decay_TU_070: TU_070 + 1370 H2O -> 423 AMP + 248 CMP + 204 GMP + 496 UMP + 1370 H; k_dcy_TU_070*TU_070; RNA_decay_TU_070 is "RNA decay (MG_113)";
  RNA_decay_TU_071: TU_071 + 710 H2O -> 279 AMP + 129 CMP + 96 GMP + 207 UMP + 710 H; k_dcy_TU_071*TU_071; RNA_decay_TU_071 is "RNA decay (MG_114)";
  RNA_decay_TU_072: TU_072 + 473 H2O -> 160 AMP + 94 CMP + 69 GMP + 151 UMP + 473 H; k_dcy_TU_072*TU_072; RNA_decay_TU_072 is "RNA decay (MG_115)";
  RNA_decay_TU_073: TU_073 + 2395 H2O -> 808 AMP + 379 CMP + 347 GMP + 862 UMP + 2395 H; k_dcy_TU_073*TU_073; RNA_decay_TU_073 is "RNA decay (MG_116 - MG_118)";
  RNA_decay_TU_074: TU_074 + 6355 H2O -> 2102 AMP + 1183 CMP + 918 GMP + 2153 UMP + 6355 H; k_dcy_TU_074*TU_074; RNA_decay_TU_074 is "RNA decay (MG_119 - MG_122)";
  RNA_decay_TU_075: TU_075 + 1415 H2O -> 455 AMP + 211 CMP + 197 GMP + 553 UMP + 1415 H; k_dcy_TU_075*TU_075; RNA_decay_TU_075 is "RNA decay (MG_123)";
  RNA_decay_TU_076: TU_076 + 1171 H2O -> 393 AMP + 192 CMP + 168 GMP + 419 UMP + 1171 H; k_dcy_TU_076*TU_076; RNA_decay_TU_076 is "RNA decay (MG_124 - MG_125)";
  RNA_decay_TU_077: TU_077 + 1043 H2O -> 322 AMP + 160 CMP + 159 GMP + 403 UMP + 1043 H; k_dcy_TU_077*TU_077; RNA_decay_TU_077 is "RNA decay (MG_126)";
  RNA_decay_TU_078: TU_078 + 1224 H2O -> 400 AMP + 207 CMP + 195 GMP + 423 UMP + 1224 H; k_dcy_TU_078*TU_078; RNA_decay_TU_078 is "RNA decay (MG_127 - MG_128)";
  RNA_decay_TU_079: TU_079 + 353 H2O -> 118 AMP + 55 CMP + 44 GMP + 137 UMP + 353 H; k_dcy_TU_079*TU_079; RNA_decay_TU_079 is "RNA decay (MG_129)";
  RNA_decay_TU_080: TU_080 + 1454 H2O -> 480 AMP + 214 CMP + 223 GMP + 538 UMP + 1454 H; k_dcy_TU_080*TU_080; RNA_decay_TU_080 is "RNA decay (MG_130)";
  RNA_decay_TU_081: TU_081 + 286 H2O -> 128 AMP + 40 CMP + 36 GMP + 83 UMP + 286 H; k_dcy_TU_081*TU_081; RNA_decay_TU_081 is "RNA decay (MG_131)";
  RNA_decay_TU_082: TU_082 + 425 H2O -> 132 AMP + 67 CMP + 69 GMP + 158 UMP + 425 H; k_dcy_TU_082*TU_082; RNA_decay_TU_082 is "RNA decay (MG_132)";
  RNA_decay_TU_083: TU_083 + 794 H2O -> 326 AMP + 108 CMP + 126 GMP + 235 UMP + 794 H; k_dcy_TU_083*TU_083; RNA_decay_TU_083 is "RNA decay (MG_133)";
  RNA_decay_TU_084: TU_084 + 302 H2O -> 87 AMP + 58 CMP + 41 GMP + 117 UMP + 302 H; k_dcy_TU_084*TU_084; RNA_decay_TU_084 is "RNA decay (MG_134)";
  RNA_decay_TU_085: TU_085 + 842 H2O -> 343 AMP + 145 CMP + 120 GMP + 235 UMP + 842 H; k_dcy_TU_085*TU_085; RNA_decay_TU_085 is "RNA decay (MG_135)";
  RNA_decay_TU_086: TU_086 + 4424 H2O -> 1415 AMP + 766 CMP + 674 GMP + 1570 UMP + 4424 H; k_dcy_TU_086*TU_086; RNA_decay_TU_086 is "RNA decay (MG_136 - MG_138)";
  RNA_decay_TU_087: TU_087 + 1709 H2O -> 556 AMP + 320 CMP + 265 GMP + 569 UMP + 1709 H; k_dcy_TU_087*TU_087; RNA_decay_TU_087 is "RNA decay (MG_139)";
  RNA_decay_MGrrnA16S: MGrrnA16S + 1518 H2O -> 384 AMP + 409 CMP + 284 GMP + 442 UMP + 1518 H; k_dcy_MGrrnA16S*MGrrnA16S; RNA_decay_MGrrnA16S is "RNA decay (16S ribosomal rRNA)";
  RNA_decay_MGrrnA23S: MGrrnA23S + 2733 H2O -> 670 AMP + 759 CMP + 490 GMP + 815 UMP + 2733 H; k_dcy_MGrrnA23S*MGrrnA23S; RNA_decay_MGrrnA23S is "RNA decay (23S ribosomal rRNA)";
  RNA_decay_MGrrnA5S: MGrrnA5S + 103 H2O -> 20 AMP + 25 CMP + 23 GMP + 36 UMP + 103 H; k_dcy_MGrrnA5S*MGrrnA5S; RNA_decay_MGrrnA5S is "RNA decay (5S ribosomal rRNA)";
  RNA_decay_TU_089: TU_089 + 3341 H2O -> 1050 AMP + 587 CMP + 522 GMP + 1183 UMP + 3341 H; k_dcy_TU_089*TU_089; RNA_decay_TU_089 is "RNA decay (MG_140)";
  RNA_decay_TU_090: TU_090 + 1595 H2O -> 483 AMP + 298 CMP + 221 GMP + 594 UMP + 1595 H; k_dcy_TU_090*TU_090; RNA_decay_TU_090 is "RNA decay (MG_141)";
  RNA_decay_TU_091: TU_091 + 272 H2O -> 81 AMP + 44 CMP + 39 GMP + 109 UMP + 272 H; k_dcy_TU_091*TU_091; RNA_decay_TU_091 is "RNA decay (MG_477)";
  RNA_decay_TU_092: TU_092 + 3048 H2O -> 955 AMP + 587 CMP + 442 GMP + 1065 UMP + 3048 H; k_dcy_TU_092*TU_092; RNA_decay_TU_092 is "RNA decay (MG_142 - MG_144)";
  RNA_decay_TU_093: TU_093 + 809 H2O -> 272 AMP + 142 CMP + 105 GMP + 291 UMP + 809 H; k_dcy_TU_093*TU_093; RNA_decay_TU_093 is "RNA decay (MG_145)";
  RNA_decay_TU_094: TU_094 + 1274 H2O -> 431 AMP + 202 CMP + 202 GMP + 440 UMP + 1274 H; k_dcy_TU_094*TU_094; RNA_decay_TU_094 is "RNA decay (MG_146)";
  RNA_decay_TU_095: TU_095 + 1127 H2O -> 467 AMP + 207 CMP + 155 GMP + 299 UMP + 1127 H; k_dcy_TU_095*TU_095; RNA_decay_TU_095 is "RNA decay (MG_147)";
  RNA_decay_TU_096: TU_096 + 1229 H2O -> 351 AMP + 206 CMP + 162 GMP + 511 UMP + 1229 H; k_dcy_TU_096*TU_096; RNA_decay_TU_096 is "RNA decay (MG_148)";
  RNA_decay_TU_097: TU_097 + 845 H2O -> 239 AMP + 143 CMP + 139 GMP + 325 UMP + 845 H; k_dcy_TU_097*TU_097; RNA_decay_TU_097 is "RNA decay (MG_149)";
  RNA_decay_TU_098: TU_098 + 464 H2O -> 188 AMP + 73 CMP + 66 GMP + 138 UMP + 464 H; k_dcy_TU_098*TU_098; RNA_decay_TU_098 is "RNA decay (MG_478)";
  RNA_decay_TU_099: TU_099 + 320 H2O -> 95 AMP + 64 CMP + 53 GMP + 109 UMP + 320 H; k_dcy_TU_099*TU_099; RNA_decay_TU_099 is "RNA decay (MG_150)";
  RNA_decay_TU_100: TU_100 + 773 H2O -> 205 AMP + 180 CMP + 120 GMP + 269 UMP + 773 H; k_dcy_TU_100*TU_100; RNA_decay_TU_100 is "RNA decay (MG_151)";
  RNA_decay_TU_101: TU_101 + 959 H2O -> 245 AMP + 171 CMP + 176 GMP + 368 UMP + 959 H; k_dcy_TU_101*TU_101; RNA_decay_TU_101 is "RNA decay (MG_152 - MG_153)";
  RNA_decay_TU_102: TU_102 + 4893 H2O -> 1240 AMP + 974 CMP + 865 GMP + 1815 UMP + 4893 H; k_dcy_TU_102*TU_102; RNA_decay_TU_102 is "RNA decay (MG_154 - MG_163)";
  RNA_decay_TU_103: TU_103 + 182 H2O -> 50 AMP + 46 CMP + 32 GMP + 55 UMP + 182 H; k_dcy_TU_103*TU_103; RNA_decay_TU_103 is "RNA decay (MG_164)";
  RNA_decay_TU_104: TU_104 + 2433 H2O -> 635 AMP + 474 CMP + 409 GMP + 916 UMP + 2433 H; k_dcy_TU_104*TU_104; RNA_decay_TU_104 is "RNA decay (MG_165 - MG_169)";
  RNA_decay_TU_105: TU_105 + 3026 H2O -> 958 AMP + 601 CMP + 527 GMP + 941 UMP + 3026 H; k_dcy_TU_105*TU_105; RNA_decay_TU_105 is "RNA decay (MG_170 - MG_173)";
  RNA_decay_TU_106: TU_106 + 113 H2O -> 21 AMP + 23 CMP + 20 GMP + 50 UMP + 113 H; k_dcy_TU_106*TU_106; RNA_decay_TU_106 is "RNA decay (MG_174)";
  RNA_decay_TU_107: TU_107 + 1741 H2O -> 442 AMP + 389 CMP + 297 GMP + 614 UMP + 1741 H; k_dcy_TU_107*TU_107; RNA_decay_TU_107 is "RNA decay (MG_175 - MG_177)";
  RNA_decay_TU_108: TU_108 + 371 H2O -> 97 AMP + 80 CMP + 54 GMP + 141 UMP + 371 H; k_dcy_TU_108*TU_108; RNA_decay_TU_108 is "RNA decay (MG_178)";
  RNA_decay_TU_109: TU_109 + 824 H2O -> 245 AMP + 158 CMP + 136 GMP + 286 UMP + 824 H; k_dcy_TU_109*TU_109; RNA_decay_TU_109 is "RNA decay (MG_179)";
  RNA_decay_TU_110: TU_110 + 914 H2O -> 263 AMP + 183 CMP + 155 GMP + 314 UMP + 914 H; k_dcy_TU_110*TU_110; RNA_decay_TU_110 is "RNA decay (MG_180)";
  RNA_decay_TU_111: TU_111 + 1262 H2O -> 462 AMP + 231 CMP + 218 GMP + 352 UMP + 1262 H; k_dcy_TU_111*TU_111; RNA_decay_TU_111 is "RNA decay (MG_181)";
  RNA_decay_TU_112: TU_112 + 734 H2O -> 235 AMP + 148 CMP + 108 GMP + 244 UMP + 734 H; k_dcy_TU_112*TU_112; RNA_decay_TU_112 is "RNA decay (MG_182)";
  RNA_decay_TU_113: TU_113 + 2777 H2O -> 876 AMP + 418 CMP + 459 GMP + 1025 UMP + 2777 H; k_dcy_TU_113*TU_113; RNA_decay_TU_113 is "RNA decay (MG_183 - MG_184)";
  RNA_decay_TU_114: TU_114 + 2105 H2O -> 657 AMP + 347 CMP + 340 GMP + 762 UMP + 2105 H; k_dcy_TU_114*TU_114; RNA_decay_TU_114 is "RNA decay (MG_185)";
  RNA_decay_TU_115: TU_115 + 752 H2O -> 226 AMP + 139 CMP + 135 GMP + 253 UMP + 752 H; k_dcy_TU_115*TU_115; RNA_decay_TU_115 is "RNA decay (MG_186)";
  RNA_decay_TU_116: TU_116 + 3677 H2O -> 1199 AMP + 663 CMP + 642 GMP + 1174 UMP + 3677 H; k_dcy_TU_116*TU_116; RNA_decay_TU_116 is "RNA decay (MG_187 - MG_189)";
  RNA_decay_TU_117: TU_117 + 956 H2O -> 281 AMP + 186 CMP + 135 GMP + 355 UMP + 956 H; k_dcy_TU_117*TU_117; RNA_decay_TU_117 is "RNA decay (MG_190)";
  RNA_decay_TU_118: TU_118 + 7497 H2O -> 2029 AMP + 1493 CMP + 1523 GMP + 2453 UMP + 7497 H; k_dcy_TU_118*TU_118; RNA_decay_TU_118 is "RNA decay (MG_191 - MG_192)";
  RNA_decay_TU_119: TU_119 + 3449 H2O -> 1085 AMP + 542 CMP + 582 GMP + 1241 UMP + 3449 H; k_dcy_TU_119*TU_119; RNA_decay_TU_119 is "RNA decay (MG_194 - MG_195)";
  RNA_decay_TU_120: TU_120 + 1104 H2O -> 278 AMP + 199 CMP + 198 GMP + 430 UMP + 1104 H; k_dcy_TU_120*TU_120; RNA_decay_TU_120 is "RNA decay (MG_196 - MG_198)";
  RNA_decay_TU_121: TU_121 + 707 H2O -> 222 AMP + 113 CMP + 116 GMP + 257 UMP + 707 H; k_dcy_TU_121*TU_121; RNA_decay_TU_121 is "RNA decay (MG_199)";
  RNA_decay_TU_122: TU_122 + 2848 H2O -> 747 AMP + 520 CMP + 552 GMP + 1030 UMP + 2848 H; k_dcy_TU_122*TU_122; RNA_decay_TU_122 is "RNA decay (MG_200 - MG_202)";
  RNA_decay_MG479: MG479 + 73 H2O -> 17 AMP + 20 CMP + 15 GMP + 22 UMP + 73 H; k_dcy_MG479*MG479; RNA_decay_MG479 is "RNA decay (MG479)";
  RNA_decay_TU_124: TU_124 + 4246 H2O -> 1228 AMP + 782 CMP + 704 GMP + 1533 UMP + 4246 H; k_dcy_TU_124*TU_124; RNA_decay_TU_124 is "RNA decay (MG_203 - MG_204)";
  RNA_decay_TU_125: TU_125 + 1031 H2O -> 297 AMP + 173 CMP + 183 GMP + 379 UMP + 1031 H; k_dcy_TU_125*TU_125; RNA_decay_TU_125 is "RNA decay (MG_205)";
  RNA_decay_TU_126: TU_126 + 1793 H2O -> 540 AMP + 270 CMP + 318 GMP + 666 UMP + 1793 H; k_dcy_TU_126*TU_126; RNA_decay_TU_126 is "RNA decay (MG_206)";
  RNA_decay_TU_127: TU_127 + 503 H2O -> 142 AMP + 78 CMP + 101 GMP + 183 UMP + 503 H; k_dcy_TU_127*TU_127; RNA_decay_TU_127 is "RNA decay (MG_207)";
  RNA_decay_TU_128: TU_128 + 2045 H2O -> 679 AMP + 342 CMP + 333 GMP + 692 UMP + 2045 H; k_dcy_TU_128*TU_128; RNA_decay_TU_128 is "RNA decay (MG_208 - MG_210)";
  RNA_decay_TU_129: TU_129 + 659 H2O -> 189 AMP + 125 CMP + 107 GMP + 239 UMP + 659 H; k_dcy_TU_129*TU_129; RNA_decay_TU_129 is "RNA decay (MG_480)";
  RNA_decay_TU_130: TU_130 + 188 H2O -> 41 AMP + 44 CMP + 29 GMP + 75 UMP + 188 H; k_dcy_TU_130*TU_130; RNA_decay_TU_130 is "RNA decay (MG_481)";
  RNA_decay_TU_131: TU_131 + 1589 H2O -> 496 AMP + 280 CMP + 240 GMP + 574 UMP + 1589 H; k_dcy_TU_131*TU_131; RNA_decay_TU_131 is "RNA decay (MG_211, MG_212, MG_482)";
  RNA_decay_TU_132: TU_132 + 2022 H2O -> 623 AMP + 331 CMP + 339 GMP + 730 UMP + 2022 H; k_dcy_TU_132*TU_132; RNA_decay_TU_132 is "RNA decay (MG_213 - MG_214)";
  RNA_decay_TU_133: TU_133 + 2500 H2O -> 750 AMP + 492 CMP + 417 GMP + 842 UMP + 2500 H; k_dcy_TU_133*TU_133; RNA_decay_TU_133 is "RNA decay (MG_215 - MG_216)";
  RNA_decay_MG483: MG483 + 76 H2O -> 16 AMP + 19 CMP + 24 GMP + 18 UMP + 76 H; k_dcy_MG483*MG483; RNA_decay_MG483 is "RNA decay (MG483)";
  RNA_decay_MG484: MG484 + 76 H2O -> 20 AMP + 24 CMP + 17 GMP + 16 UMP + 76 H; k_dcy_MG484*MG484; RNA_decay_MG484 is "RNA decay (MG484)";
  RNA_decay_MG485: MG485 + 76 H2O -> 19 AMP + 23 CMP + 22 GMP + 13 UMP + 76 H; k_dcy_MG485*MG485; RNA_decay_MG485 is "RNA decay (MG485)";
  RNA_decay_MG486: MG486 + 76 H2O -> 22 AMP + 16 CMP + 20 GMP + 19 UMP + 76 H; k_dcy_MG486*MG486; RNA_decay_MG486 is "RNA decay (MG486)";
  RNA_decay_MG487: MG487 + 91 H2O -> 19 AMP + 27 CMP + 24 GMP + 22 UMP + 91 H; k_dcy_MG487*MG487; RNA_decay_MG487 is "RNA decay (MG487)";
  RNA_decay_MG488: MG488 + 76 H2O -> 16 AMP + 21 CMP + 22 GMP + 18 UMP + 76 H; k_dcy_MG488*MG488; RNA_decay_MG488 is "RNA decay (MG488)";
  RNA_decay_MG489: MG489 + 73 H2O -> 21 AMP + 23 CMP + 17 GMP + 13 UMP + 73 H; k_dcy_MG489*MG489; RNA_decay_MG489 is "RNA decay (MG489)";
  RNA_decay_MG490: MG490 + 75 H2O -> 17 AMP + 23 CMP + 20 GMP + 16 UMP + 75 H; k_dcy_MG490*MG490; RNA_decay_MG490 is "RNA decay (MG490)";
  RNA_decay_TU_142: TU_142 + 1118 H2O -> 289 AMP + 138 CMP + 243 GMP + 449 UMP + 1118 H; k_dcy_TU_142*TU_142; RNA_decay_TU_142 is "RNA decay (MG_217)";
  RNA_decay_TU_143: TU_143 + 6460 H2O -> 1584 AMP + 1074 CMP + 1150 GMP + 2653 UMP + 6460 H; k_dcy_TU_143*TU_143; RNA_decay_TU_143 is "RNA decay (MG_218, MG_491)";
  RNA_decay_TU_144: TU_144 + 446 H2O -> 100 AMP + 60 CMP + 91 GMP + 196 UMP + 446 H; k_dcy_TU_144*TU_144; RNA_decay_TU_144 is "RNA decay (MG_219)";
  RNA_decay_TU_145: TU_145 + 281 H2O -> 93 AMP + 50 CMP + 46 GMP + 93 UMP + 281 H; k_dcy_TU_145*TU_145; RNA_decay_TU_145 is "RNA decay (MG_220)";
  RNA_decay_MG492: MG492 + 76 H2O -> 20 AMP + 23 CMP + 16 GMP + 18 UMP + 76 H; k_dcy_MG492*MG492; RNA_decay_MG492 is "RNA decay (MG492)";
  RNA_decay_TU_147: TU_147 + 2581 H2O -> 785 AMP + 386 CMP + 456 GMP + 955 UMP + 2581 H; k_dcy_TU_147*TU_147; RNA_decay_TU_147 is "RNA decay (MG_221 - MG_223)";
  RNA_decay_TU_148: TU_148 + 1109 H2O -> 329 AMP + 183 CMP + 186 GMP + 412 UMP + 1109 H; k_dcy_TU_148*TU_148; RNA_decay_TU_148 is "RNA decay (MG_224)";
  RNA_decay_TU_149: TU_149 + 2913 H2O -> 1115 AMP + 536 CMP + 423 GMP + 840 UMP + 2913 H; k_dcy_TU_149*TU_149; RNA_decay_TU_149 is "RNA decay (MG_225 - MG_226)";
  RNA_decay_TU_150: TU_150 + 863 H2O -> 278 AMP + 149 CMP + 137 GMP + 300 UMP + 863 H; k_dcy_TU_150*TU_150; RNA_decay_TU_150 is "RNA decay (MG_227)";
  RNA_decay_TU_151: TU_151 + 4159 H2O -> 1280 AMP + 773 CMP + 685 GMP + 1422 UMP + 4159 H; k_dcy_TU_151*TU_151; RNA_decay_TU_151 is "RNA decay (MG_228 - MG_231)";
  RNA_decay_TU_152: TU_152 + 2181 H2O -> 664 AMP + 403 CMP + 395 GMP + 720 UMP + 2181 H; k_dcy_TU_152*TU_152; RNA_decay_TU_152 is "RNA decay (MG_232 - MG_236)";
  RNA_decay_TU_153: TU_153 + 884 H2O -> 283 AMP + 129 CMP + 152 GMP + 321 UMP + 884 H; k_dcy_TU_153*TU_153; RNA_decay_TU_153 is "RNA decay (MG_237)";
  RNA_decay_TU_154: TU_154 + 1334 H2O -> 382 AMP + 204 CMP + 225 GMP + 524 UMP + 1334 H; k_dcy_TU_154*TU_154; RNA_decay_TU_154 is "RNA decay (MG_238)";
  RNA_decay_TU_155: TU_155 + 2387 H2O -> 665 AMP + 489 CMP + 387 GMP + 847 UMP + 2387 H; k_dcy_TU_155*TU_155; RNA_decay_TU_155 is "RNA decay (MG_239)";
  RNA_decay_TU_156: TU_156 + 1052 H2O -> 319 AMP + 157 CMP + 173 GMP + 404 UMP + 1052 H; k_dcy_TU_156*TU_156; RNA_decay_TU_156 is "RNA decay (MG_240)";
  RNA_decay_TU_157: TU_157 + 1862 H2O -> 629 AMP + 270 CMP + 259 GMP + 705 UMP + 1862 H; k_dcy_TU_157*TU_157; RNA_decay_TU_157 is "RNA decay (MG_241)";
  RNA_decay_TU_158: TU_158 + 1892 H2O -> 645 AMP + 293 CMP + 241 GMP + 714 UMP + 1892 H; k_dcy_TU_158*TU_158; RNA_decay_TU_158 is "RNA decay (MG_242)";
  RNA_decay_TU_159: TU_159 + 2797 H2O -> 944 AMP + 428 CMP + 377 GMP + 1049 UMP + 2797 H; k_dcy_TU_159*TU_159; RNA_decay_TU_159 is "RNA decay (MG_243 - MG_244)";
  RNA_decay_TU_160: TU_160 + 497 H2O -> 175 AMP + 67 CMP + 62 GMP + 194 UMP + 497 H; k_dcy_TU_160*TU_160; RNA_decay_TU_160 is "RNA decay (MG_245)";
  RNA_decay_TU_161: TU_161 + 845 H2O -> 291 AMP + 154 CMP + 114 GMP + 287 UMP + 845 H; k_dcy_TU_161*TU_161; RNA_decay_TU_161 is "RNA decay (MG_246)";
  RNA_decay_TU_162: TU_162 + 719 H2O -> 300 AMP + 117 CMP + 100 GMP + 203 UMP + 719 H; k_dcy_TU_162*TU_162; RNA_decay_TU_162 is "RNA decay (MG_247)";
  RNA_decay_TU_163: TU_163 + 2133 H2O -> 615 AMP + 367 CMP + 325 GMP + 827 UMP + 2133 H; k_dcy_TU_163*TU_163; RNA_decay_TU_163 is "RNA decay (MG_248 - MG_249)";
  RNA_decay_TU_164: TU_164 + 3153 H2O -> 1013 AMP + 525 CMP + 446 GMP + 1170 UMP + 3153 H; k_dcy_TU_164*TU_164; RNA_decay_TU_164 is "RNA decay (MG_250 - MG_251)";
  RNA_decay_TU_165: TU_165 + 4001 H2O -> 1264 AMP + 631 CMP + 597 GMP + 1510 UMP + 4001 H; k_dcy_TU_165*TU_165; RNA_decay_TU_165 is "RNA decay (MG_252 - MG_254)";
  RNA_decay_MG493: MG493 + 73 H2O -> 21 AMP + 17 CMP + 16 GMP + 20 UMP + 73 H; k_dcy_MG493*MG493; RNA_decay_MG493 is "RNA decay (MG493)";
  RNA_decay_TU_167: TU_167 + 1653 H2O -> 582 AMP + 248 CMP + 235 GMP + 589 UMP + 1653 H; k_dcy_TU_167*TU_167; RNA_decay_TU_167 is "RNA decay (MG_255, MG_494)";
  RNA_decay_MG495: MG495 + 74 H2O -> 17 AMP + 17 CMP + 19 GMP + 22 UMP + 74 H; k_dcy_MG495*MG495; RNA_decay_MG495 is "RNA decay (MG495)";
  RNA_decay_MG496: MG496 + 73 H2O -> 20 AMP + 20 CMP + 19 GMP + 15 UMP + 73 H; k_dcy_MG496*MG496; RNA_decay_MG496 is "RNA decay (MG496)";
  RNA_decay_TU_169: TU_169 + 770 H2O -> 294 AMP + 113 CMP + 113 GMP + 251 UMP + 770 H; k_dcy_TU_169*TU_169; RNA_decay_TU_169 is "RNA decay (MG_256)";
  RNA_decay_TU_170: TU_170 + 2743 H2O -> 839 AMP + 449 CMP + 425 GMP + 1031 UMP + 2743 H; k_dcy_TU_170*TU_170; RNA_decay_TU_170 is "RNA decay (MG_257 - MG_259)";
  RNA_decay_TU_171: TU_171 + 2297 H2O -> 703 AMP + 376 CMP + 357 GMP + 862 UMP + 2297 H; k_dcy_TU_171*TU_171; RNA_decay_TU_171 is "RNA decay (MG_260)";
  RNA_decay_MG497: MG497 + 76 H2O -> 18 AMP + 24 CMP + 19 GMP + 16 UMP + 76 H; k_dcy_MG497*MG497; RNA_decay_MG497 is "RNA decay (MG497)";
  RNA_decay_TU_173: TU_173 + 4360 H2O -> 1438 AMP + 637 CMP + 648 GMP + 1638 UMP + 4360 H; k_dcy_TU_173*TU_173; RNA_decay_TU_173 is "RNA decay (MG_261, MG_262, MG_498)";
  RNA_decay_TU_174: TU_174 + 875 H2O -> 290 AMP + 151 CMP + 124 GMP + 311 UMP + 875 H; k_dcy_TU_174*TU_174; RNA_decay_TU_174 is "RNA decay (MG_263)";
  RNA_decay_TU_175: TU_175 + 596 H2O -> 189 AMP + 98 CMP + 84 GMP + 226 UMP + 596 H; k_dcy_TU_175*TU_175; RNA_decay_TU_175 is "RNA decay (MG_264)";
  RNA_decay_TU_176: TU_176 + 3581 H2O -> 1184 AMP + 611 CMP + 530 GMP + 1257 UMP + 3581 H; k_dcy_TU_176*TU_176; RNA_decay_TU_176 is "RNA decay (MG_265 - MG_267)";
  RNA_decay_TU_177: TU_177 + 686 H2O -> 230 AMP + 112 CMP + 105 GMP + 240 UMP + 686 H; k_dcy_TU_177*TU_177; RNA_decay_TU_177 is "RNA decay (MG_268)";
  RNA_decay_MG_0001: MG_0001 + 82 H2O -> 22 AMP + 21 CMP + 14 GMP + 26 UMP + 82 H; k_dcy_MG_0001*MG_0001; RNA_decay_MG_0001 is "RNA decay (scRNA, signal recognition particle 4.5S RNA, MCS1)";
  RNA_decay_TU_179: TU_179 + 1022 H2O -> 254 AMP + 164 CMP + 174 GMP + 431 UMP + 1022 H; k_dcy_TU_179*TU_179; RNA_decay_TU_179 is "RNA decay (MG_269)";
  RNA_decay_TU_180: TU_180 + 3552 H2O -> 1110 AMP + 726 CMP + 510 GMP + 1207 UMP + 3552 H; k_dcy_TU_180*TU_180; RNA_decay_TU_180 is "RNA decay (MG_270 - MG_272)";
  RNA_decay_MG_0002: MG_0002 + 181 H2O -> 55 AMP + 32 CMP + 30 GMP + 65 UMP + 181 H; k_dcy_MG_0002*MG_0002; RNA_decay_MG_0002 is "RNA decay (MG170 RNA)";
  RNA_decay_TU_182: TU_182 + 3538 H2O -> 1076 AMP + 745 CMP + 563 GMP + 1155 UMP + 3538 H; k_dcy_TU_182*TU_182; RNA_decay_TU_182 is "RNA decay (MG_273 - MG_275)";
  RNA_decay_TU_183: TU_183 + 542 H2O -> 171 AMP + 103 CMP + 94 GMP + 175 UMP + 542 H; k_dcy_TU_183*TU_183; RNA_decay_TU_183 is "RNA decay (MG_276)";
  RNA_decay_TU_184: TU_184 + 2912 H2O -> 1024 AMP + 516 CMP + 469 GMP + 904 UMP + 2912 H; k_dcy_TU_184*TU_184; RNA_decay_TU_184 is "RNA decay (MG_277)";
  RNA_decay_TU_185: TU_185 + 2162 H2O -> 647 AMP + 336 CMP + 344 GMP + 836 UMP + 2162 H; k_dcy_TU_185*TU_185; RNA_decay_TU_185 is "RNA decay (MG_278)";
  RNA_decay_TU_186: TU_186 + 3177 H2O -> 1021 AMP + 558 CMP + 486 GMP + 1113 UMP + 3177 H; k_dcy_TU_186*TU_186; RNA_decay_TU_186 is "RNA decay (MG_279 - MG_281)";
  RNA_decay_MG499: MG499 + 73 H2O -> 22 AMP + 17 CMP + 18 GMP + 17 UMP + 73 H; k_dcy_MG499*MG499; RNA_decay_MG499 is "RNA decay (MG499)";
  RNA_decay_MG500: MG500 + 85 H2O -> 18 AMP + 28 CMP + 21 GMP + 19 UMP + 85 H; k_dcy_MG500*MG500; RNA_decay_MG500 is "RNA decay (MG500)";
  RNA_decay_MG501: MG501 + 74 H2O -> 19 AMP + 20 CMP + 19 GMP + 17 UMP + 74 H; k_dcy_MG501*MG501; RNA_decay_MG501 is "RNA decay (MG501)";
  RNA_decay_MG502: MG502 + 74 H2O -> 18 AMP + 18 CMP + 20 GMP + 19 UMP + 74 H; k_dcy_MG502*MG502; RNA_decay_MG502 is "RNA decay (MG502)";
  RNA_decay_MG503: MG503 + 86 H2O -> 23 AMP + 22 CMP + 22 GMP + 20 UMP + 86 H; k_dcy_MG503*MG503; RNA_decay_MG503 is "RNA decay (MG503)";
  RNA_decay_TU_190: TU_190 + 485 H2O -> 124 AMP + 94 CMP + 82 GMP + 186 UMP + 485 H; k_dcy_TU_190*TU_190; RNA_decay_TU_190 is "RNA decay (MG_282)";
  RNA_decay_TU_191: TU_191 + 1451 H2O -> 458 AMP + 232 CMP + 230 GMP + 532 UMP + 1451 H; k_dcy_TU_191*TU_191; RNA_decay_TU_191 is "RNA decay (MG_283)";
  RNA_decay_TU_192: TU_192 + 1997 H2O -> 610 AMP + 325 CMP + 281 GMP + 782 UMP + 1997 H; k_dcy_TU_192*TU_192; RNA_decay_TU_192 is "RNA decay (MG_284 - MG_286)";
  RNA_decay_TU_193: TU_193 + 254 H2O -> 85 AMP + 42 CMP + 25 GMP + 103 UMP + 254 H; k_dcy_TU_193*TU_193; RNA_decay_TU_193 is "RNA decay (MG_287)";
  RNA_decay_MG504: MG504 + 74 H2O -> 21 AMP + 20 CMP + 15 GMP + 19 UMP + 74 H; k_dcy_MG504*MG504; RNA_decay_MG504 is "RNA decay (MG504)";
  RNA_decay_TU_195: TU_195 + 1244 H2O -> 378 AMP + 185 CMP + 166 GMP + 516 UMP + 1244 H; k_dcy_TU_195*TU_195; RNA_decay_TU_195 is "RNA decay (MG_288)";
  RNA_decay_TU_196: TU_196 + 3454 H2O -> 1290 AMP + 496 CMP + 429 GMP + 1240 UMP + 3454 H; k_dcy_TU_196*TU_196; RNA_decay_TU_196 is "RNA decay (MG_289 - MG_291)";
  RNA_decay_TU_197: TU_197 + 416 H2O -> 143 AMP + 60 CMP + 51 GMP + 163 UMP + 416 H; k_dcy_TU_197*TU_197; RNA_decay_TU_197 is "RNA decay (MG_505)";
  RNA_decay_TU_198: TU_198 + 4911 H2O -> 1683 AMP + 764 CMP + 666 GMP + 1799 UMP + 4911 H; k_dcy_TU_198*TU_198; RNA_decay_TU_198 is "RNA decay (MG_292 - MG_294)";
  RNA_decay_TU_199: TU_199 + 1103 H2O -> 380 AMP + 181 CMP + 130 GMP + 413 UMP + 1103 H; k_dcy_TU_199*TU_199; RNA_decay_TU_199 is "RNA decay (MG_295)";
  RNA_decay_TU_200: TU_200 + 389 H2O -> 140 AMP + 57 CMP + 53 GMP + 140 UMP + 389 H; k_dcy_TU_200*TU_200; RNA_decay_TU_200 is "RNA decay (MG_296)";
  RNA_decay_TU_201: TU_201 + 1040 H2O -> 337 AMP + 178 CMP + 140 GMP + 386 UMP + 1040 H; k_dcy_TU_201*TU_201; RNA_decay_TU_201 is "RNA decay (MG_297)";
  RNA_decay_TU_202: TU_202 + 2948 H2O -> 891 AMP + 533 CMP + 422 GMP + 1103 UMP + 2948 H; k_dcy_TU_202*TU_202; RNA_decay_TU_202 is "RNA decay (MG_298)";
  RNA_decay_TU_203: TU_203 + 962 H2O -> 321 AMP + 192 CMP + 141 GMP + 309 UMP + 962 H; k_dcy_TU_203*TU_203; RNA_decay_TU_203 is "RNA decay (MG_299)";
  RNA_decay_TU_204: TU_204 + 2250 H2O -> 708 AMP + 442 CMP + 344 GMP + 757 UMP + 2250 H; k_dcy_TU_204*TU_204; RNA_decay_TU_204 is "RNA decay (MG_300 - MG_301)";
  RNA_decay_TU_205: TU_205 + 953 H2O -> 390 AMP + 145 CMP + 120 GMP + 299 UMP + 953 H; k_dcy_TU_205*TU_205; RNA_decay_TU_205 is "RNA decay (MG_302)";
  RNA_decay_TU_206: TU_206 + 1073 H2O -> 345 AMP + 162 CMP + 151 GMP + 416 UMP + 1073 H; k_dcy_TU_206*TU_206; RNA_decay_TU_206 is "RNA decay (MG_303)";
  RNA_decay_TU_207: TU_207 + 812 H2O -> 270 AMP + 129 CMP + 125 GMP + 289 UMP + 812 H; k_dcy_TU_207*TU_207; RNA_decay_TU_207 is "RNA decay (MG_304)";
  RNA_decay_TU_208: TU_208 + 1787 H2O -> 496 AMP + 375 CMP + 285 GMP + 632 UMP + 1787 H; k_dcy_TU_208*TU_208; RNA_decay_TU_208 is "RNA decay (MG_305)";
  RNA_decay_TU_209: TU_209 + 1181 H2O -> 468 AMP + 204 CMP + 164 GMP + 346 UMP + 1181 H; k_dcy_TU_209*TU_209; RNA_decay_TU_209 is "RNA decay (MG_306)";
  RNA_decay_TU_210: TU_210 + 3533 H2O -> 1061 AMP + 530 CMP + 573 GMP + 1370 UMP + 3533 H; k_dcy_TU_210*TU_210; RNA_decay_TU_210 is "RNA decay (MG_307)";
  RNA_decay_TU_211: TU_211 + 4916 H2O -> 1561 AMP + 719 CMP + 757 GMP + 1880 UMP + 4916 H; k_dcy_TU_211*TU_211; RNA_decay_TU_211 is "RNA decay (MG_308 - MG_309)";
  RNA_decay_TU_212: TU_212 + 806 H2O -> 271 AMP + 125 CMP + 128 GMP + 283 UMP + 806 H; k_dcy_TU_212*TU_212; RNA_decay_TU_212 is "RNA decay (MG_310)";
  RNA_decay_TU_213: TU_213 + 617 H2O -> 186 AMP + 105 CMP + 99 GMP + 228 UMP + 617 H; k_dcy_TU_213*TU_213; RNA_decay_TU_213 is "RNA decay (MG_311)";
  RNA_decay_TU_214: TU_214 + 3419 H2O -> 1007 AMP + 525 CMP + 579 GMP + 1309 UMP + 3419 H; k_dcy_TU_214*TU_214; RNA_decay_TU_214 is "RNA decay (MG_312)";
  RNA_decay_TU_215: TU_215 + 3156 H2O -> 1162 AMP + 492 CMP + 449 GMP + 1054 UMP + 3156 H; k_dcy_TU_215*TU_215; RNA_decay_TU_215 is "RNA decay (MG_313 - MG_315)";
  RNA_decay_TU_216: TU_216 + 1109 H2O -> 476 AMP + 150 CMP + 155 GMP + 329 UMP + 1109 H; k_dcy_TU_216*TU_216; RNA_decay_TU_216 is "RNA decay (MG_316)";
  RNA_decay_TU_217: TU_217 + 2656 H2O -> 724 AMP + 378 CMP + 571 GMP + 984 UMP + 2656 H; k_dcy_TU_217*TU_217; RNA_decay_TU_217 is "RNA decay (MG_317 - MG_318)";
  RNA_decay_TU_218: TU_218 + 536 H2O -> 188 AMP + 93 CMP + 84 GMP + 172 UMP + 536 H; k_dcy_TU_218*TU_218; RNA_decay_TU_218 is "RNA decay (MG_319)";
  RNA_decay_TU_219: TU_219 + 860 H2O -> 329 AMP + 150 CMP + 127 GMP + 255 UMP + 860 H; k_dcy_TU_219*TU_219; RNA_decay_TU_219 is "RNA decay (MG_320)";
  RNA_decay_MG506: MG506 + 90 H2O -> 20 AMP + 27 CMP + 19 GMP + 25 UMP + 90 H; k_dcy_MG506*MG506; RNA_decay_MG506 is "RNA decay (MG506)";
  RNA_decay_MG507: MG507 + 88 H2O -> 19 AMP + 26 CMP + 23 GMP + 21 UMP + 88 H; k_dcy_MG507*MG507; RNA_decay_MG507 is "RNA decay (MG507)";
  RNA_decay_TU_222: TU_222 + 2804 H2O -> 847 AMP + 499 CMP + 495 GMP + 964 UMP + 2804 H; k_dcy_TU_222*TU_222; RNA_decay_TU_222 is "RNA decay (MG_321)";
  RNA_decay_MG508: MG508 + 84 H2O -> 21 AMP + 27 CMP + 19 GMP + 18 UMP + 84 H; k_dcy_MG508*MG508; RNA_decay_MG508 is "RNA decay (MG508)";
  RNA_decay_MG509: MG509 + 75 H2O -> 22 AMP + 18 CMP + 18 GMP + 18 UMP + 75 H; k_dcy_MG509*MG509; RNA_decay_MG509 is "RNA decay (MG509)";
  RNA_decay_MG510: MG510 + 75 H2O -> 21 AMP + 18 CMP + 16 GMP + 21 UMP + 75 H; k_dcy_MG510*MG510; RNA_decay_MG510 is "RNA decay (MG510)";
  RNA_decay_MG511: MG511 + 75 H2O -> 17 AMP + 21 CMP + 20 GMP + 18 UMP + 75 H; k_dcy_MG511*MG511; RNA_decay_MG511 is "RNA decay (MG511)";
  RNA_decay_MG512: MG512 + 74 H2O -> 17 AMP + 19 CMP + 19 GMP + 20 UMP + 74 H; k_dcy_MG512*MG512; RNA_decay_MG512 is "RNA decay (MG512)";
  RNA_decay_MG513: MG513 + 76 H2O -> 17 AMP + 20 CMP + 23 GMP + 17 UMP + 76 H; k_dcy_MG513*MG513; RNA_decay_MG513 is "RNA decay (MG513)";
  RNA_decay_MG514: MG514 + 74 H2O -> 16 AMP + 23 CMP + 22 GMP + 14 UMP + 74 H; k_dcy_MG514*MG514; RNA_decay_MG514 is "RNA decay (MG514)";
  RNA_decay_TU_224: TU_224 + 1676 H2O -> 618 AMP + 303 CMP + 251 GMP + 505 UMP + 1676 H; k_dcy_TU_224*TU_224; RNA_decay_TU_224 is "RNA decay (MG_322)";
  RNA_decay_TU_225: TU_225 + 683 H2O -> 208 AMP + 125 CMP + 101 GMP + 250 UMP + 683 H; k_dcy_TU_225*TU_225; RNA_decay_TU_225 is "RNA decay (MG_323)";
  RNA_decay_MG_0003: MG_0003 + 377 H2O -> 106 AMP + 82 CMP + 53 GMP + 137 UMP + 377 H; k_dcy_MG_0003*MG_0003; RNA_decay_MG_0003 is "RNA decay (Rnase P RNA, MCS5, M1 RNA)";
  RNA_decay_MG_0004: MG_0004 + 387 H2O -> 124 AMP + 65 CMP + 79 GMP + 120 UMP + 387 H; k_dcy_MG_0004*MG_0004; RNA_decay_MG_0004 is "RNA decay (transfer-messenger RNA, tmRNA, MCS6, 10Sa RNA)";
  RNA_decay_TU_228: TU_228 + 1979 H2O -> 699 AMP + 343 CMP + 278 GMP + 660 UMP + 1979 H; k_dcy_TU_228*TU_228; RNA_decay_TU_228 is "RNA decay (MG_324, MG_325, MG_515)";
  RNA_decay_TU_229: TU_229 + 887 H2O -> 304 AMP + 154 CMP + 116 GMP + 314 UMP + 887 H; k_dcy_TU_229*TU_229; RNA_decay_TU_229 is "RNA decay (MG_326)";
  RNA_decay_TU_230: TU_230 + 806 H2O -> 277 AMP + 127 CMP + 114 GMP + 289 UMP + 806 H; k_dcy_TU_230*TU_230; RNA_decay_TU_230 is "RNA decay (MG_327)";
  RNA_decay_TU_231: TU_231 + 2270 H2O -> 620 AMP + 362 CMP + 302 GMP + 987 UMP + 2270 H; k_dcy_TU_231*TU_231; RNA_decay_TU_231 is "RNA decay (MG_328)";
  RNA_decay_TU_232: TU_232 + 1346 H2O -> 429 AMP + 222 CMP + 207 GMP + 489 UMP + 1346 H; k_dcy_TU_232*TU_232; RNA_decay_TU_232 is "RNA decay (MG_329)";
  RNA_decay_TU_233: TU_233 + 2607 H2O -> 862 AMP + 420 CMP + 340 GMP + 986 UMP + 2607 H; k_dcy_TU_233*TU_233; RNA_decay_TU_233 is "RNA decay (MG_330 - MG_333)";
  RNA_decay_TU_234: TU_234 + 2513 H2O -> 835 AMP + 362 CMP + 358 GMP + 959 UMP + 2513 H; k_dcy_TU_234*TU_234; RNA_decay_TU_234 is "RNA decay (MG_334)";
  RNA_decay_TU_235: TU_235 + 575 H2O -> 206 AMP + 95 CMP + 62 GMP + 213 UMP + 575 H; k_dcy_TU_235*TU_235; RNA_decay_TU_235 is "RNA decay (MG_335)";
  RNA_decay_TU_236: TU_236 + 221 H2O -> 68 AMP + 36 CMP + 34 GMP + 84 UMP + 221 H; k_dcy_TU_236*TU_236; RNA_decay_TU_236 is "RNA decay (MG_516)";
  RNA_decay_TU_237: TU_237 + 1025 H2O -> 381 AMP + 141 CMP + 116 GMP + 388 UMP + 1025 H; k_dcy_TU_237*TU_237; RNA_decay_TU_237 is "RNA decay (MG_517)";
  RNA_decay_TU_238: TU_238 + 1226 H2O -> 415 AMP + 154 CMP + 176 GMP + 482 UMP + 1226 H; k_dcy_TU_238*TU_238; RNA_decay_TU_238 is "RNA decay (MG_336)";
  RNA_decay_TU_239: TU_239 + 416 H2O -> 139 AMP + 56 CMP + 41 GMP + 181 UMP + 416 H; k_dcy_TU_239*TU_239; RNA_decay_TU_239 is "RNA decay (MG_337)";
  RNA_decay_TU_240: TU_240 + 3812 H2O -> 1223 AMP + 563 CMP + 558 GMP + 1469 UMP + 3812 H; k_dcy_TU_240*TU_240; RNA_decay_TU_240 is "RNA decay (MG_338)";
  RNA_decay_TU_241: TU_241 + 953 H2O -> 303 AMP + 173 CMP + 123 GMP + 355 UMP + 953 H; k_dcy_TU_241*TU_241; RNA_decay_TU_241 is "RNA decay (MG_339)";
  RNA_decay_TU_242: TU_242 + 8060 H2O -> 2479 AMP + 1546 CMP + 1242 GMP + 2794 UMP + 8060 H; k_dcy_TU_242*TU_242; RNA_decay_TU_242 is "RNA decay (MG_340 - MG_341)";
  RNA_decay_TU_243: TU_243 + 506 H2O -> 178 AMP + 83 CMP + 68 GMP + 178 UMP + 506 H; k_dcy_TU_243*TU_243; RNA_decay_TU_243 is "RNA decay (MG_342)";
  RNA_decay_TU_244: TU_244 + 1040 H2O -> 373 AMP + 133 CMP + 127 GMP + 408 UMP + 1040 H; k_dcy_TU_244*TU_244; RNA_decay_TU_244 is "RNA decay (MG_343)";
  RNA_decay_TU_245: TU_245 + 821 H2O -> 282 AMP + 117 CMP + 111 GMP + 312 UMP + 821 H; k_dcy_TU_245*TU_245; RNA_decay_TU_245 is "RNA decay (MG_344)";
  RNA_decay_TU_246: TU_246 + 2687 H2O -> 907 AMP + 383 CMP + 348 GMP + 1050 UMP + 2687 H; k_dcy_TU_246*TU_246; RNA_decay_TU_246 is "RNA decay (MG_345)";
  RNA_decay_TU_247: TU_247 + 1123 H2O -> 381 AMP + 153 CMP + 149 GMP + 441 UMP + 1123 H; k_dcy_TU_247*TU_247; RNA_decay_TU_247 is "RNA decay (MG_346 - MG_347)";
  RNA_decay_MG518: MG518 + 75 H2O -> 20 AMP + 22 CMP + 19 GMP + 15 UMP + 75 H; k_dcy_MG518*MG518; RNA_decay_MG518 is "RNA decay (MG518)";
  RNA_decay_TU_249: TU_249 + 968 H2O -> 302 AMP + 184 CMP + 157 GMP + 326 UMP + 968 H; k_dcy_TU_249*TU_249; RNA_decay_TU_249 is "RNA decay (MG_348)";
  RNA_decay_MG519: MG519 + 87 H2O -> 22 AMP + 29 CMP + 18 GMP + 19 UMP + 87 H; k_dcy_MG519*MG519; RNA_decay_MG519 is "RNA decay (MG519)";
  RNA_decay_TU_251: TU_251 + 2149 H2O -> 710 AMP + 314 CMP + 268 GMP + 858 UMP + 2149 H; k_dcy_TU_251*TU_251; RNA_decay_TU_251 is "RNA decay (MG_349 - MG_350)";
  RNA_decay_MG520: MG520 + 81 H2O -> 15 AMP + 24 CMP + 21 GMP + 22 UMP + 81 H; k_dcy_MG520*MG520; RNA_decay_MG520 is "RNA decay (MG520)";
  RNA_decay_TU_253: TU_253 + 674 H2O -> 300 AMP + 94 CMP + 92 GMP + 189 UMP + 674 H; k_dcy_TU_253*TU_253; RNA_decay_TU_253 is "RNA decay (MG_521)";
  RNA_decay_TU_254: TU_254 + 554 H2O -> 182 AMP + 92 CMP + 65 GMP + 216 UMP + 554 H; k_dcy_TU_254*TU_254; RNA_decay_TU_254 is "RNA decay (MG_351)";
  RNA_decay_TU_255: TU_255 + 500 H2O -> 154 AMP + 73 CMP + 74 GMP + 200 UMP + 500 H; k_dcy_TU_255*TU_255; RNA_decay_TU_255 is "RNA decay (MG_352)";
  RNA_decay_TU_256: TU_256 + 329 H2O -> 84 AMP + 57 CMP + 49 GMP + 140 UMP + 329 H; k_dcy_TU_256*TU_256; RNA_decay_TU_256 is "RNA decay (MG_353)";
  RNA_decay_TU_257: TU_257 + 413 H2O -> 141 AMP + 52 CMP + 59 GMP + 162 UMP + 413 H; k_dcy_TU_257*TU_257; RNA_decay_TU_257 is "RNA decay (MG_354)";
  RNA_decay_TU_258: TU_258 + 2144 H2O -> 653 AMP + 379 CMP + 288 GMP + 825 UMP + 2144 H; k_dcy_TU_258*TU_258; RNA_decay_TU_258 is "RNA decay (MG_355)";
  RNA_decay_TU_259: TU_259 + 842 H2O -> 305 AMP + 122 CMP + 109 GMP + 307 UMP + 842 H; k_dcy_TU_259*TU_259; RNA_decay_TU_259 is "RNA decay (MG_356)";
  RNA_decay_TU_260: TU_260 + 1181 H2O -> 391 AMP + 207 CMP + 142 GMP + 442 UMP + 1181 H; k_dcy_TU_260*TU_260; RNA_decay_TU_260 is "RNA decay (MG_357)";
  RNA_decay_TU_261: TU_261 + 1515 H2O -> 465 AMP + 242 CMP + 187 GMP + 622 UMP + 1515 H; k_dcy_TU_261*TU_261; RNA_decay_TU_261 is "RNA decay (MG_358 - MG_359)";
  RNA_decay_TU_262: TU_262 + 1235 H2O -> 449 AMP + 170 CMP + 144 GMP + 473 UMP + 1235 H; k_dcy_TU_262*TU_262; RNA_decay_TU_262 is "RNA decay (MG_360)";
  RNA_decay_TU_263: TU_263 + 1055 H2O -> 320 AMP + 216 CMP + 129 GMP + 391 UMP + 1055 H; k_dcy_TU_263*TU_263; RNA_decay_TU_263 is "RNA decay (MG_361 - MG_363)";
  RNA_decay_TU_264: TU_264 + 266 H2O -> 76 AMP + 33 CMP + 32 GMP + 126 UMP + 266 H; k_dcy_TU_264*TU_264; RNA_decay_TU_264 is "RNA decay (MG_522)";
  RNA_decay_TU_265: TU_265 + 674 H2O -> 174 AMP + 120 CMP + 78 GMP + 303 UMP + 674 H; k_dcy_TU_265*TU_265; RNA_decay_TU_265 is "RNA decay (MG_364)";
  RNA_decay_TU_266: TU_266 + 935 H2O -> 312 AMP + 144 CMP + 118 GMP + 362 UMP + 935 H; k_dcy_TU_266*TU_266; RNA_decay_TU_266 is "RNA decay (MG_365)";
  RNA_decay_TU_267: TU_267 + 2003 H2O -> 711 AMP + 248 CMP + 213 GMP + 832 UMP + 2003 H; k_dcy_TU_267*TU_267; RNA_decay_TU_267 is "RNA decay (MG_366)";
  RNA_decay_TU_268: TU_268 + 3437 H2O -> 1139 AMP + 582 CMP + 436 GMP + 1281 UMP + 3437 H; k_dcy_TU_268*TU_268; RNA_decay_TU_268 is "RNA decay (MG_367 - MG_369)";
  RNA_decay_TU_269: TU_269 + 971 H2O -> 321 AMP + 127 CMP + 133 GMP + 391 UMP + 971 H; k_dcy_TU_269*TU_269; RNA_decay_TU_269 is "RNA decay (MG_370)";
  RNA_decay_TU_270: TU_270 + 974 H2O -> 324 AMP + 161 CMP + 144 GMP + 346 UMP + 974 H; k_dcy_TU_270*TU_270; RNA_decay_TU_270 is "RNA decay (MG_371)";
  RNA_decay_TU_271: TU_271 + 4501 H2O -> 1569 AMP + 704 CMP + 538 GMP + 1691 UMP + 4501 H; k_dcy_TU_271*TU_271; RNA_decay_TU_271 is "RNA decay (MG_372 - MG_375)";
  RNA_decay_TU_272: TU_272 + 314 H2O -> 98 AMP + 55 CMP + 39 GMP + 123 UMP + 314 H; k_dcy_TU_272*TU_272; RNA_decay_TU_272 is "RNA decay (MG_376)";
  RNA_decay_TU_273: TU_273 + 581 H2O -> 194 AMP + 97 CMP + 65 GMP + 226 UMP + 581 H; k_dcy_TU_273*TU_273; RNA_decay_TU_273 is "RNA decay (MG_377)";
  RNA_decay_TU_274: TU_274 + 1613 H2O -> 575 AMP + 238 CMP + 196 GMP + 605 UMP + 1613 H; k_dcy_TU_274*TU_274; RNA_decay_TU_274 is "RNA decay (MG_378)";
  RNA_decay_TU_275: TU_275 + 3058 H2O -> 983 AMP + 437 CMP + 395 GMP + 1244 UMP + 3058 H; k_dcy_TU_275*TU_275; RNA_decay_TU_275 is "RNA decay (MG_379 - MG_381)";
  RNA_decay_MG523: MG523 + 75 H2O -> 19 AMP + 22 CMP + 21 GMP + 14 UMP + 75 H; k_dcy_MG523*MG523; RNA_decay_MG523 is "RNA decay (MG523)";
  RNA_decay_TU_277: TU_277 + 641 H2O -> 192 AMP + 114 CMP + 77 GMP + 259 UMP + 641 H; k_dcy_TU_277*TU_277; RNA_decay_TU_277 is "RNA decay (MG_382)";
  RNA_decay_TU_278: TU_278 + 746 H2O -> 249 AMP + 125 CMP + 98 GMP + 275 UMP + 746 H; k_dcy_TU_278*TU_278; RNA_decay_TU_278 is "RNA decay (MG_383)";
  RNA_decay_TU_279: TU_279 + 1301 H2O -> 437 AMP + 242 CMP + 152 GMP + 471 UMP + 1301 H; k_dcy_TU_279*TU_279; RNA_decay_TU_279 is "RNA decay (MG_384)";
  RNA_decay_TU_280: TU_280 + 1330 H2O -> 507 AMP + 174 CMP + 167 GMP + 483 UMP + 1330 H; k_dcy_TU_280*TU_280; RNA_decay_TU_280 is "RNA decay (MG_385, MG_524)";
  RNA_decay_TU_281: TU_281 + 4850 H2O -> 1387 AMP + 808 CMP + 759 GMP + 1897 UMP + 4850 H; k_dcy_TU_281*TU_281; RNA_decay_TU_281 is "RNA decay (MG_386)";
  RNA_decay_TU_282: TU_282 + 1324 H2O -> 452 AMP + 189 CMP + 173 GMP + 511 UMP + 1324 H; k_dcy_TU_282*TU_282; RNA_decay_TU_282 is "RNA decay (MG_387 - MG_388)";
  RNA_decay_TU_283: TU_283 + 383 H2O -> 127 AMP + 50 CMP + 49 GMP + 158 UMP + 383 H; k_dcy_TU_283*TU_283; RNA_decay_TU_283 is "RNA decay (MG_389)";
  RNA_decay_TU_284: TU_284 + 1982 H2O -> 702 AMP + 304 CMP + 252 GMP + 725 UMP + 1982 H; k_dcy_TU_284*TU_284; RNA_decay_TU_284 is "RNA decay (MG_390)";
  RNA_decay_TU_285: TU_285 + 3336 H2O -> 997 AMP + 651 CMP + 472 GMP + 1217 UMP + 3336 H; k_dcy_TU_285*TU_285; RNA_decay_TU_285 is "RNA decay (MG_391 - MG_393)";
  RNA_decay_TU_286: TU_286 + 1220 H2O -> 413 AMP + 224 CMP + 191 GMP + 393 UMP + 1220 H; k_dcy_TU_286*TU_286; RNA_decay_TU_286 is "RNA decay (MG_394)";
  RNA_decay_TU_287: TU_287 + 1574 H2O -> 474 AMP + 241 CMP + 239 GMP + 621 UMP + 1574 H; k_dcy_TU_287*TU_287; RNA_decay_TU_287 is "RNA decay (MG_395)";
  RNA_decay_TU_288: TU_288 + 2159 H2O -> 754 AMP + 309 CMP + 277 GMP + 820 UMP + 2159 H; k_dcy_TU_288*TU_288; RNA_decay_TU_288 is "RNA decay (MG_396 - MG_397)";
  RNA_decay_TU_289: TU_289 + 401 H2O -> 127 AMP + 63 CMP + 53 GMP + 159 UMP + 401 H; k_dcy_TU_289*TU_289; RNA_decay_TU_289 is "RNA decay (MG_398)";
  RNA_decay_TU_290: TU_290 + 1430 H2O -> 460 AMP + 282 CMP + 210 GMP + 479 UMP + 1430 H; k_dcy_TU_290*TU_290; RNA_decay_TU_290 is "RNA decay (MG_399)";
  RNA_decay_TU_291: TU_291 + 2395 H2O -> 778 AMP + 418 CMP + 329 GMP + 871 UMP + 2395 H; k_dcy_TU_291*TU_291; RNA_decay_TU_291 is "RNA decay (MG_400 - MG_401)";
  RNA_decay_TU_292: TU_292 + 2341 H2O -> 845 AMP + 383 CMP + 302 GMP + 812 UMP + 2341 H; k_dcy_TU_292*TU_292; RNA_decay_TU_292 is "RNA decay (MG_402 - MG_405)";
  RNA_decay_TU_293: TU_293 + 476 H2O -> 203 AMP + 62 CMP + 61 GMP + 151 UMP + 476 H; k_dcy_TU_293*TU_293; RNA_decay_TU_293 is "RNA decay (MG_406)";
  RNA_decay_TU_294: TU_294 + 1376 H2O -> 411 AMP + 249 CMP + 200 GMP + 517 UMP + 1376 H; k_dcy_TU_294*TU_294; RNA_decay_TU_294 is "RNA decay (MG_407)";
  RNA_decay_TU_295: TU_295 + 473 H2O -> 153 AMP + 80 CMP + 52 GMP + 189 UMP + 473 H; k_dcy_TU_295*TU_295; RNA_decay_TU_295 is "RNA decay (MG_408)";
  RNA_decay_TU_296: TU_296 + 4751 H2O -> 1690 AMP + 694 CMP + 636 GMP + 1732 UMP + 4751 H; k_dcy_TU_296*TU_296; RNA_decay_TU_296 is "RNA decay (MG_409 - MG_412)";
  RNA_decay_TU_297: TU_297 + 3110 H2O -> 1043 AMP + 426 CMP + 373 GMP + 1269 UMP + 3110 H; k_dcy_TU_297*TU_297; RNA_decay_TU_297 is "RNA decay (MG_414)";
  RNA_decay_TU_298: TU_298 + 1994 H2O -> 696 AMP + 238 CMP + 214 GMP + 847 UMP + 1994 H; k_dcy_TU_298*TU_298; RNA_decay_TU_298 is "RNA decay (MG_525)";
  RNA_decay_TU_299: TU_299 + 398 H2O -> 124 AMP + 73 CMP + 56 GMP + 146 UMP + 398 H; k_dcy_TU_299*TU_299; RNA_decay_TU_299 is "RNA decay (MG_417)";
  RNA_decay_TU_300: TU_300 + 440 H2O -> 126 AMP + 81 CMP + 53 GMP + 181 UMP + 440 H; k_dcy_TU_300*TU_300; RNA_decay_TU_300 is "RNA decay (MG_418)";
  RNA_decay_TU_301: TU_301 + 8865 H2O -> 2974 AMP + 1316 CMP + 1155 GMP + 3421 UMP + 8865 H; k_dcy_TU_301*TU_301; RNA_decay_TU_301 is "RNA decay (MG_419, MG_421, MG_422, MG_423)";
  RNA_decay_TU_302: TU_302 + 260 H2O -> 70 AMP + 39 CMP + 40 GMP + 112 UMP + 260 H; k_dcy_TU_302*TU_302; RNA_decay_TU_302 is "RNA decay (MG_424)";
  RNA_decay_TU_303: TU_303 + 1349 H2O -> 401 AMP + 198 CMP + 212 GMP + 539 UMP + 1349 H; k_dcy_TU_303*TU_303; RNA_decay_TU_303 is "RNA decay (MG_425)";
  RNA_decay_TU_304: TU_304 + 194 H2O -> 51 AMP + 27 CMP + 35 GMP + 82 UMP + 194 H; k_dcy_TU_304*TU_304; RNA_decay_TU_304 is "RNA decay (MG_426)";
  RNA_decay_TU_305: TU_305 + 425 H2O -> 130 AMP + 78 CMP + 73 GMP + 145 UMP + 425 H; k_dcy_TU_305*TU_305; RNA_decay_TU_305 is "RNA decay (MG_427)";
  RNA_decay_TU_306: TU_306 + 515 H2O -> 165 AMP + 84 CMP + 59 GMP + 208 UMP + 515 H; k_dcy_TU_306*TU_306; RNA_decay_TU_306 is "RNA decay (MG_428)";
  RNA_decay_TU_307: TU_307 + 3972 H2O -> 1297 AMP + 667 CMP + 544 GMP + 1465 UMP + 3972 H; k_dcy_TU_307*TU_307; RNA_decay_TU_307 is "RNA decay (MG_429 - MG_431)";
  RNA_decay_TU_308: TU_308 + 1196 H2O -> 481 AMP + 184 CMP + 164 GMP + 368 UMP + 1196 H; k_dcy_TU_308*TU_308; RNA_decay_TU_308 is "RNA decay (MG_432)";
  RNA_decay_TU_309: TU_309 + 896 H2O -> 256 AMP + 149 CMP + 95 GMP + 397 UMP + 896 H; k_dcy_TU_309*TU_309; RNA_decay_TU_309 is "RNA decay (MG_433)";
  RNA_decay_TU_310: TU_310 + 731 H2O -> 239 AMP + 118 CMP + 104 GMP + 271 UMP + 731 H; k_dcy_TU_310*TU_310; RNA_decay_TU_310 is "RNA decay (MG_434)";
  RNA_decay_TU_311: TU_311 + 551 H2O -> 152 AMP + 82 CMP + 71 GMP + 247 UMP + 551 H; k_dcy_TU_311*TU_311; RNA_decay_TU_311 is "RNA decay (MG_435)";
  RNA_decay_TU_312: TU_312 + 1193 H2O -> 482 AMP + 197 CMP + 162 GMP + 353 UMP + 1193 H; k_dcy_TU_312*TU_312; RNA_decay_TU_312 is "RNA decay (MG_437)";
  RNA_decay_TU_313: TU_313 + 1151 H2O -> 361 AMP + 199 CMP + 151 GMP + 441 UMP + 1151 H; k_dcy_TU_313*TU_313; RNA_decay_TU_313 is "RNA decay (MG_438)";
  RNA_decay_TU_314: TU_314 + 818 H2O -> 285 AMP + 130 CMP + 107 GMP + 297 UMP + 818 H; k_dcy_TU_314*TU_314; RNA_decay_TU_314 is "RNA decay (MG_439)";
  RNA_decay_TU_315: TU_315 + 1329 H2O -> 482 AMP + 194 CMP + 158 GMP + 496 UMP + 1329 H; k_dcy_TU_315*TU_315; RNA_decay_TU_315 is "RNA decay (MG_440 - MG_441)";
  RNA_decay_TU_316: TU_316 + 1971 H2O -> 734 AMP + 293 CMP + 259 GMP + 686 UMP + 1971 H; k_dcy_TU_316*TU_316; RNA_decay_TU_316 is "RNA decay (MG_442 - MG_443)";
  RNA_decay_TU_317: TU_317 + 1325 H2O -> 407 AMP + 244 CMP + 164 GMP + 511 UMP + 1325 H; k_dcy_TU_317*TU_317; RNA_decay_TU_317 is "RNA decay (MG_444 - MG_446)";
  RNA_decay_TU_318: TU_318 + 1643 H2O -> 667 AMP + 225 CMP + 215 GMP + 537 UMP + 1643 H; k_dcy_TU_318*TU_318; RNA_decay_TU_318 is "RNA decay (MG_447)";
  RNA_decay_TU_319: TU_319 + 452 H2O -> 142 AMP + 79 CMP + 69 GMP + 163 UMP + 452 H; k_dcy_TU_319*TU_319; RNA_decay_TU_319 is "RNA decay (MG_448)";
  RNA_decay_TU_320: TU_320 + 685 H2O -> 232 AMP + 118 CMP + 77 GMP + 259 UMP + 685 H; k_dcy_TU_320*TU_320; RNA_decay_TU_320 is "RNA decay (MG_449)";
  RNA_decay_TU_321: TU_321 + 2056 H2O -> 625 AMP + 414 CMP + 321 GMP + 697 UMP + 2056 H; k_dcy_TU_321*TU_321; RNA_decay_TU_321 is "RNA decay (MG_450 - MG_451)";
  RNA_decay_TU_322: TU_322 + 1648 H2O -> 585 AMP + 251 CMP + 227 GMP + 586 UMP + 1648 H; k_dcy_TU_322*TU_322; RNA_decay_TU_322 is "RNA decay (MG_452 - MG_453)";
  RNA_decay_TU_323: TU_323 + 467 H2O -> 161 AMP + 71 CMP + 65 GMP + 171 UMP + 467 H; k_dcy_TU_323*TU_323; RNA_decay_TU_323 is "RNA decay (MG_454)";
  RNA_decay_TU_324: TU_324 + 1190 H2O -> 368 AMP + 181 CMP + 144 GMP + 498 UMP + 1190 H; k_dcy_TU_324*TU_324; RNA_decay_TU_324 is "RNA decay (MG_455)";
  RNA_decay_TU_325: TU_325 + 1004 H2O -> 349 AMP + 143 CMP + 133 GMP + 380 UMP + 1004 H; k_dcy_TU_325*TU_325; RNA_decay_TU_325 is "RNA decay (MG_456)";
  RNA_decay_TU_326: TU_326 + 2108 H2O -> 650 AMP + 416 CMP + 314 GMP + 729 UMP + 2108 H; k_dcy_TU_326*TU_326; RNA_decay_TU_326 is "RNA decay (MG_457)";
  RNA_decay_TU_327: TU_327 + 527 H2O -> 189 AMP + 88 CMP + 74 GMP + 177 UMP + 527 H; k_dcy_TU_327*TU_327; RNA_decay_TU_327 is "RNA decay (MG_458)";
  RNA_decay_TU_328: TU_328 + 509 H2O -> 161 AMP + 89 CMP + 63 GMP + 197 UMP + 509 H; k_dcy_TU_328*TU_328; RNA_decay_TU_328 is "RNA decay (MG_459)";
  RNA_decay_TU_329: TU_329 + 938 H2O -> 290 AMP + 190 CMP + 125 GMP + 334 UMP + 938 H; k_dcy_TU_329*TU_329; RNA_decay_TU_329 is "RNA decay (MG_460)";
  RNA_decay_TU_330: TU_330 + 2712 H2O -> 907 AMP + 422 CMP + 375 GMP + 1009 UMP + 2712 H; k_dcy_TU_330*TU_330; RNA_decay_TU_330 is "RNA decay (MG_461 - MG_462)";
  RNA_decay_TU_331: TU_331 + 2287 H2O -> 802 AMP + 359 CMP + 336 GMP + 791 UMP + 2287 H; k_dcy_TU_331*TU_331; RNA_decay_TU_331 is "RNA decay (MG_463 - MG_465)";
  RNA_decay_TU_332: TU_332 + 146 H2O -> 34 AMP + 31 CMP + 29 GMP + 53 UMP + 146 H; k_dcy_TU_332*TU_332; RNA_decay_TU_332 is "RNA decay (MG_466)";
  RNA_decay_TU_333: TU_333 + 6290 H2O -> 2130 AMP + 996 CMP + 947 GMP + 2218 UMP + 6290 H; k_dcy_TU_333*TU_333; RNA_decay_TU_333 is "RNA decay (MG_467 - MG_468)";
  RNA_decay_TU_334: TU_334 + 854 H2O -> 271 AMP + 136 CMP + 117 GMP + 331 UMP + 854 H; k_dcy_TU_334*TU_334; RNA_decay_TU_334 is "RNA decay (MG_526)";
  RNA_decay_TU_335: TU_335 + 2765 H2O -> 887 AMP + 405 CMP + 378 GMP + 1096 UMP + 2765 H; k_dcy_TU_335*TU_335; RNA_decay_TU_335 is "RNA decay (MG_469 - MG_470)";
  RNA_decay_MG471_aa: MG471_aa + 76 H2O -> 19 AMP + 21 CMP + 18 GMP + 18 UMP + ALA + 76 H; k_dcy_MG471_aa*MG471_aa; RNA_decay_MG471_aa is "RNA decay, aminoacylated (MG471)";
  RNA_decay_MG472_aa: MG472_aa + 77 H2O -> 20 AMP + 20 CMP + 17 GMP + 20 UMP + ILE + 77 H; k_dcy_MG472_aa*MG472_aa; RNA_decay_MG472_aa is "RNA decay, aminoacylated (MG472)";
  RNA_decay_MG475_aa: MG475_aa + 89 H2O -> 21 AMP + 27 CMP + 23 GMP + 18 UMP + SER + 89 H; k_dcy_MG475_aa*MG475_aa; RNA_decay_MG475_aa is "RNA decay, aminoacylated (MG475)";
  RNA_decay_MG479_aa: MG479_aa + 74 H2O -> 17 AMP + 20 CMP + 15 GMP + 22 UMP + THR + 74 H; k_dcy_MG479_aa*MG479_aa; RNA_decay_MG479_aa is "RNA decay, aminoacylated (MG479)";
  RNA_decay_MG483_aa: MG483_aa + 77 H2O -> 16 AMP + 19 CMP + 24 GMP + 18 UMP + CYS + 77 H; k_dcy_MG483_aa*MG483_aa; RNA_decay_MG483_aa is "RNA decay, aminoacylated (MG483)";
  RNA_decay_MG484_aa: MG484_aa + 77 H2O -> 20 AMP + 24 CMP + 17 GMP + 16 UMP + PRO + 77 H; k_dcy_MG484_aa*MG484_aa; RNA_decay_MG484_aa is "RNA decay, aminoacylated (MG484)";
  RNA_decay_MG485_aa: MG485_aa + 77 H2O -> 19 AMP + 23 CMP + 22 GMP + 13 UMP + MET + 77 H; k_dcy_MG485_aa*MG485_aa; RNA_decay_MG485_aa is "RNA decay, aminoacylated (MG485)";
  RNA_decay_MG486_aa: MG486_aa + 77 H2O -> 22 AMP + 16 CMP + 20 GMP + 19 UMP + ILE + 77 H; k_dcy_MG486_aa*MG486_aa; RNA_decay_MG486_aa is "RNA decay, aminoacylated (MG486)";
  RNA_decay_MG487_aa: MG487_aa + 92 H2O -> 19 AMP + 27 CMP + 24 GMP + 22 UMP + SER + 92 H; k_dcy_MG487_aa*MG487_aa; RNA_decay_MG487_aa is "RNA decay, aminoacylated (MG487)";
  RNA_decay_MG488_aa: MG488_aa + 77 H2O -> 16 AMP + 21 CMP + 22 GMP + 18 UMP + FMET + 77 H; k_dcy_MG488_aa*MG488_aa; RNA_decay_MG488_aa is "RNA decay, aminoacylated (MG488)";
  RNA_decay_MG489_aa: MG489_aa + 74 H2O -> 21 AMP + 23 CMP + 17 GMP + 13 UMP + ASP + 74 H; k_dcy_MG489_aa*MG489_aa; RNA_decay_MG489_aa is "RNA decay, aminoacylated (MG489)";
  RNA_decay_MG490_aa: MG490_aa + 76 H2O -> 17 AMP + 23 CMP + 20 GMP + 16 UMP + PHE + 76 H; k_dcy_MG490_aa*MG490_aa; RNA_decay_MG490_aa is "RNA decay, aminoacylated (MG490)";
  RNA_decay_MG492_aa: MG492_aa + 77 H2O -> 20 AMP + 23 CMP + 16 GMP + 18 UMP + ARG + 77 H; k_dcy_MG492_aa*MG492_aa; RNA_decay_MG492_aa is "RNA decay, aminoacylated (MG492)";
  RNA_decay_MG493_aa: MG493_aa + 74 H2O -> 21 AMP + 17 CMP + 16 GMP + 20 UMP + GLY + 74 H; k_dcy_MG493_aa*MG493_aa; RNA_decay_MG493_aa is "RNA decay, aminoacylated (MG493)";
  RNA_decay_MG495_aa: MG495_aa + 75 H2O -> 17 AMP + 17 CMP + 19 GMP + 22 UMP + ARG + 75 H; k_dcy_MG495_aa*MG495_aa; RNA_decay_MG495_aa is "RNA decay, aminoacylated (MG495)";
  RNA_decay_MG496_aa: MG496_aa + 74 H2O -> 20 AMP + 20 CMP + 19 GMP + 15 UMP + TRP + 74 H; k_dcy_MG496_aa*MG496_aa; RNA_decay_MG496_aa is "RNA decay, aminoacylated (MG496)";
  RNA_decay_MG497_aa: MG497_aa + 77 H2O -> 18 AMP + 24 CMP + 19 GMP + 16 UMP + ARG + 77 H; k_dcy_MG497_aa*MG497_aa; RNA_decay_MG497_aa is "RNA decay, aminoacylated (MG497)";
  RNA_decay_MG499_aa: MG499_aa + 74 H2O -> 22 AMP + 17 CMP + 18 GMP + 17 UMP + GLY + 74 H; k_dcy_MG499_aa*MG499_aa; RNA_decay_MG499_aa is "RNA decay, aminoacylated (MG499)";
  RNA_decay_MG500_aa: MG500_aa + 86 H2O -> 18 AMP + 28 CMP + 21 GMP + 19 UMP + LEU + 86 H; k_dcy_MG500_aa*MG500_aa; RNA_decay_MG500_aa is "RNA decay, aminoacylated (MG500)";
  RNA_decay_MG501_aa: MG501_aa + 75 H2O -> 19 AMP + 20 CMP + 19 GMP + 17 UMP + LYS + 75 H; k_dcy_MG501_aa*MG501_aa; RNA_decay_MG501_aa is "RNA decay, aminoacylated (MG501)";
  RNA_decay_MG502_aa: MG502_aa + 75 H2O -> 18 AMP + 18 CMP + 20 GMP + 19 UMP + GLN + 75 H; k_dcy_MG502_aa*MG502_aa; RNA_decay_MG502_aa is "RNA decay, aminoacylated (MG502)";
  RNA_decay_MG503_aa: MG503_aa + 87 H2O -> 23 AMP + 22 CMP + 22 GMP + 20 UMP + TYR + 87 H; k_dcy_MG503_aa*MG503_aa; RNA_decay_MG503_aa is "RNA decay, aminoacylated (MG503)";
  RNA_decay_MG504_aa: MG504_aa + 75 H2O -> 21 AMP + 20 CMP + 15 GMP + 19 UMP + TRP + 75 H; k_dcy_MG504_aa*MG504_aa; RNA_decay_MG504_aa is "RNA decay, aminoacylated (MG504)";
  RNA_decay_MG506_aa: MG506_aa + 91 H2O -> 20 AMP + 27 CMP + 19 GMP + 25 UMP + SER + 91 H; k_dcy_MG506_aa*MG506_aa; RNA_decay_MG506_aa is "RNA decay, aminoacylated (MG506)";
  RNA_decay_MG507_aa: MG507_aa + 89 H2O -> 19 AMP + 26 CMP + 23 GMP + 21 UMP + SER + 89 H; k_dcy_MG507_aa*MG507_aa; RNA_decay_MG507_aa is "RNA decay, aminoacylated (MG507)";
  RNA_decay_MG508_aa: MG508_aa + 85 H2O -> 21 AMP + 27 CMP + 19 GMP + 18 UMP + LEU + 85 H; k_dcy_MG508_aa*MG508_aa; RNA_decay_MG508_aa is "RNA decay, aminoacylated (MG508)";
  RNA_decay_MG509_aa: MG509_aa + 76 H2O -> 22 AMP + 18 CMP + 18 GMP + 18 UMP + LYS + 76 H; k_dcy_MG509_aa*MG509_aa; RNA_decay_MG509_aa is "RNA decay, aminoacylated (MG509)";
  RNA_decay_MG510_aa: MG510_aa + 76 H2O -> 21 AMP + 18 CMP + 16 GMP + 21 UMP + THR + 76 H; k_dcy_MG510_aa*MG510_aa; RNA_decay_MG510_aa is "RNA decay, aminoacylated (MG510)";
  RNA_decay_MG511_aa: MG511_aa + 76 H2O -> 17 AMP + 21 CMP + 20 GMP + 18 UMP + VAL + 76 H; k_dcy_MG511_aa*MG511_aa; RNA_decay_MG511_aa is "RNA decay, aminoacylated (MG511)";
  RNA_decay_MG512_aa: MG512_aa + 75 H2O -> 17 AMP + 19 CMP + 19 GMP + 20 UMP + THR + 75 H; k_dcy_MG512_aa*MG512_aa; RNA_decay_MG512_aa is "RNA decay, aminoacylated (MG512)";
  RNA_decay_MG513_aa: MG513_aa + 77 H2O -> 17 AMP + 20 CMP + 23 GMP + 17 UMP + GLU + 77 H; k_dcy_MG513_aa*MG513_aa; RNA_decay_MG513_aa is "RNA decay, aminoacylated (MG513)";
  RNA_decay_MG514_aa: MG514_aa + 75 H2O -> 16 AMP + 23 CMP + 22 GMP + 14 UMP + ASN + 75 H; k_dcy_MG514_aa*MG514_aa; RNA_decay_MG514_aa is "RNA decay, aminoacylated (MG514)";
  RNA_decay_MG518_aa: MG518_aa + 76 H2O -> 20 AMP + 22 CMP + 19 GMP + 15 UMP + HIS + 76 H; k_dcy_MG518_aa*MG518_aa; RNA_decay_MG518_aa is "RNA decay, aminoacylated (MG518)";
  RNA_decay_MG519_aa: MG519_aa + 88 H2O -> 22 AMP + 29 CMP + 18 GMP + 19 UMP + LEU + 88 H; k_dcy_MG519_aa*MG519_aa; RNA_decay_MG519_aa is "RNA decay, aminoacylated (MG519)";
  RNA_decay_MG520_aa: MG520_aa + 82 H2O -> 15 AMP + 24 CMP + 21 GMP + 22 UMP + LEU + 82 H; k_dcy_MG520_aa*MG520_aa; RNA_decay_MG520_aa is "RNA decay, aminoacylated (MG520)";
  RNA_decay_MG523_aa: MG523_aa + 76 H2O -> 19 AMP + 22 CMP + 21 GMP + 14 UMP + ARG + 76 H; k_dcy_MG523_aa*MG523_aa; RNA_decay_MG523_aa is "RNA decay, aminoacylated (MG523)";

  // Unit definitions:
  unit substance = item;
end
