// SBML level 3 version 1

function min2(a, b)
  1/2*(a + b - abs(a - b));
end

function min4(a, b, c, d)
  min2(min2(a, b), min2(c, d));
end

function min8(a, b, c, d, e, f, g, h)
  min2(min4(a, b, c, d), min4(e, f, g, h));
end

function min16(a, b, c, d, e, f, g, h, i, j, k, l, m, n, o, p)
  min4(min4(a, b, c, d), min4(e, f, g, h), min4(i, j, k, l), min4(m, n, o, p));
end

model main()
  // model units - substance: item, time: second, extent: item

  // Compartments:
  compartment c = 1 litre;

  // Species:
  substanceOnly species MG513__c in c = 0;
  substanceOnly species MG502_aa__c in c = 75; MG502_aa__c is "MG502-AA";
  substanceOnly species TU_024__c in c = 0; TU_024__c is "MG_041";
  substanceOnly species H2O__c in c = 309737899; H2O__c is "water";
  substanceOnly species MG492_aa__c in c = 13; MG492_aa__c is "MG492-AA";
  substanceOnly species MG499_aa__c in c = 42; MG499_aa__c is "MG499-AA";
  substanceOnly species MG523_aa__c in c = 14; MG523_aa__c is "MG523-AA";
  substanceOnly species MG_433_DIMER__c in c = 54; MG_433_DIMER__c is "translation elongation factor Ts";
  substanceOnly species MG519_aa__c in c = 26; MG519_aa__c is "MG519-AA";
  substanceOnly species MG_173_MONOMER__c in c = 39; MG_173_MONOMER__c is "translation initiation factor IF-1";
  substanceOnly species MG_435_MONOMER__c in c = 19; MG_435_MONOMER__c is "ribosome recycling factor";
  substanceOnly species MG496_aa__c in c = 9; MG496_aa__c is "MG496-AA";
  substanceOnly species MG493__c in c = 0;
  substanceOnly species MG_451_DIMER__c in c = 71; MG_451_DIMER__c is "translation elongation factor Tu";
  substanceOnly species MG475__c in c = 0;
  substanceOnly species MG_142_MONOMER__c in c = 24; MG_142_MONOMER__c is "translation initiation factor IF-2";
  substanceOnly species TU_322__c in c = 2; TU_322__c is "MG_452 - MG_453";
  substanceOnly species MG504__c in c = 0;
  substanceOnly species MG471_aa__c in c = 72; MG471_aa__c is "MG471-AA";
  substanceOnly species MG523__c in c = 0;
  substanceOnly species MG479_aa__c in c = 25; MG479_aa__c is "MG479-AA";
  substanceOnly species MG513_aa__c in c = 54; MG513_aa__c is "MG513-AA";
  substanceOnly species MG_196_MONOMER__c in c = 206; MG_196_MONOMER__c is "translation initiation factor IF-3";
  substanceOnly species MG518_aa__c in c = 19; MG518_aa__c is "MG518-AA";
  substanceOnly species MG520__c in c = 0;
  substanceOnly species TU_069__c in c = 0; TU_069__c is "MG_111 - MG_112";
  substanceOnly species MG485__c in c = 0;
  substanceOnly species MG488__c in c = 0;
  substanceOnly species MG483_aa__c in c = 10; MG483_aa__c is "MG483-AA";
  substanceOnly species MG519__c in c = 0;
  substanceOnly species PI__c in c = 7246; PI__c is "phosphate";
  substanceOnly species MG486_aa__c in c = 46; MG486_aa__c is "MG486-AA";
  substanceOnly species MG500_aa__c in c = 60; MG500_aa__c is "MG500-AA";
  substanceOnly species MG_089_DIMER__c in c = 65; MG_089_DIMER__c is "translation elongation factor G";
  substanceOnly species MG484__c in c = 0;
  substanceOnly species MG486__c in c = 0;
  substanceOnly species MG504_aa__c in c = 10; MG504_aa__c is "MG504-AA";
  substanceOnly species MG499__c in c = 0;
  substanceOnly species MG507__c in c = 0;
  substanceOnly species MG509_aa__c in c = 56; MG509_aa__c is "MG509-AA";
  substanceOnly species MG472_aa__c in c = 72; MG472_aa__c is "MG472-AA";
  substanceOnly species MG497_aa__c in c = 9; MG497_aa__c is "MG497-AA";
  substanceOnly species MG506__c in c = 0;
  substanceOnly species MG495_aa__c in c = 8; MG495_aa__c is "MG495-AA";
  substanceOnly species TU_036__c in c = 0; TU_036__c is "MG_061";
  substanceOnly species MG500__c in c = 0;
  substanceOnly species MG490__c in c = 0;
  substanceOnly species MG501__c in c = 0;
  substanceOnly species MG489_aa__c in c = 84; MG489_aa__c is "MG489-AA";
  substanceOnly species MG503__c in c = 0;
  substanceOnly species GTP__c in c = 36234;
  substanceOnly species TU_307__c in c = 0; TU_307__c is "MG_429 - MG_431";
  substanceOnly species TU_030__c in c = 0; TU_030__c is "MG_052 - MG_053";
  substanceOnly species MG506_aa__c in c = 16; MG506_aa__c is "MG506-AA";
  substanceOnly species MG508_aa__c in c = 61; MG508_aa__c is "MG508-AA";
  substanceOnly species MG487__c in c = 0;
  substanceOnly species MG488_aa__c in c = 11; MG488_aa__c is "MG488-AA";
  substanceOnly species MG520_aa__c in c = 33; MG520_aa__c is "MG520-AA";
  substanceOnly species MG493_aa__c in c = 51; MG493_aa__c is "MG493-AA";
  substanceOnly species MG_111_MONOMER__c in c = 0; MG_111_MONOMER__c is "glucose-6-phosphate isomerase";
  substanceOnly species MG508__c in c = 0;
  substanceOnly species MG_453_MONOMER__c in c = 1; MG_453_MONOMER__c is "UTP-glucose-1-phosphate uridylyltransferase";
  substanceOnly species MG507_aa__c in c = 23; MG507_aa__c is "MG507-AA";
  substanceOnly species MG_041_MONOMER__c in c = 51; MG_041_MONOMER__c is "PTS system, HPr";
  substanceOnly species MG479__c in c = 0;
  substanceOnly species MG514_aa__c in c = 56; MG514_aa__c is "MG514-AA";
  substanceOnly species MG510__c in c = 0;
  substanceOnly species MG_053_MONOMER__c in c = 0; MG_053_MONOMER__c is "phosphoglucomutase/phosphomannomutase, putative";
  substanceOnly species MG_258_MONOMER__c in c = 198; MG_258_MONOMER__c is "peptide chain release factor 1";
  substanceOnly species MG518__c in c = 0;
  substanceOnly species MG487_aa__c in c = 20; MG487_aa__c is "MG487-AA";
  substanceOnly species GDP__c in c = 3623;
  substanceOnly species MG471__c in c = 0;
  substanceOnly species MG503_aa__c in c = 46; MG503_aa__c is "MG503-AA";
  substanceOnly species MG501_aa__c in c = 36; MG501_aa__c is "MG501-AA";
  substanceOnly species MG_069_MONOMER__c in c = 31; MG_069_MONOMER__c is "PTS system, glucose-specific IIABC component";
  substanceOnly species MG484_aa__c in c = 61; MG484_aa__c is "MG484-AA";
  substanceOnly species MG511__c in c = 0;
  substanceOnly species MG483__c in c = 0;
  substanceOnly species RIBOSOME_70S__c in c = 0; RIBOSOME_70S__c is "70S ribosome";
  substanceOnly species MG514__c in c = 0;
  substanceOnly species MG492__c in c = 0;
  substanceOnly species MG496__c in c = 0;
  substanceOnly species MG512__c in c = 0;
  substanceOnly species MG_026_MONOMER__c in c = 118; MG_026_MONOMER__c is "translation elongation factor P";
  substanceOnly species MG490_aa__c in c = 55; MG490_aa__c is "MG490-AA";
  substanceOnly species TU_043__c in c = 0; TU_043__c is "MG_069";
  substanceOnly species MG511_aa__c in c = 55; MG511_aa__c is "MG511-AA";
  substanceOnly species MG_061_MONOMER__c in c = 22; MG_061_MONOMER__c is "Mycoplasma MFS transporter";
  substanceOnly species MG489__c in c = 0;
  substanceOnly species MG_429_MONOMER__c in c = 0; MG_429_MONOMER__c is "PTS system, E1";
  substanceOnly species MG497__c in c = 0;
  substanceOnly species MG509__c in c = 0;
  substanceOnly species MG512_aa__c in c = 62; MG512_aa__c is "MG512-AA";
  substanceOnly species MG495__c in c = 0;
  substanceOnly species MG510_aa__c in c = 50; MG510_aa__c is "MG510-AA";
  substanceOnly species MG502__c in c = 0;
  substanceOnly species MG475_aa__c in c = 14; MG475_aa__c is "MG475-AA";
  substanceOnly species MG472__c in c = 0;
  substanceOnly species MG485_aa__c in c = 14; MG485_aa__c is "MG485-AA";
  substanceOnly species H__c in c = 13042; H__c is "hydrogen ion";

  // Reactions:
  Translation_MG_453_MONOMER: 23 MG471_aa__c + 20 MG472_aa__c + 6 MG475_aa__c + 8 MG479_aa__c + 4 MG483_aa__c + 12 MG484_aa__c + 2 MG485_aa__c + 3 MG486_aa__c + MG487_aa__c + MG488_aa__c + 17 MG489_aa__c + 14 MG490_aa__c + 13 MG493_aa__c + 2 MG495_aa__c + MG497_aa__c + 5 MG499_aa__c + 17 MG500_aa__c + 29 MG501_aa__c + 10 MG502_aa__c + 9 MG503_aa__c + 3 MG506_aa__c + 3 MG508_aa__c + 4 MG509_aa__c + 5 MG510_aa__c + 22 MG511_aa__c + 20 MG513_aa__c + 16 MG514_aa__c + 4 MG518_aa__c + 5 MG519_aa__c + 9 MG520_aa__c + 4 MG523_aa__c + 587 GTP__c + 586 H2O__c => MG_453_MONOMER__c + 23 MG471__c + 20 MG472__c + 6 MG475__c + 8 MG479__c + 4 MG483__c + 12 MG484__c + 2 MG485__c + 3 MG486__c + MG487__c + MG488__c + 17 MG489__c + 14 MG490__c + 13 MG493__c + 2 MG495__c + MG497__c + 5 MG499__c + 17 MG500__c + 29 MG501__c + 10 MG502__c + 9 MG503__c + 3 MG506__c + 3 MG508__c + 4 MG509__c + 5 MG510__c + 22 MG511__c + 20 MG513__c + 16 MG514__c + 4 MG518__c + 5 MG519__c + 9 MG520__c + 4 MG523__c + 587 GDP__c + 587 PI__c + 295 H__c; Translation_MG_453_MONOMER_kcat*min2(min2(min2(min8(TU_322__c, MG_173_MONOMER__c, MG_142_MONOMER__c, MG_196_MONOMER__c, MG_089_DIMER__c, MG_026_MONOMER__c, MG_451_DIMER__c, MG_433_DIMER__c), MG_258_MONOMER__c), MG_435_MONOMER__c), RIBOSOME_70S__c)*min2(min2(min4(min4(min8(min16(MG471_aa__c, MG472_aa__c, MG475_aa__c, MG479_aa__c, MG483_aa__c, MG484_aa__c, MG485_aa__c, MG486_aa__c, MG487_aa__c, MG488_aa__c, MG489_aa__c, MG490_aa__c, MG493_aa__c, MG495_aa__c, MG497_aa__c, MG499_aa__c), MG500_aa__c, MG501_aa__c, MG502_aa__c, MG503_aa__c, MG506_aa__c, MG508_aa__c, MG509_aa__c), MG510_aa__c, MG511_aa__c, MG513_aa__c), MG514_aa__c, MG518_aa__c, MG519_aa__c), MG520_aa__c), MG523_aa__c)*GTP__c^Translation_MG_453_MONOMER_m/((1 + min2(min2(min4(min4(min8(min16(MG471_aa__c, MG472_aa__c, MG475_aa__c, MG479_aa__c, MG483_aa__c, MG484_aa__c, MG485_aa__c, MG486_aa__c, MG487_aa__c, MG488_aa__c, MG489_aa__c, MG490_aa__c, MG493_aa__c, MG495_aa__c, MG497_aa__c, MG499_aa__c), MG500_aa__c, MG501_aa__c, MG502_aa__c, MG503_aa__c, MG506_aa__c, MG508_aa__c, MG509_aa__c), MG510_aa__c, MG511_aa__c, MG513_aa__c), MG514_aa__c, MG518_aa__c, MG519_aa__c), MG520_aa__c), MG523_aa__c)/Translation_MG_453_MONOMER_k_1)*(1 + GTP__c^Translation_MG_453_MONOMER_m/Translation_MG_453_MONOMER_k_2)); Translation_MG_453_MONOMER is "Translation (UTP-glucose-1-phosphate uridylyltransferase)";  // modifiers: TU_322__c, MG_173_MONOMER__c, MG_142_MONOMER__c, MG_196_MONOMER__c, MG_089_DIMER__c, MG_026_MONOMER__c, MG_451_DIMER__c, MG_433_DIMER__c, MG_258_MONOMER__c, MG_435_MONOMER__c, RIBOSOME_70S__c
    Translation_MG_453_MONOMER_kcat = 3.1e-5; Translation_MG_453_MONOMER_m = 1; Translation_MG_453_MONOMER_k_1 = 1; Translation_MG_453_MONOMER_k_2 = 1;
  Translation_MG_069_MONOMER: 78 MG471_aa__c + 70 MG472_aa__c + 27 MG475_aa__c + 47 MG479_aa__c + 2 MG483_aa__c + 44 MG484_aa__c + 16 MG485_aa__c + 6 MG486_aa__c + 14 MG487_aa__c + MG488_aa__c + 34 MG489_aa__c + 59 MG490_aa__c + 9 MG492_aa__c + 51 MG493_aa__c + 2 MG495_aa__c + 3 MG496_aa__c + 2 MG497_aa__c + 37 MG499_aa__c + 48 MG500_aa__c + 46 MG501_aa__c + 29 MG502_aa__c + 25 MG503_aa__c + 12 MG504_aa__c + 17 MG506_aa__c + 7 MG508_aa__c + 14 MG509_aa__c + 16 MG510_aa__c + 65 MG511_aa__c + MG512_aa__c + 28 MG513_aa__c + 45 MG514_aa__c + 8 MG518_aa__c + 19 MG519_aa__c + 15 MG520_aa__c + 11 MG523_aa__c + 1819 GTP__c + 1818 H2O__c => MG_069_MONOMER__c + 78 MG471__c + 70 MG472__c + 27 MG475__c + 47 MG479__c + 2 MG483__c + 44 MG484__c + 16 MG485__c + 6 MG486__c + 14 MG487__c + MG488__c + 34 MG489__c + 59 MG490__c + 9 MG492__c + 51 MG493__c + 2 MG495__c + 3 MG496__c + 2 MG497__c + 37 MG499__c + 48 MG500__c + 46 MG501__c + 29 MG502__c + 25 MG503__c + 12 MG504__c + 17 MG506__c + 7 MG508__c + 14 MG509__c + 16 MG510__c + 65 MG511__c + MG512__c + 28 MG513__c + 45 MG514__c + 8 MG518__c + 19 MG519__c + 15 MG520__c + 11 MG523__c + 1819 GDP__c + 1819 PI__c + 911 H__c; Translation_MG_069_MONOMER_kcat*min2(min2(min2(min8(TU_043__c, MG_173_MONOMER__c, MG_142_MONOMER__c, MG_196_MONOMER__c, MG_089_DIMER__c, MG_026_MONOMER__c, MG_451_DIMER__c, MG_433_DIMER__c), MG_258_MONOMER__c), MG_435_MONOMER__c), RIBOSOME_70S__c)*min2(min2(min2(min2(min16(min16(MG471_aa__c, MG472_aa__c, MG475_aa__c, MG479_aa__c, MG483_aa__c, MG484_aa__c, MG485_aa__c, MG486_aa__c, MG487_aa__c, MG488_aa__c, MG489_aa__c, MG490_aa__c, MG492_aa__c, MG493_aa__c, MG495_aa__c, MG496_aa__c), MG497_aa__c, MG499_aa__c, MG500_aa__c, MG501_aa__c, MG502_aa__c, MG503_aa__c, MG504_aa__c, MG506_aa__c, MG508_aa__c, MG509_aa__c, MG510_aa__c, MG511_aa__c, MG512_aa__c, MG513_aa__c, MG514_aa__c), MG518_aa__c), MG519_aa__c), MG520_aa__c), MG523_aa__c)*GTP__c^Translation_MG_069_MONOMER_m/((1 + min2(min2(min2(min2(min16(min16(MG471_aa__c, MG472_aa__c, MG475_aa__c, MG479_aa__c, MG483_aa__c, MG484_aa__c, MG485_aa__c, MG486_aa__c, MG487_aa__c, MG488_aa__c, MG489_aa__c, MG490_aa__c, MG492_aa__c, MG493_aa__c, MG495_aa__c, MG496_aa__c), MG497_aa__c, MG499_aa__c, MG500_aa__c, MG501_aa__c, MG502_aa__c, MG503_aa__c, MG504_aa__c, MG506_aa__c, MG508_aa__c, MG509_aa__c, MG510_aa__c, MG511_aa__c, MG512_aa__c, MG513_aa__c, MG514_aa__c), MG518_aa__c), MG519_aa__c), MG520_aa__c), MG523_aa__c)/Translation_MG_069_MONOMER_k_1)*(1 + GTP__c^Translation_MG_069_MONOMER_m/Translation_MG_069_MONOMER_k_2)); Translation_MG_069_MONOMER is "Translation (PTS system, glucose-specific IIABC component)";  // modifiers: TU_043__c, MG_173_MONOMER__c, MG_142_MONOMER__c, MG_196_MONOMER__c, MG_089_DIMER__c, MG_026_MONOMER__c, MG_451_DIMER__c, MG_433_DIMER__c, MG_258_MONOMER__c, MG_435_MONOMER__c, RIBOSOME_70S__c
    Translation_MG_069_MONOMER_kcat = 2.1e-5; Translation_MG_069_MONOMER_m = 1; Translation_MG_069_MONOMER_k_1 = 1; Translation_MG_069_MONOMER_k_2 = 1;
  Translation_MG_111_MONOMER: 20 MG471_aa__c + 28 MG472_aa__c + 9 MG475_aa__c + 15 MG479_aa__c + MG483_aa__c + 11 MG484_aa__c + 7 MG485_aa__c + 10 MG487_aa__c + MG488_aa__c + 27 MG489_aa__c + 29 MG490_aa__c + 3 MG492_aa__c + 16 MG493_aa__c + 2 MG496_aa__c + MG497_aa__c + 10 MG499_aa__c + 27 MG500_aa__c + 34 MG501_aa__c + 20 MG502_aa__c + 18 MG503_aa__c + 2 MG504_aa__c + 10 MG506_aa__c + MG507_aa__c + 9 MG508_aa__c + 11 MG509_aa__c + 8 MG510_aa__c + 28 MG511_aa__c + 17 MG513_aa__c + 20 MG514_aa__c + 16 MG518_aa__c + 11 MG519_aa__c + 5 MG520_aa__c + 6 MG523_aa__c + 869 GTP__c + 868 H2O__c => MG_111_MONOMER__c + 20 MG471__c + 28 MG472__c + 9 MG475__c + 15 MG479__c + MG483__c + 11 MG484__c + 7 MG485__c + 10 MG487__c + MG488__c + 27 MG489__c + 29 MG490__c + 3 MG492__c + 16 MG493__c + 2 MG496__c + MG497__c + 10 MG499__c + 27 MG500__c + 34 MG501__c + 20 MG502__c + 18 MG503__c + 2 MG504__c + 10 MG506__c + MG507__c + 9 MG508__c + 11 MG509__c + 8 MG510__c + 28 MG511__c + 17 MG513__c + 20 MG514__c + 16 MG518__c + 11 MG519__c + 5 MG520__c + 6 MG523__c + 869 GDP__c + 869 PI__c + 436 H__c; Translation_MG_111_MONOMER_kcat*min2(min2(min2(min8(TU_069__c, MG_173_MONOMER__c, MG_142_MONOMER__c, MG_196_MONOMER__c, MG_089_DIMER__c, MG_026_MONOMER__c, MG_451_DIMER__c, MG_433_DIMER__c), MG_258_MONOMER__c), MG_435_MONOMER__c), RIBOSOME_70S__c)*min2(min2(min16(min16(MG471_aa__c, MG472_aa__c, MG475_aa__c, MG479_aa__c, MG483_aa__c, MG484_aa__c, MG485_aa__c, MG487_aa__c, MG488_aa__c, MG489_aa__c, MG490_aa__c, MG492_aa__c, MG493_aa__c, MG496_aa__c, MG497_aa__c, MG499_aa__c), MG500_aa__c, MG501_aa__c, MG502_aa__c, MG503_aa__c, MG504_aa__c, MG506_aa__c, MG507_aa__c, MG508_aa__c, MG509_aa__c, MG510_aa__c, MG511_aa__c, MG513_aa__c, MG514_aa__c, MG518_aa__c, MG519_aa__c), MG520_aa__c), MG523_aa__c)*GTP__c^Translation_MG_111_MONOMER_m/((1 + min2(min2(min16(min16(MG471_aa__c, MG472_aa__c, MG475_aa__c, MG479_aa__c, MG483_aa__c, MG484_aa__c, MG485_aa__c, MG487_aa__c, MG488_aa__c, MG489_aa__c, MG490_aa__c, MG492_aa__c, MG493_aa__c, MG496_aa__c, MG497_aa__c, MG499_aa__c), MG500_aa__c, MG501_aa__c, MG502_aa__c, MG503_aa__c, MG504_aa__c, MG506_aa__c, MG507_aa__c, MG508_aa__c, MG509_aa__c, MG510_aa__c, MG511_aa__c, MG513_aa__c, MG514_aa__c, MG518_aa__c, MG519_aa__c), MG520_aa__c), MG523_aa__c)/Translation_MG_111_MONOMER_k_1)*(1 + GTP__c^Translation_MG_111_MONOMER_m/Translation_MG_111_MONOMER_k_2)); Translation_MG_111_MONOMER is "Translation (glucose-6-phosphate isomerase)";  // modifiers: TU_069__c, MG_173_MONOMER__c, MG_142_MONOMER__c, MG_196_MONOMER__c, MG_089_DIMER__c, MG_026_MONOMER__c, MG_451_DIMER__c, MG_433_DIMER__c, MG_258_MONOMER__c, MG_435_MONOMER__c, RIBOSOME_70S__c
    Translation_MG_111_MONOMER_kcat = 3.1e-5; Translation_MG_111_MONOMER_m = 1; Translation_MG_111_MONOMER_k_1 = 1; Translation_MG_111_MONOMER_k_2 = 1;
  Translation_MG_061_MONOMER: 33 MG471_aa__c + 49 MG472_aa__c + 21 MG475_aa__c + 26 MG479_aa__c + 6 MG483_aa__c + 19 MG484_aa__c + 11 MG485_aa__c + 12 MG486_aa__c + 15 MG487_aa__c + MG488_aa__c + 13 MG489_aa__c + 40 MG490_aa__c + 2 MG492_aa__c + 29 MG493_aa__c + MG495_aa__c + 9 MG496_aa__c + MG497_aa__c + 15 MG499_aa__c + 31 MG500_aa__c + 21 MG501_aa__c + 24 MG502_aa__c + 17 MG503_aa__c + 7 MG504_aa__c + 9 MG506_aa__c + 10 MG508_aa__c + 11 MG509_aa__c + 14 MG510_aa__c + 43 MG511_aa__c + MG512_aa__c + 12 MG513_aa__c + 26 MG514_aa__c + 3 MG518_aa__c + 17 MG519_aa__c + 13 MG520_aa__c + 5 MG523_aa__c + 1137 GTP__c + 1136 H2O__c => MG_061_MONOMER__c + 33 MG471__c + 49 MG472__c + 21 MG475__c + 26 MG479__c + 6 MG483__c + 19 MG484__c + 11 MG485__c + 12 MG486__c + 15 MG487__c + MG488__c + 13 MG489__c + 40 MG490__c + 2 MG492__c + 29 MG493__c + MG495__c + 9 MG496__c + MG497__c + 15 MG499__c + 31 MG500__c + 21 MG501__c + 24 MG502__c + 17 MG503__c + 7 MG504__c + 9 MG506__c + 10 MG508__c + 11 MG509__c + 14 MG510__c + 43 MG511__c + MG512__c + 12 MG513__c + 26 MG514__c + 3 MG518__c + 17 MG519__c + 13 MG520__c + 5 MG523__c + 1137 GDP__c + 1137 PI__c + 570 H__c; Translation_MG_061_MONOMER_kcat*min2(min2(min2(min8(TU_036__c, MG_173_MONOMER__c, MG_142_MONOMER__c, MG_196_MONOMER__c, MG_089_DIMER__c, MG_026_MONOMER__c, MG_451_DIMER__c, MG_433_DIMER__c), MG_258_MONOMER__c), MG_435_MONOMER__c), RIBOSOME_70S__c)*min2(min2(min2(min2(min16(min16(MG471_aa__c, MG472_aa__c, MG475_aa__c, MG479_aa__c, MG483_aa__c, MG484_aa__c, MG485_aa__c, MG486_aa__c, MG487_aa__c, MG488_aa__c, MG489_aa__c, MG490_aa__c, MG492_aa__c, MG493_aa__c, MG495_aa__c, MG496_aa__c), MG497_aa__c, MG499_aa__c, MG500_aa__c, MG501_aa__c, MG502_aa__c, MG503_aa__c, MG504_aa__c, MG506_aa__c, MG508_aa__c, MG509_aa__c, MG510_aa__c, MG511_aa__c, MG512_aa__c, MG513_aa__c, MG514_aa__c), MG518_aa__c), MG519_aa__c), MG520_aa__c), MG523_aa__c)*GTP__c^Translation_MG_061_MONOMER_m/((1 + min2(min2(min2(min2(min16(min16(MG471_aa__c, MG472_aa__c, MG475_aa__c, MG479_aa__c, MG483_aa__c, MG484_aa__c, MG485_aa__c, MG486_aa__c, MG487_aa__c, MG488_aa__c, MG489_aa__c, MG490_aa__c, MG492_aa__c, MG493_aa__c, MG495_aa__c, MG496_aa__c), MG497_aa__c, MG499_aa__c, MG500_aa__c, MG501_aa__c, MG502_aa__c, MG503_aa__c, MG504_aa__c, MG506_aa__c, MG508_aa__c, MG509_aa__c, MG510_aa__c, MG511_aa__c, MG512_aa__c, MG513_aa__c, MG514_aa__c), MG518_aa__c), MG519_aa__c), MG520_aa__c), MG523_aa__c)/Translation_MG_061_MONOMER_k_1)*(1 + GTP__c^Translation_MG_061_MONOMER_m/Translation_MG_061_MONOMER_k_2)); Translation_MG_061_MONOMER is "Translation (Mycoplasma MFS transporter)";  // modifiers: TU_036__c, MG_173_MONOMER__c, MG_142_MONOMER__c, MG_196_MONOMER__c, MG_089_DIMER__c, MG_026_MONOMER__c, MG_451_DIMER__c, MG_433_DIMER__c, MG_258_MONOMER__c, MG_435_MONOMER__c, RIBOSOME_70S__c
    Translation_MG_061_MONOMER_kcat = 2.1e-5; Translation_MG_061_MONOMER_m = 1; Translation_MG_061_MONOMER_k_1 = 1; Translation_MG_061_MONOMER_k_2 = 1;
  Translation_MG_041_MONOMER: 12 MG471_aa__c + 11 MG472_aa__c + 3 MG475_aa__c + MG479_aa__c + MG483_aa__c + 3 MG484_aa__c + MG485_aa__c + MG487_aa__c + MG488_aa__c + 4 MG489_aa__c + 2 MG490_aa__c + MG492_aa__c + 2 MG493_aa__c + 3 MG499_aa__c + 3 MG500_aa__c + 10 MG501_aa__c + MG502_aa__c + 3 MG506_aa__c + MG508_aa__c + MG509_aa__c + 5 MG511_aa__c + 7 MG513_aa__c + 5 MG514_aa__c + 2 MG518_aa__c + 3 MG519_aa__c + MG523_aa__c + 179 GTP__c + 178 H2O__c => MG_041_MONOMER__c + 12 MG471__c + 11 MG472__c + 3 MG475__c + MG479__c + MG483__c + 3 MG484__c + MG485__c + MG487__c + MG488__c + 4 MG489__c + 2 MG490__c + MG492__c + 2 MG493__c + 3 MG499__c + 3 MG500__c + 10 MG501__c + MG502__c + 3 MG506__c + MG508__c + MG509__c + 5 MG511__c + 7 MG513__c + 5 MG514__c + 2 MG518__c + 3 MG519__c + MG523__c + 179 GDP__c + 179 PI__c + 91 H__c; Translation_MG_041_MONOMER_kcat*min2(min2(min2(min8(TU_024__c, MG_173_MONOMER__c, MG_142_MONOMER__c, MG_196_MONOMER__c, MG_089_DIMER__c, MG_026_MONOMER__c, MG_451_DIMER__c, MG_433_DIMER__c), MG_258_MONOMER__c), MG_435_MONOMER__c), RIBOSOME_70S__c)*min2(min2(min2(min8(min16(MG471_aa__c, MG472_aa__c, MG475_aa__c, MG479_aa__c, MG483_aa__c, MG484_aa__c, MG485_aa__c, MG487_aa__c, MG488_aa__c, MG489_aa__c, MG490_aa__c, MG492_aa__c, MG493_aa__c, MG499_aa__c, MG500_aa__c, MG501_aa__c), MG502_aa__c, MG506_aa__c, MG508_aa__c, MG509_aa__c, MG511_aa__c, MG513_aa__c, MG514_aa__c), MG518_aa__c), MG519_aa__c), MG523_aa__c)*GTP__c^Translation_MG_041_MONOMER_m/((1 + min2(min2(min2(min8(min16(MG471_aa__c, MG472_aa__c, MG475_aa__c, MG479_aa__c, MG483_aa__c, MG484_aa__c, MG485_aa__c, MG487_aa__c, MG488_aa__c, MG489_aa__c, MG490_aa__c, MG492_aa__c, MG493_aa__c, MG499_aa__c, MG500_aa__c, MG501_aa__c), MG502_aa__c, MG506_aa__c, MG508_aa__c, MG509_aa__c, MG511_aa__c, MG513_aa__c, MG514_aa__c), MG518_aa__c), MG519_aa__c), MG523_aa__c)/Translation_MG_041_MONOMER_k_1)*(1 + GTP__c^Translation_MG_041_MONOMER_m/Translation_MG_041_MONOMER_k_2)); Translation_MG_041_MONOMER is "Translation (PTS system, HPr)";  // modifiers: TU_024__c, MG_173_MONOMER__c, MG_142_MONOMER__c, MG_196_MONOMER__c, MG_089_DIMER__c, MG_026_MONOMER__c, MG_451_DIMER__c, MG_433_DIMER__c, MG_258_MONOMER__c, MG_435_MONOMER__c, RIBOSOME_70S__c
    Translation_MG_041_MONOMER_kcat = 3.1e-5; Translation_MG_041_MONOMER_m = 1; Translation_MG_041_MONOMER_k_1 = 1; Translation_MG_041_MONOMER_k_2 = 1;
  Translation_MG_053_MONOMER: 34 MG471_aa__c + 27 MG472_aa__c + 8 MG475_aa__c + 16 MG479_aa__c + 4 MG483_aa__c + 16 MG484_aa__c + 6 MG485_aa__c + 4 MG486_aa__c + 9 MG487_aa__c + MG488_aa__c + 24 MG489_aa__c + 37 MG490_aa__c + 5 MG492_aa__c + 25 MG493_aa__c + 5 MG496_aa__c + MG497_aa__c + 4 MG499_aa__c + 28 MG500_aa__c + 33 MG501_aa__c + 21 MG502_aa__c + 26 MG503_aa__c + 2 MG504_aa__c + 7 MG506_aa__c + 5 MG508_aa__c + 16 MG509_aa__c + 12 MG510_aa__c + 36 MG511_aa__c + 2 MG512_aa__c + 38 MG513_aa__c + 49 MG514_aa__c + 13 MG518_aa__c + 14 MG519_aa__c + 11 MG520_aa__c + 11 MG523_aa__c + 1103 GTP__c + 1102 H2O__c => MG_053_MONOMER__c + 34 MG471__c + 27 MG472__c + 8 MG475__c + 16 MG479__c + 4 MG483__c + 16 MG484__c + 6 MG485__c + 4 MG486__c + 9 MG487__c + MG488__c + 24 MG489__c + 37 MG490__c + 5 MG492__c + 25 MG493__c + 5 MG496__c + MG497__c + 4 MG499__c + 28 MG500__c + 33 MG501__c + 21 MG502__c + 26 MG503__c + 2 MG504__c + 7 MG506__c + 5 MG508__c + 16 MG509__c + 12 MG510__c + 36 MG511__c + 2 MG512__c + 38 MG513__c + 49 MG514__c + 13 MG518__c + 14 MG519__c + 11 MG520__c + 11 MG523__c + 1103 GDP__c + 1103 PI__c + 553 H__c; Translation_MG_053_MONOMER_kcat*min2(min2(min2(min8(TU_030__c, MG_173_MONOMER__c, MG_142_MONOMER__c, MG_196_MONOMER__c, MG_089_DIMER__c, MG_026_MONOMER__c, MG_451_DIMER__c, MG_433_DIMER__c), MG_258_MONOMER__c), MG_435_MONOMER__c), RIBOSOME_70S__c)*min2(min2(min2(min16(min16(MG471_aa__c, MG472_aa__c, MG475_aa__c, MG479_aa__c, MG483_aa__c, MG484_aa__c, MG485_aa__c, MG486_aa__c, MG487_aa__c, MG488_aa__c, MG489_aa__c, MG490_aa__c, MG492_aa__c, MG493_aa__c, MG496_aa__c, MG497_aa__c), MG499_aa__c, MG500_aa__c, MG501_aa__c, MG502_aa__c, MG503_aa__c, MG504_aa__c, MG506_aa__c, MG508_aa__c, MG509_aa__c, MG510_aa__c, MG511_aa__c, MG512_aa__c, MG513_aa__c, MG514_aa__c, MG518_aa__c), MG519_aa__c), MG520_aa__c), MG523_aa__c)*GTP__c^Translation_MG_053_MONOMER_m/((1 + min2(min2(min2(min16(min16(MG471_aa__c, MG472_aa__c, MG475_aa__c, MG479_aa__c, MG483_aa__c, MG484_aa__c, MG485_aa__c, MG486_aa__c, MG487_aa__c, MG488_aa__c, MG489_aa__c, MG490_aa__c, MG492_aa__c, MG493_aa__c, MG496_aa__c, MG497_aa__c), MG499_aa__c, MG500_aa__c, MG501_aa__c, MG502_aa__c, MG503_aa__c, MG504_aa__c, MG506_aa__c, MG508_aa__c, MG509_aa__c, MG510_aa__c, MG511_aa__c, MG512_aa__c, MG513_aa__c, MG514_aa__c, MG518_aa__c), MG519_aa__c), MG520_aa__c), MG523_aa__c)/Translation_MG_053_MONOMER_k_1)*(1 + GTP__c^Translation_MG_053_MONOMER_m/Translation_MG_053_MONOMER_k_2)); Translation_MG_053_MONOMER is "Translation (phosphoglucomutase/phosphomannomutase, putative)";  // modifiers: TU_030__c, MG_173_MONOMER__c, MG_142_MONOMER__c, MG_196_MONOMER__c, MG_089_DIMER__c, MG_026_MONOMER__c, MG_451_DIMER__c, MG_433_DIMER__c, MG_258_MONOMER__c, MG_435_MONOMER__c, RIBOSOME_70S__c
    Translation_MG_053_MONOMER_kcat = 3.1e-5; Translation_MG_053_MONOMER_m = 1; Translation_MG_053_MONOMER_k_1 = 1; Translation_MG_053_MONOMER_k_2 = 1;
  Translation_MG_429_MONOMER: 40 MG471_aa__c + 37 MG472_aa__c + 21 MG475_aa__c + 18 MG479_aa__c + 3 MG483_aa__c + 14 MG484_aa__c + 17 MG485_aa__c + 10 MG486_aa__c + 8 MG487_aa__c + MG488_aa__c + 34 MG489_aa__c + 28 MG490_aa__c + 6 MG492_aa__c + 20 MG493_aa__c + 3 MG495_aa__c + 12 MG499_aa__c + 39 MG500_aa__c + 48 MG501_aa__c + 30 MG502_aa__c + 16 MG503_aa__c + 3 MG504_aa__c + 4 MG506_aa__c + 6 MG508_aa__c + 10 MG509_aa__c + 14 MG510_aa__c + 38 MG511_aa__c + MG512_aa__c + 30 MG513_aa__c + 33 MG514_aa__c + 6 MG518_aa__c + 12 MG519_aa__c + 4 MG520_aa__c + 6 MG523_aa__c + 1147 GTP__c + 1146 H2O__c => MG_429_MONOMER__c + 40 MG471__c + 37 MG472__c + 21 MG475__c + 18 MG479__c + 3 MG483__c + 14 MG484__c + 17 MG485__c + 10 MG486__c + 8 MG487__c + MG488__c + 34 MG489__c + 28 MG490__c + 6 MG492__c + 20 MG493__c + 3 MG495__c + 12 MG499__c + 39 MG500__c + 48 MG501__c + 30 MG502__c + 16 MG503__c + 3 MG504__c + 4 MG506__c + 6 MG508__c + 10 MG509__c + 14 MG510__c + 38 MG511__c + MG512__c + 30 MG513__c + 33 MG514__c + 6 MG518__c + 12 MG519__c + 4 MG520__c + 6 MG523__c + 1147 GDP__c + 1147 PI__c + 575 H__c; Translation_MG_429_MONOMER_kcat*min2(min2(min2(min8(TU_307__c, MG_173_MONOMER__c, MG_142_MONOMER__c, MG_196_MONOMER__c, MG_089_DIMER__c, MG_026_MONOMER__c, MG_451_DIMER__c, MG_433_DIMER__c), MG_258_MONOMER__c), MG_435_MONOMER__c), RIBOSOME_70S__c)*min2(min2(min16(min16(MG471_aa__c, MG472_aa__c, MG475_aa__c, MG479_aa__c, MG483_aa__c, MG484_aa__c, MG485_aa__c, MG486_aa__c, MG487_aa__c, MG488_aa__c, MG489_aa__c, MG490_aa__c, MG492_aa__c, MG493_aa__c, MG495_aa__c, MG499_aa__c), MG500_aa__c, MG501_aa__c, MG502_aa__c, MG503_aa__c, MG504_aa__c, MG506_aa__c, MG508_aa__c, MG509_aa__c, MG510_aa__c, MG511_aa__c, MG512_aa__c, MG513_aa__c, MG514_aa__c, MG518_aa__c, MG519_aa__c), MG520_aa__c), MG523_aa__c)*GTP__c^Translation_MG_429_MONOMER_m/((1 + min2(min2(min16(min16(MG471_aa__c, MG472_aa__c, MG475_aa__c, MG479_aa__c, MG483_aa__c, MG484_aa__c, MG485_aa__c, MG486_aa__c, MG487_aa__c, MG488_aa__c, MG489_aa__c, MG490_aa__c, MG492_aa__c, MG493_aa__c, MG495_aa__c, MG499_aa__c), MG500_aa__c, MG501_aa__c, MG502_aa__c, MG503_aa__c, MG504_aa__c, MG506_aa__c, MG508_aa__c, MG509_aa__c, MG510_aa__c, MG511_aa__c, MG512_aa__c, MG513_aa__c, MG514_aa__c, MG518_aa__c, MG519_aa__c), MG520_aa__c), MG523_aa__c)/Translation_MG_429_MONOMER_k_1)*(1 + GTP__c^Translation_MG_429_MONOMER_m/Translation_MG_429_MONOMER_k_2)); Translation_MG_429_MONOMER is "Translation (PTS system, E1)";  // modifiers: TU_307__c, MG_173_MONOMER__c, MG_142_MONOMER__c, MG_196_MONOMER__c, MG_089_DIMER__c, MG_026_MONOMER__c, MG_451_DIMER__c, MG_433_DIMER__c, MG_258_MONOMER__c, MG_435_MONOMER__c, RIBOSOME_70S__c
    Translation_MG_429_MONOMER_kcat = 3.1e-5; Translation_MG_429_MONOMER_m = 1; Translation_MG_429_MONOMER_k_1 = 1; Translation_MG_429_MONOMER_k_2 = 1;
end
