// SBML level 2 version 1

model tRNAAminoacylation()
  // tRNAAminoacylation module

  // Compartments:
  compartment c = 1;
  compartment m = 1;
  compartment e = 1;

  // Species:
  species ADP in c = 3623/c;
  species ALA in c = 8303/c; ALA is "L-alanine";
  species AMP in c = 1449/c;
  species ARG in c = 5991/c; ARG is "L-Arginine";
  species ASN in c = 11161/c; ASN is "L-Asparagine";
  species ASP in c = 9407/c; ASP is "L-Aspartate";
  species ATP in c = 36234/c;
  species CYS in c = 2181/c; CYS is "L-Cysteine";
  species FMET in c = 0; FMET is "N-Formyl-L-methionine";
  species FTHF10 in c = 2895/c; FTHF10 is "10-formyl-tetrahydrofolate";
  species GLU in c = 9518/c; GLU is "L-Glutamate";
  species GLY in c = 7679/c; GLY is "glycine";
  species H in c = 13042/c; H is "hydrogen ion";
  species H2O in c = 309737899/c; H2O is "water";
  species HIS in c = 2933/c; HIS is "L-Histidine";
  species ILE in c = 14247/c; ILE is "L-Isoleucine";
  species LEU in c = 17971/c; LEU is "L-Leucine";
  species LYS in c = 15094/c; LYS is "L-Lysine";
  species MET in c = 2792/c; MET is "L-Methionine";
  species PHE in c = 7681/c; PHE is "L-phenylalanine";
  species PI in c = 7246/c; PI is "phosphate";
  species PPI in c = 5796/c; PPI is "diphosphate";
  species PRO in c = 4140/c; PRO is "L-Proline";
  species SER in c = 8749/c; SER is "L-Serine";
  species THF in c = 2895/c; THF is "5,6,7,8-Tetrahydrofolate";
  species THR in c = 4460/c; THR is "L-Threonine";
  species TRP in c = 1084/c; TRP is "L-tryptophan";
  species TYR in c = 5375/c; TYR is "L-tyrosine";
  species VAL in c = 9500/c; VAL is "L-Valine";
  species GLN in c = 7920/c; GLN is "L-glutamine";
  species MG471 in c = 0;
  species MG471_aa in c = 72/c; MG471_aa is "MG471-AA";
  species MG472 in c = 0;
  species MG472_aa in c = 72/c; MG472_aa is "MG472-AA";
  species MG475 in c = 0;
  species MG475_aa in c = 14/c; MG475_aa is "MG475-AA";
  species MG479 in c = 0;
  species MG479_aa in c = 25/c; MG479_aa is "MG479-AA";
  species MG483 in c = 0;
  species MG483_aa in c = 10/c; MG483_aa is "MG483-AA";
  species MG484 in c = 0;
  species MG484_aa in c = 61/c; MG484_aa is "MG484-AA";
  species MG485 in c = 0;
  species MG485_aa in c = 14/c; MG485_aa is "MG485-AA";
  species MG486 in c = 0;
  species MG486_aa in c = 46/c; MG486_aa is "MG486-AA";
  species MG487 in c = 0;
  species MG487_aa in c = 20/c; MG487_aa is "MG487-AA";
  species MG488 in c = 0;
  species MG488_aa in c = 11/c; MG488_aa is "MG488-AA";
  species MG489 in c = 0;
  species MG489_aa in c = 84/c; MG489_aa is "MG489-AA";
  species MG490 in c = 0;
  species MG490_aa in c = 55/c; MG490_aa is "MG490-AA";
  species MG492 in c = 0;
  species MG492_aa in c = 13/c; MG492_aa is "MG492-AA";
  species MG493 in c = 0;
  species MG493_aa in c = 51/c; MG493_aa is "MG493-AA";
  species MG495 in c = 0;
  species MG495_aa in c = 8/c; MG495_aa is "MG495-AA";
  species MG496 in c = 0;
  species MG496_aa in c = 9/c; MG496_aa is "MG496-AA";
  species MG497 in c = 0;
  species MG497_aa in c = 9/c; MG497_aa is "MG497-AA";
  species MG499 in c = 0;
  species MG499_aa in c = 42/c; MG499_aa is "MG499-AA";
  species MG500 in c = 0;
  species MG500_aa in c = 60/c; MG500_aa is "MG500-AA";
  species MG501 in c = 0;
  species MG501_aa in c = 36/c; MG501_aa is "MG501-AA";
  species MG502 in c = 0;
  species MG502_aa in c = 75/c; MG502_aa is "MG502-AA";
  species MG503 in c = 0;
  species MG503_aa in c = 46/c; MG503_aa is "MG503-AA";
  species MG504 in c = 0;
  species MG504_aa in c = 10/c; MG504_aa is "MG504-AA";
  species MG506 in c = 0;
  species MG506_aa in c = 16/c; MG506_aa is "MG506-AA";
  species MG507 in c = 0;
  species MG507_aa in c = 23/c; MG507_aa is "MG507-AA";
  species MG508 in c = 0;
  species MG508_aa in c = 61/c; MG508_aa is "MG508-AA";
  species MG509 in c = 0;
  species MG509_aa in c = 56/c; MG509_aa is "MG509-AA";
  species MG510 in c = 0;
  species MG510_aa in c = 50/c; MG510_aa is "MG510-AA";
  species MG511 in c = 0;
  species MG511_aa in c = 55/c; MG511_aa is "MG511-AA";
  species MG512 in c = 0;
  species MG512_aa in c = 62/c; MG512_aa is "MG512-AA";
  species MG513 in c = 0;
  species MG513_aa in c = 54/c; MG513_aa is "MG513-AA";
  species MG514 in c = 0;
  species MG514_aa in c = 56/c; MG514_aa is "MG514-AA";
  species MG518 in c = 0;
  species MG518_aa in c = 19/c; MG518_aa is "MG518-AA";
  species MG519 in c = 0;
  species MG519_aa in c = 26/c; MG519_aa is "MG519-AA";
  species MG520 in c = 0;
  species MG520_aa in c = 33/c; MG520_aa is "MG520-AA";
  species MG523 in c = 0;
  species MG523_aa in c = 14/c; MG523_aa is "MG523-AA";
  species MG_253_MONOMER in c = 16/c; MG_253_MONOMER is "cysteinyl-tRNA synthetase";
  species MG_266_MONOMER in c = 62/c; MG_266_MONOMER is "leucyl-tRNA synthetase";
  species MG_334_MONOMER in c = 34/c; MG_334_MONOMER is "valyl-tRNA synthetase";
  species MG_345_MONOMER in c = 48/c; MG_345_MONOMER is "isoleucyl-tRNA synthetase";
  species MG_365_MONOMER in c = 18/c; MG_365_MONOMER is "methionyl-tRNA formyltransferase";
  species MG_378_MONOMER in c = 33/c; MG_378_MONOMER is "arginyl-tRNA synthetase";
  species MG_462_MONOMER in c = 81/c; MG_462_MONOMER is "glutamyl-tRNA synthetase";
  species MG_005_DIMER in c = 118/c; MG_005_DIMER is "seryl-tRNA synthetase";
  species MG_021_DIMER in c = 20/c; MG_021_DIMER is "methionyl-tRNA synthetase";
  species MG_035_DIMER in c = 19/c; MG_035_DIMER is "histidyl-tRNA synthetase";
  species MG_036_DIMER in c = 21/c; MG_036_DIMER is "aspartyl-tRNA synthetase";
  species MG_098_099_100_TRIMER in c = 139/c; MG_098_099_100_TRIMER is "glutamyl-tRNA(Gln) and/or aspartyl-tRNA(Asn) amidotransferase";
  species MG_113_DIMER in c = 18/c; MG_113_DIMER is "asparaginyl-tRNA synthetase";
  species MG_126_DIMER in c = 13/c; MG_126_DIMER is "tryptophanyl-tRNA synthetase";
  species MG_136_DIMER in c = 23/c; MG_136_DIMER is "lysyl-tRNA synthetase";
  species MG_194_195_TETRAMER in c = 27/c; MG_194_195_TETRAMER is "phenylalanyl-tRNA synthetase";
  species MG_251_DIMER in c = 14/c; MG_251_DIMER is "glycyl-tRNA synthetase";
  species MG_283_DIMER in c = 14/c; MG_283_DIMER is "prolyl-tRNA synthetase";
  species MG_292_TETRAMER in c = 18/c; MG_292_TETRAMER is "alanyl-tRNA synthetase";
  species MG_375_DIMER in c = 124/c; MG_375_DIMER is "threonyl-tRNA synthetase";
  species MG_455_DIMER in c = 95/c; MG_455_DIMER is "tyrosyl-tRNA synthetase";
  species MG_188_MONOMER in m = 15/m; MG_188_MONOMER is "Oligosaccharide or polyol ABC transporter, permease protein";
  species MG_189_MONOMER in m = 17/m; MG_189_MONOMER is "Oligosaccharide or polyol ABC transporter, permease protein";
  species MG_194_MONOMER in c = 0; MG_194_MONOMER is "phenylalanyl-tRNA synthetase, alpha subunit";
  species MG_195_MONOMER in c = 8/c; MG_195_MONOMER is "phenylalanyl-tRNA synthetase, beta subunit";
  species MG_196_MONOMER in c = 206/c; MG_196_MONOMER is "translation initiation factor IF-3";
  species MG_197_MONOMER in c = 146/c; MG_197_MONOMER is "ribosomal protein L35";
  species MG_198_MONOMER in c = 142/c; MG_198_MONOMER is "ribosomal protein L20";
  species MG_201_MONOMER in c = 0; MG_201_MONOMER is "co-chaperone GrpE";
  species MG_203_MONOMER in c = 1/c; MG_203_MONOMER is "DNA topoisomerase IV, B subunit";
  species MG_204_MONOMER in c = 2/c; MG_204_MONOMER is "DNA topoisomerase IV, A subunit";
  species MG_205_MONOMER in c = 1/c; MG_205_MONOMER is "heat-inducible transcription repressor HrcA, putative";
  species MG_206_MONOMER in c = 7/c; MG_206_MONOMER is "excinuclease ABC, C subunit";
  species MG_208_MONOMER in c = 0; MG_208_MONOMER is "glycoprotease";
  species MG_481_MONOMER in c = 119/c; MG_481_MONOMER is "30S ribosomal protein S21";
  species MG_482_MONOMER in c = 0; MG_482_MONOMER is "holo-(acyl-carrier-protein) synthase";
  species MG_213_MONOMER in c = 0; MG_213_MONOMER is "segregation and condensation protein A";
  species MG_214_MONOMER in c = 4/c; MG_214_MONOMER is "segregation and condensation protein B";
  species MG_215_MONOMER in c = 2/c; MG_215_MONOMER is "6-phosphofructokinase";
  species MG_216_MONOMER in c = 2/c; MG_216_MONOMER is "pyruvate kinase";
  species MG_221_MONOMER in c = 6/c; MG_221_MONOMER is "mraZ protein";
  species MG_224_MONOMER in c = 0; MG_224_MONOMER is "cell division protein FtsZ";
  species MG_225_MONOMER in m = 1/m; MG_225_MONOMER is "amino acid-polyamine-organocation (APC) permease";
  species MG_226_MONOMER in m = 1/m; MG_226_MONOMER is "amino acid-polyamine-organocation (APC) permease";
  species MG_227_MONOMER in c = 0; MG_227_MONOMER is "thymidylate synthase";
  species MG_228_MONOMER in c = 3/c; MG_228_MONOMER is "dihydrofolate reductase";
  species MG_229_MONOMER in c = 2/c; MG_229_MONOMER is "ribonucleoside-diphosphate reductase, beta chain";
  species MG_231_MONOMER in c = 0; MG_231_MONOMER is "ribonucleoside-diphosphate reductase, alpha chain";
  species MG_232_MONOMER in c = 136/c; MG_232_MONOMER is "ribosomal protein L21";
  species MG_234_MONOMER in c = 127/c; MG_234_MONOMER is "ribosomal protein L27";
  species MG_239_MONOMER in c = 5/c; MG_239_MONOMER is "ATP-dependent protease La";
  species MG_240_MONOMER in c = 3/c; MG_240_MONOMER is "nicotinamide-nucleotide adenylyltransferase/conserved hypothetical protein";
  species MG_244_MONOMER in c = 1/c; MG_244_MONOMER is "3-5' helicase";
  species MG_249_MONOMER in c = 13/c; MG_249_MONOMER is "RNA polymerase sigma factor RpoD";
  species MG_250_MONOMER in c = 33/c; MG_250_MONOMER is "DNA primase";
  species MG_251_MONOMER in c = 1/c; MG_251_MONOMER is "glycyl-tRNA synthetase";
  species MG_252_MONOMER in c = 0; MG_252_MONOMER is "23S rRNA methyltransferase; G2251";
  species MG_257_MONOMER in c = 114/c; MG_257_MONOMER is "ribosomal protein L31";
  species MG_259_MONOMER in c = 2/c; MG_259_MONOMER is "modification methylase";
  species MG_261_MONOMER in c = 0; MG_261_MONOMER is "DNA polymerase III, alpha subunit";
  species MG_265_MONOMER in c = 1/c; MG_265_MONOMER is "sugar phosphatase";
  species MG_271_MONOMER in c = 628/c; MG_271_MONOMER is "dihydrolipoamide dehydrogenase";
  species MG_272_MONOMER in c = 91/c; MG_272_MONOMER is "dihydrolipoamide acetyltransferase";
  species MG_273_MONOMER in c = 34/c; MG_273_MONOMER is "pyruvate dehydrogenase component E1, beta subunit";
  species MG_274_MONOMER in c = 38/c; MG_274_MONOMER is "pyruvate dehydrogenase component E1, alpha subunit";
  species MG_275_MONOMER in m = 3/m; MG_275_MONOMER is "NADH oxidase";
  species MG_276_MONOMER in c = 0; MG_276_MONOMER is "adenine phosphoribosyltransferase";
  species MG_277_MONOMER in m = 43/m; MG_277_MONOMER is "Protein-export membrane protein secDF";
  species MG_278_MONOMER in c = 1/c; MG_278_MONOMER is "GTP diphosphokinase";
  species MG_283_MONOMER in c = 1/c; MG_283_MONOMER is "prolyl-tRNA synthetase";
  species MG_287_MONOMER in c = 48/c; MG_287_MONOMER is "acyl carrier protein";
  species MG_289_MONOMER in e = 38/e; MG_289_MONOMER is "phosphonate ABC transporter, substrate binding protein (P37), putative";
  species MG_290_MONOMER in c = 1/c; MG_290_MONOMER is "phosphonate ABC transporter, ATP-binding protein, putative";
  species MG_291_MONOMER in m = 25/m; MG_291_MONOMER is "phosphonate ABC transporter, permease protein (P69), putative";
  species MG_292_MONOMER in c = 2/c; MG_292_MONOMER is "alanyl-tRNA synthetase";
  species MG_293_MONOMER in c = 1/c; MG_293_MONOMER is "glycerophosphoryl diester phosphodiesterase";
  species MG_295_MONOMER in c = 39/c; MG_295_MONOMER is "tRNA U34 sulfurtransferase";
  species MG_298_MONOMER in c = 7/c; MG_298_MONOMER is "chromosome segregation protein SMC";
  species MG_299_MONOMER in c = 0; MG_299_MONOMER is "phosphate acetyltransferase";
  species MG_301_MONOMER in c = 2/c; MG_301_MONOMER is "glyceraldehyde-3-phosphate dehydrogenase, type I";
  species MG_302_MONOMER in m = 1/m; MG_302_MONOMER is "metal ion (cobalt) ABC transporter, permease protein, putative";
  species MG_303_MONOMER in c = 38/c; MG_303_MONOMER is "metal ion (cobalt) ABC transporter, ATP-binding protein, putative";
  species MG_304_MONOMER in c = 5/c; MG_304_MONOMER is "metal ion (cobalt) ABC transporter, ATP-binding protein, putative";
  species MG_311_MONOMER in c = 97/c; MG_311_MONOMER is "ribosomal protein S4";
  species MG_315_MONOMER in c = 4/c; MG_315_MONOMER is "DNA polymerase III, delta subunit, putative";
  species MG_316_MONOMER in m = 0; MG_316_MONOMER is "DNA internalization-related competence protein ComEC/Rec2";
  species MG_321_MONOMER in e = 0; MG_321_MONOMER is "oligopeptide ABC transporter, substrate binding protein";
  species MG_322_MONOMER in m = 2/m; MG_322_MONOMER is "potassium uptake protein";
  species MG_323_MONOMER in c = 0; MG_323_MONOMER is "potassium uptake protein";
  species MG_325_MONOMER in c = 132/c; MG_325_MONOMER is "ribosomal protein L33";
  species MG_333_MONOMER in c = 1/c; MG_333_MONOMER is "FMN-dependent NADH-azoreductase, putative";
  species MG_336_MONOMER in c = 0; MG_336_MONOMER is "cysteine desulfurase";
  species MG_340_MONOMER in c = 11/c; MG_340_MONOMER is "DNA-directed RNA polymerase, beta subunit";
  species MG_341_MONOMER in c = 0; MG_341_MONOMER is "DNA-directed RNA polymerase, beta subunit";
  species MG_346_MONOMER in c = 1/c; MG_346_MONOMER is "23S rRNA methyltransferase; U2552";
  species MG_347_MONOMER in c = 1/c; MG_347_MONOMER is "tRNA (guanine-N(7)-)-methyltransferase";
  species MG_349_MONOMER in c = 1/c; MG_349_MONOMER is "Replication initiation/membrane attachment protein";
  species MG_351_MONOMER in c = 4/c; MG_351_MONOMER is "inorganic pyrophosphatase";
  species MG_352_MONOMER in c = 0; MG_352_MONOMER is "Holliday junction endonuclease";
  species MG_353_MONOMER in c = 1/c; MG_353_MONOMER is "DNA-binding protein HU, putative";
  species MG_355_MONOMER in c = 2/c; MG_355_MONOMER is "ATP-dependent Clp protease, ATPase subunit";
  species MG_357_MONOMER in c = 1/c; MG_357_MONOMER is "acetate kinase";
  species MG_358_MONOMER in c = 35/c; MG_358_MONOMER is "Holliday junction DNA helicase";
  species MG_359_MONOMER in c = 4/c; MG_359_MONOMER is "Holliday junction DNA helicase RuvB";
  species MG_361_MONOMER in c = 107/c; MG_361_MONOMER is "ribosomal protein L10";
  species MG_362_MONOMER in c = 118/c; MG_362_MONOMER is "ribosomal protein L7/L12";
  species MG_363_MONOMER in c = 118/c; MG_363_MONOMER is "ribosomal protein L32";
  species MG_522_MONOMER in c = 99/c; MG_522_MONOMER is "ribosomal protein S20";
  species MG_367_MONOMER in c = 0; MG_367_MONOMER is "ribonuclease III";
  species MG_368_MONOMER in c = 1/c; MG_368_MONOMER is "fatty acid/phospholipid synthesis protein PlsX";
  species MG_369_MONOMER in c = 0; MG_369_MONOMER is "DAK2 phosphatase domain protein";
  species MG_372_MONOMER in c = 1/c; MG_372_MONOMER is "thiamine biosynthesis/tRNA modification protein ThiI";
  species MG_375_MONOMER in c = 1/c; MG_375_MONOMER is "threonyl-tRNA synthetase";
  species MG_376_MONOMER in c = 3/c;
  species MG_379_MONOMER in c = 0; MG_379_MONOMER is "tRNA uridine 5-carboxymethylaminomethyl modification enzyme GidA";
  species MG_382_MONOMER in c = 2/c; MG_382_MONOMER is "uridine kinase";
  species MG_383_MONOMER in c = 0; MG_383_MONOMER is "NH(3)-dependent NAD+ synthetase, putative";
  species MG_385_MONOMER in c = 0; MG_385_MONOMER is "glycerophosphoryl diester phosphodiesterase family protein";
  species MG_390_MONOMER in m = 1/m; MG_390_MONOMER is "toxin ABC transporter, ATP-binding/permease protein";
  species MG_391_MONOMER in c = 4/c; MG_391_MONOMER is "cytosol aminopeptidase";
  species MG_392_MONOMER in c = 3/c; MG_392_MONOMER is "chaperonin";
  species MG_393_MONOMER in c = 97/c; MG_393_MONOMER is "chaperonin, 10 kDa";
  species MG_394_MONOMER in c = 3/c; MG_394_MONOMER is "serine hydroxymethyltransferase";
  species MG_396_MONOMER in c = 0; MG_396_MONOMER is "ribose 5-phosphate isomerase B";
  species MG_398_MONOMER in c = 2/c; MG_398_MONOMER is "ATP synthase F1, epsilon subunit";
  species MG_399_MONOMER in c = 0; MG_399_MONOMER is "ATP synthase F1, beta subunit";
  species MG_400_MONOMER in c = 31/c; MG_400_MONOMER is "ATP synthase F1, gamma subunit";
  species MG_401_MONOMER in c = 16/c; MG_401_MONOMER is "ATP synthase F1, alpha subunit";
  species MG_402_MONOMER in c = 77/c; MG_402_MONOMER is "ATP synthase F1, delta subunit";
  species MG_403_MONOMER in m = 124/m; MG_403_MONOMER is "ATP synthase F0, B subunit";
  species MG_404_MONOMER in m = 26/m; MG_404_MONOMER is "ATP synthase F0, C subunit";
  species MG_405_MONOMER in m = 124/m; MG_405_MONOMER is "ATP synthase F0, A subunit";
  species MG_407_MONOMER in c = 0; MG_407_MONOMER is "enolase";
  species MG_409_MONOMER in c = 0; MG_409_MONOMER is "phosphate transport system regulatory protein PhoU, putative";
  species MG_410_MONOMER in c = 0; MG_410_MONOMER is "phosphate ABC transporter, ATP-binding protein";
  species MG_411_MONOMER in m = 15/m; MG_411_MONOMER is "phosphate ABC transporter, permease protein PstA";
  species MG_412_MONOMER in e = 28/e; MG_412_MONOMER is "phosphate ABC transporter, substrate-binding protein";
  species MG_417_MONOMER in c = 123/c; MG_417_MONOMER is "ribosomal protein S9";
  species MG_418_MONOMER in c = 114/c; MG_418_MONOMER is "ribosomal protein L13";
  species MG_419_MONOMER in c = 2/c; MG_419_MONOMER is "DNA polymerase III, subunit gamma and tau";
  species MG_421_MONOMER in c = 20/c; MG_421_MONOMER is "excinuclease ABC, A subunit";
  species MG_424_MONOMER in c = 119/c; MG_424_MONOMER is "ribosomal protein S15";
  species MG_425_MONOMER in c = 0; MG_425_MONOMER is "ATP-dependent RNA helicase";
  species MG_426_MONOMER in c = 152/c; MG_426_MONOMER is "ribosomal protein L28";
  species MG_427_MONOMER in c = 0; MG_427_MONOMER is "osmotically inducible peroxidase";
  species MG_428_MONOMER in c = 1/c; MG_428_MONOMER is "LuxR bacterial regulatory protein, putative";
  species MG_429_MONOMER in c = 0; MG_429_MONOMER is "PTS system, E1";
  species MG_431_MONOMER in c = 1/c; MG_431_MONOMER is "triosephosphate isomerase";
  species MG_433_MONOMER in c = 0; MG_433_MONOMER is "translation elongation factor Ts";
  species MG_434_MONOMER in c = 3/c; MG_434_MONOMER is "uridylate kinase";
  species MG_437_MONOMER in m = 1/m; MG_437_MONOMER is "phosphatidate cytidylyltransferase";
  species MG_444_MONOMER in c = 140/c; MG_444_MONOMER is "ribosomal protein L19";
  species MG_445_MONOMER in c = 1/c; MG_445_MONOMER is "tRNA (guanine-N1)-methyltransferase";
  species MG_446_MONOMER in c = 109/c; MG_446_MONOMER is "ribosomal protein S16";
  species MG_451_MONOMER in c = 0; MG_451_MONOMER is "translation elongation factor Tu";
  species MG_453_MONOMER in c = 1/c; MG_453_MONOMER is "UTP-glucose-1-phosphate uridylyltransferase";
  species MG_454_MONOMER in c = 0; MG_454_MONOMER is "thiol-dependent peroxidase";
  species MG_455_MONOMER in c = 1/c; MG_455_MONOMER is "tyrosyl-tRNA synthetase";
  species MG_457_MONOMER in m = 4/m; MG_457_MONOMER is "ATP-dependent metalloprotease FtsH";
  species MG_458_MONOMER in c = 2/c; MG_458_MONOMER is "hypoxanthine phosphoribosyltransferase";
  species MG_460_MONOMER in c = 0; MG_460_MONOMER is "L-lactate dehydrogenase/malate dehydrogenase";
  species MG_464_MONOMER in m = 0; MG_464_MONOMER is "inner-membrane protein insertion factor";
  species MG_465_MONOMER in c = 11/c; MG_465_MONOMER is "ribonuclease P protein component";
  species MG_466_MONOMER in c = 134/c; MG_466_MONOMER is "ribosomal protein L34";
  species MG_467_MONOMER in c = 13/c; MG_467_MONOMER is "salivaricin A ABC transporter, ATP-binding protein";
  species MG_468_MONOMER in m = 1/m; MG_468_MONOMER is "salivaricin A ABC transporter, permease protein";
  species MG_526_MONOMER in c = 6/c; MG_526_MONOMER is "salivaricin A ABC transporter, ATP-binding protein";
  species MG_469_MONOMER in c = 0; MG_469_MONOMER is "chromosomal replication initiator protein DnaA";
  species MGrrnA16S in c = 0; MGrrnA16S is "16S ribosomal rRNA";
  species MGrrnA23S in c = 0; MGrrnA23S is "23S ribosomal rRNA";
  species MGrrnA5S in c = 29/c; MGrrnA5S is "5S ribosomal rRNA";
  species MG_0001 in c = 0; MG_0001 is "scRNA, signal recognition particle 4.5S RNA, MCS1";
  species MG_0003 in c = 0; MG_0003 is "Rnase P RNA, MCS5, M1 RNA";
  species DNA_GYRASE in c = 50/c; DNA_GYRASE is "DNA gyrase";
  species DNA_POLYMERASE_2CORE_BETA_CLAMP_GAMMA_COMPLEX_PRIMASE in c = 0; DNA_POLYMERASE_2CORE_BETA_CLAMP_GAMMA_COMPLEX_PRIMASE is "DNA polymerase (2) core, XX-clamp, XXX-complex, and primase";
  species DNA_POLYMERASE_CORE in c = 26/c; DNA_POLYMERASE_CORE is "DNA-directed DNA polymerase";
  species DNA_POLYMERASE_CORE_BETA_CLAMP_GAMMA_COMPLEX in c = 0; DNA_POLYMERASE_CORE_BETA_CLAMP_GAMMA_COMPLEX is "DNA polymerase core, beta-clamp, and gamma-complex";
  species DNA_POLYMERASE_CORE_BETA_CLAMP_PRIMASE in c = 0; DNA_POLYMERASE_CORE_BETA_CLAMP_PRIMASE is "DNA polymerase core, beta-clamp, and primase";
  species DNA_POLYMERASE_GAMMA_COMPLEX in c = 14/c; DNA_POLYMERASE_GAMMA_COMPLEX is "DNA-directed DNA polymerase gamma complex";
  species DNA_POLYMERASE_HOLOENZYME in c = 0; DNA_POLYMERASE_HOLOENZYME is "DNA-directed DNA polymerase holoenzyme";
  species MG_0001_048 in c = 29/c; MG_0001_048 is "signal recognition particle";
  species MG_0003_465 in c = 25/c; MG_0003_465 is "ribonuclease P";
  species MG_001_DIMER in c = 0; MG_001_DIMER is "DNA polymerase III, beta clamp";
  species MG_006_DIMER in c = 134/c; MG_006_DIMER is "thymidylate kinase";
  species MG_008_379_TETRAMER in c = 18/c; MG_008_379_TETRAMER is "tRNA uridine 5-carboxymethylaminomethyl modification enzyme";
  species MG_013_DIMER in c = 9/c; MG_013_DIMER is "methylenetetrahydrofolate dehydrogenase/methylenetetrahydrofolate cyclohydrolase";
  species MG_014_015_DIMER in m = 21/m; MG_014_015_DIMER is "multidrug ABC transporter";
  species MG_019_DIMER in c = 25/c; MG_019_DIMER is "chaperone protein DnaJ";
  species MG_023_DIMER in c = 127/c; MG_023_DIMER is "fructose-1,6-bisphosphate aldolase, class II";
  species MG_029_DIMER in c = 21/c; MG_029_DIMER is "DJ-1/PfpI family protein";
  species MG_030_TRIMER in c = 15/c; MG_030_TRIMER is "uracil phosphoribosyltransferase";
  species MG_033_TETRAMER in m = 16/m; MG_033_TETRAMER is "glycerol uptake facilitator";
  species MG_034_DIMER in c = 23/c; MG_034_DIMER is "thymidine kinase";
  species MG_038_TETRAMER in c = 15/c; MG_038_TETRAMER is "glycerol kinase";
  species MG_039_DIMER in c = 12/c; MG_039_DIMER is "FAD-dependent glycerol-3-phosphate dehydrogenase, putative";
  species MG_040_119_120_121_PENTAMER in m = 44/m; MG_040_119_120_121_PENTAMER is "Monosaccharide (riboside/galactoside) ABC transporter";
  species MG_041_062_429_PENTAMER in m = 17/m; MG_041_062_429_PENTAMER is "PTS system, fructose-specific";
  species MG_041_069_429_PENTAMER in m = 8/m; MG_041_069_429_PENTAMER is "PTS system, glucose-specific";
  species MG_042_043_044_045_PENTAMER in m = 18/m; MG_042_043_044_045_PENTAMER is "spermidine/putrescine (polyamine) ABC transporter";
  species MG_046_DIMER in c = 21/c; MG_046_DIMER is "metalloendopeptidase";
  species MG_047_TETRAMER in c = 13/c; MG_047_TETRAMER is "S-adenosylmethionine synthetase";
  species MG_049_HEXAMER in c = 21/c; MG_049_HEXAMER is "purine nucleoside phosphorylase";
  species MG_051_DIMER in c = 59/c; MG_051_DIMER is "pyrimidine-nucleoside phosphorylase";
  species MG_052_DIMER in c = 32/c; MG_052_DIMER is "cytidine deaminase";
  species MG_053_TRIMER in c = 23/c; MG_053_TRIMER is "phosphoglucomutase/phosphomannomutase, putative";
  species MG_055_170_277_464_476_20MER in m = 13/m; MG_055_170_277_464_476_20MER is "preprotein translocase";
  species MG_058_HEXAMER in c = 8/c; MG_058_HEXAMER is "ribose-phosphate pyrophosphokinase";
  species MG_063_DIMER in c = 20/c; MG_063_DIMER is "1-phosphofructokinase, putative";
  species MG_064_065_TETRAMER in m = 16/m; MG_064_065_TETRAMER is "ABC transporter";
  species MG_066_DIMER in c = 24/c; MG_066_DIMER is "transketolase";
  species MG_072_DIMER in c = 13/c; MG_072_DIMER is "preprotein translocase, SecA subunit";
  species MG_073_206_421_TETRAMER in c = 16/c; MG_073_206_421_TETRAMER is "DNA incision complex";
  species MG_077_078_079_080_321_PENTAMER in m = 7/m; MG_077_078_079_080_321_PENTAMER is "oligopeptide ABC transporter";
  species MG_084_TETRAMER in c = 18/c; MG_084_TETRAMER is "tRNA(Ile)-lysidine synthetase";
  species MG_085_HEXAMER in c = 14/c; MG_085_HEXAMER is "HPr(Ser) kinase/phosphatase";
  species MG_089_DIMER in c = 133/c; MG_089_DIMER is "translation elongation factor G";
  species MG_091_OCTAMER in c = 0; MG_091_OCTAMER is "single-strand binding protein family, octamer";
  species MG_091_TETRAMER in c = 65/c; MG_091_TETRAMER is "single-strand binding protein family, tetramer";
  species MG_094_HEXAMER in c = 36/c; MG_094_HEXAMER is "replicative DNA helicase";
  species MG_102_DIMER in c = 22/c; MG_102_DIMER is "thioredoxin-disulfide reductase";
  species MG_102_DIMER_ox in c = 0; MG_102_DIMER_ox is "oxidized thioredoxin-disulfide reductase";
  species MG_105_OCTAMER in c = 11/c; MG_105_OCTAMER is "putative DNA integrity scanning protein";
  species MG_106_DIMER in c = 22/c; MG_106_DIMER is "peptide deformylase";
  species MG_107_DIMER in c = 25/c; MG_107_DIMER is "guanylate kinase";
  species MG_109_DIMER in m = 34/m; MG_109_DIMER is "serine/threonine protein kinase, putative";
  species MG_111_DIMER in c = 18/c; MG_111_DIMER is "glucose-6-phosphate isomerase";
  species MG_112_DIMER in c = 19/c; MG_112_DIMER is "ribulose-phosphate 3-epimerase";
  species MG_114_DIMER in m = 19/m; MG_114_DIMER is "CDP-diacylglycerol--glycerol-3-phosphate 3-phosphatidyltransferase";
  species MG_118_DIMER in c = 12/c; MG_118_DIMER is "UDP-glucose 4-epimerase";
  species MG_123_DIMER in m = 11/m; MG_123_DIMER is "arginine deaminase";
  species MG_124_MONOMER_ox in c = 0; MG_124_MONOMER_ox is "oxidized thioredoxin";
  species MG_127_MONOMER_ox in c = 0; MG_127_MONOMER_ox is "oxidized Spx subfamily protein";
  species MG_128_HEXAMER in c = 9/c; MG_128_HEXAMER is "inorganic polyphosphate/ATP-NAD kinase, probable";
  species MG_132_DIMER in c = 14/c; MG_132_DIMER is "purine nucleoside phosphoramidase";
  species MG_137_DIMER in c = 25/c; MG_137_DIMER is "UDP-galactopyranose mutase";
  species MG_139_DIMER in c = 10/c; MG_139_DIMER is "ribonuclease J";
  species MG_179_180_181_TETRAMER in m = 14/m; MG_179_180_181_TETRAMER is "metal ion (cobalt) ABC transporter";
  species MG_182_DIMER in c = 13/c; MG_182_DIMER is "Pseudouridylate synthase";
  species MG_184_DIMER in c = 29/c; MG_184_DIMER is "adenine-specific DNA modification methylase";
  species MG_186_187_188_189_PENTAMER in m = 18/m; MG_186_187_188_189_PENTAMER is "Oligosaccharide or polyol ABC transporter";
  species MG_201_DIMER in c = 11/c; MG_201_DIMER is "co-chaperone GrpE";
  species MG_203_204_TETRAMER in c = 12/c; MG_203_204_TETRAMER is "topoisomerase IV";
  species MG_205_DIMER in c = 23/c; MG_205_DIMER is "heat-inducible transcription repressor HrcA, putative";
  species MG_208_DIMER in c = 24/c; MG_208_DIMER is "glycoprotease family protein";
  species MG_213_214_298_6MER in c = 5/c; MG_213_214_298_6MER is "chromosome segregation protein SMC";
  species MG_213_214_298_6MER_ADP in c = 81/c; MG_213_214_298_6MER_ADP is "Chromosome Segregation Protein SMC with SCP Proteins-ADP";
  species MG_215_TETRAMER in c = 18/c; MG_215_TETRAMER is "6-phosphofructokinase";
  species MG_216_TETRAMER in c = 19/c; MG_216_TETRAMER is "pyruvate kinase";
  species MG_221_OCTAMER in c = 12/c; MG_221_OCTAMER is "mraZ protein";
  species MG_224_2MER_GTP in c = 1/c; MG_224_2MER_GTP is "cell division protein ftsZ activated 2mer";
  species MG_224_3MER_GTP in c = 1/c; MG_224_3MER_GTP is "cell division protein ftsZ activated 3mer";
  species MG_224_4MER_GTP in c = 2/c; MG_224_4MER_GTP is "cell division protein ftsZ activated 4mer";
  species MG_224_5MER_GTP in c = 3/c; MG_224_5MER_GTP is "cell division protein ftsZ activated 5mer";
  species MG_224_6MER_GTP in c = 5/c; MG_224_6MER_GTP is "cell division protein ftsZ activated 6mer";
  species MG_224_7MER_GTP in c = 8/c; MG_224_7MER_GTP is "cell division protein ftsZ activated 7mer";
  species MG_224_8MER_GTP in c = 12/c; MG_224_8MER_GTP is "cell division protein ftsZ activated 8mer";
  species MG_224_9MER_GDP in c = 0; MG_224_9MER_GDP is "cell division protein ftsZ deactivated 9mer";
  species MG_224_9MER_GTP in c = 20/c; MG_224_9MER_GTP is "cell division protein ftsZ activated 9mer";
  species MG_224_MONOMER_GDP in c = 3/c; MG_224_MONOMER_GDP is "cell division protein ftsZ hydrolysed";
  species MG_224_MONOMER_GTP in c = 6/c; MG_224_MONOMER_GTP is "cell division protein ftsZ activated";
  species MG_225_DIMER in m = 15/m; MG_225_DIMER is "amino acid transporter";
  species MG_226_DIMER in m = 14/m; MG_226_DIMER is "amino acid transporter";
  species MG_227_DIMER in c = 22/c; MG_227_DIMER is "thymidylate synthase";
  species MG_228_TETRAMER in c = 15/c; MG_228_TETRAMER is "dihydrofolate reductase";
  species MG_229_231_TETRAMER in c = 30/c; MG_229_231_TETRAMER is "ribonucleoside-diphosphate reductase";
  species MG_229_231_TETRAMER_ox in c = 0; MG_229_231_TETRAMER_ox is "oxidized ribonucleoside-diphosphate reductase";
  species MG_239_HEXAMER in c = 14/c; MG_239_HEXAMER is "ATP-dependent protease La";
  species MG_240_HEXAMER in c = 13/c; MG_240_HEXAMER is "nicotinamide-nucleotide adenylyltransferase/conserved hypothetical protein";
  species MG_244_DIMER in c = 8/c; MG_244_DIMER is "3-5' helicase";
  species MG_252_DIMER in c = 9/c; MG_252_DIMER is "23S rRNA methyltransferase";
  species MG_259_TETRAMER in c = 48/c; MG_259_TETRAMER is "modification methylase";
  species MG_265_DIMER in c = 40/c; MG_265_DIMER is "sugar phosphatase";
  species MG_271_272_273_274_192MER in c = 11/c; MG_271_272_273_274_192MER is "pyruvate dehydrogenase";
  species MG_271_272_273_274_192MER_ox in c = 0; MG_271_272_273_274_192MER_ox is "oxidized dihydrolipoamide dehydrogenase";
  species MG_275_TETRAMER in m = 242/m; MG_275_TETRAMER is "NADH oxidase";
  species MG_276_DIMER in c = 24/c; MG_276_DIMER is "adenine phosphoribosyltransferase";
  species MG_278_DIMER in c = 16/c; MG_278_DIMER is "GTP pyrophosphokinase";
  species MG_287_MONOMER_ACP in c = 0; MG_287_MONOMER_ACP is "holo acyl carrier protein";
  species MG_287_MONOMER_ddcaACP in c = 0; MG_287_MONOMER_ddcaACP is "Dodecanoyl-ACP (n-C12:0ACP)";
  species MG_287_MONOMER_hdeACP in c = 0; MG_287_MONOMER_hdeACP is "cis-hexadec-9-enoyl-[acyl-carrier protein] (n-C16:1)";
  species MG_287_MONOMER_myrsACP in c = 0; MG_287_MONOMER_myrsACP is "Myristoyl-ACP (n-C14:0ACP)";
  species MG_287_MONOMER_ocdcaACP in c = 0; MG_287_MONOMER_ocdcaACP is "Octadecanoyl-ACP (n-C18:0ACP)";
  species MG_287_MONOMER_octeACP in c = 0; MG_287_MONOMER_octeACP is "cis-octadec-11-enoyl-[acyl-carrier protein] (n-C18:1)";
  species MG_287_MONOMER_palmACP in c = 0; MG_287_MONOMER_palmACP is "Palmitoyl-ACP (n-C16:0ACP)";
  species MG_287_MONOMER_tdeACP in c = 0; MG_287_MONOMER_tdeACP is "cis-tetradec-7-enoyl-[acyl-carrier protein] (n-C14:1)";
  species MG_289_290_291_PENTAMER in m = 15/m; MG_289_290_291_PENTAMER is "phosphonate ABC transporter";
  species MG_293_DIMER in c = 33/c; MG_293_DIMER is "glycerophosphoryl diester phosphodiesterase family protein";
  species MG_295_MONOMER_ox in c = 0; MG_295_MONOMER_ox is "oxidized tRNA U34 sulfurtransferase";
  species MG_299_DIMER in c = 22/c; MG_299_DIMER is "phosphate acetyltransferase";
  species MG_301_TETRAMER in c = 15/c; MG_301_TETRAMER is "glyceraldehyde-3-phosphate dehydrogenase, type I";
  species MG_302_303_304_TETRAMER in m = 16/m; MG_302_303_304_TETRAMER is "metal ion (cobalt) ABC transporter";
  species MG_316_DIMER in m = 21/m; MG_316_DIMER is "DNA internalization-related competence protein ComEC/Rec2";
  species MG_322_323_TETRAMER in m = 10/m; MG_322_323_TETRAMER is "potassium uptake protein, TrkH family, putative";
  species MG_333_DIMER in c = 15/c; MG_333_DIMER is "FMN-dependent NADH-azoreductase, putative";
  species MG_336_DIMER in c = 15/c; MG_336_DIMER is "cysteine desulfurase";
  species MG_346_DIMER in c = 13/c; MG_346_DIMER is "23S rRNA methyltransferase";
  species MG_347_DIMER in c = 11/c; MG_347_DIMER is "tRNA (guanine-N(7)-)-methyltransferase";
  species MG_349_HEXAMER in c = 13/c; MG_349_HEXAMER is "Replication initiation/membrane attachment protein";
  species MG_351_HEXAMER in c = 11/c; MG_351_HEXAMER is "inorganic pyrophosphatase";
  species MG_352_DIMER in c = 18/c; MG_352_DIMER is "Holliday junction endonuclease";
  species MG_353_DIMER in c = 16/c; MG_353_DIMER is "DNA-binding protein HU, putative";
  species MG_355_HEXAMER in c = 13/c; MG_355_HEXAMER is "ATP-dependent Clp protease, ATPase subunit";
  species MG_357_DIMER in c = 54/c; MG_357_DIMER is "acetate kinase";
  species MG_358_359_10MER in c = 13/c; MG_358_359_10MER is "Holliday junction DNA helicase";
  species MG_367_DIMER in c = 13/c; MG_367_DIMER is "ribonuclease III";
  species MG_368_DIMER in c = 14/c; MG_368_DIMER is "fatty acid/phospholipid synthesis protein PlsX";
  species MG_369_DIMER in c = 14/c; MG_369_DIMER is "DAK2 phosphatase domain protein";
  species MG_372_DIMER in c = 108/c; MG_372_DIMER is "thiamine biosynthesis/tRNA modification protein ThiI";
  species MG_376_HEXAMER in c = 16/c;
  species MG_382_TETRAMER in c = 10/c; MG_382_TETRAMER is "uridine kinase";
  species MG_383_DIMER in c = 16/c; MG_383_DIMER is "NH(3)-dependent NAD+ synthetase, putative";
  species MG_385_DIMER in c = 10/c; MG_385_DIMER is "glycerophosphoryl diester phosphodiesterase family protein";
  species MG_390_DIMER in m = 16/m; MG_390_DIMER is "toxin ABC transporter, ATP-binding/permease protein";
  species MG_391_HEXAMER in c = 35/c; MG_391_HEXAMER is "cytosol aminopeptidase";
  species MG_392_393_21MER in c = 13/c; MG_392_393_21MER is "GroEL-GroES chaperonin complex";
  species MG_394_TETRAMER in c = 14/c; MG_394_TETRAMER is "serine hydroxymethyltransferase";
  species MG_396_DIMER in c = 27/c; MG_396_DIMER is "ribose 5-phosphate isomerase B";
  species MG_398_399_400_401_402_403_404_405_22MER in m = 11/m; MG_398_399_400_401_402_403_404_405_22MER is "H(+)-transporting two-sector ATPase";
  species MG_407_DIMER in c = 34/c; MG_407_DIMER is "enolase";
  species MG_409_DIMER in c = 16/c; MG_409_DIMER is "phosphate transport system regulatory protein PhoU, putative";
  species MG_410_411_412_PENTAMER in m = 17/m; MG_410_411_412_PENTAMER is "phosphate ABC transporter";
  species MG_425_DIMER in c = 9/c; MG_425_DIMER is "ATP-dependent RNA helicase";
  species MG_427_DIMER in c = 17/c; MG_427_DIMER is "osmotically inducible peroxidase";
  species MG_427_DIMER_ox in c = 0; MG_427_DIMER_ox is "oxidized osmotically inducible peroxidase";
  species MG_428_DIMER in c = 10/c; MG_428_DIMER is "LuxR bacterial regulatory protein, putative";
  species MG_431_DIMER in c = 25/c; MG_431_DIMER is "triosephosphate isomerase";
  species MG_433_DIMER in c = 122/c; MG_433_DIMER is "translation elongation factor Ts";
  species MG_434_HEXAMER in c = 14/c; MG_434_HEXAMER is "uridylate kinase";
  species MG_437_DIMER in m = 13/m; MG_437_DIMER is "phosphatidate cytidylyltransferase";
  species MG_445_DIMER in c = 107/c; MG_445_DIMER is "tRNA (guanine-N1)-methyltransferase";
  species MG_451_DIMER in c = 139/c; MG_451_DIMER is "translation elongation factor Tu";
  species MG_453_TETRAMER in c = 9/c; MG_453_TETRAMER is "UTP-glucose-1-phosphate uridylyltransferase";
  species MG_454_DIMER in c = 29/c; MG_454_DIMER is "thiol-dependent peroxidase";
  species MG_454_DIMER_ox in c = 0; MG_454_DIMER_ox is "oxidized thiol-dependent peroxidase";
  species MG_457_HEXAMER in m = 70/m; MG_457_HEXAMER is "ATP-dependent metalloprotease FtsH";
  species MG_458_TETRAMER in c = 17/c; MG_458_TETRAMER is "hypoxanthine phosphoribosyltransferase";
  species MG_460_TETRAMER in c = 13/c; MG_460_TETRAMER is "L-lactate dehydrogenase/malate dehydrogenase";
  species MG_467_468_526_TETRAMER in m = 26/m; MG_467_468_526_TETRAMER is "salivaricin A ABC transporter";
  species MG_469_1MER_ADP in c = 0; MG_469_1MER_ADP is "DnaA-ADP";
  species MG_469_1MER_ATP in c = 25/c; MG_469_1MER_ATP is "DnaA-ATP";
  species MG_469_2MER_1ATP_ADP in c = 0; MG_469_2MER_1ATP_ADP is "DnaA 2mer-(1)ATP-(1)ADP";
  species MG_469_2MER_ATP in c = 0; MG_469_2MER_ATP is "DnaA-ATP 2mer";
  species MG_469_3MER_2ATP_ADP in c = 0; MG_469_3MER_2ATP_ADP is "DnaA 3mer-(2)ATP-(1)ADP";
  species MG_469_3MER_ATP in c = 0; MG_469_3MER_ATP is "DnaA-ATP 3mer";
  species MG_469_4MER_3ATP_ADP in c = 0; MG_469_4MER_3ATP_ADP is "DnaA 4mer-(3)ATP-(1)ADP";
  species MG_469_4MER_ATP in c = 0; MG_469_4MER_ATP is "DnaA-ATP 4mer";
  species MG_469_5MER_4ATP_ADP in c = 0; MG_469_5MER_4ATP_ADP is "DnaA 5mer-(4)ATP-(1)ADP";
  species MG_469_5MER_ATP in c = 0; MG_469_5MER_ATP is "DnaA-ATP 5mer";
  species MG_469_6MER_5ATP_ADP in c = 0; MG_469_6MER_5ATP_ADP is "DnaA 6mer-(5)ATP-(1)ADP";
  species MG_469_6MER_ATP in c = 0; MG_469_6MER_ATP is "DnaA-ATP 6mer";
  species MG_469_7MER_6ATP_ADP in c = 0; MG_469_7MER_6ATP_ADP is "DnaA 7mer-(6)ATP-(1)ADP";
  species MG_469_7MER_ATP in c = 4/c; MG_469_7MER_ATP is "DnaA-ATP 7mer";
  species MG_482_DIMER in c = 13/c; MG_482_DIMER is "holo-(acyl-carrier-protein) synthase";
  species REPLISOME in c = 0; REPLISOME is "Replisome";
  species RIBOSOME_30S in c = 25/c; RIBOSOME_30S is "30S ribosomal subunit";
  species RIBOSOME_30S_IF3 in c = 0; RIBOSOME_30S_IF3 is "30S ribosomal subunit - translation initiation factor IF-3 complex";
  species RIBOSOME_50S in c = 12/c; RIBOSOME_50S is "50S ribosomal subunit";
  species RIBOSOME_70S in c = 56/c; RIBOSOME_70S is "70S ribosome";
  species RNA_POLYMERASE in c = 40/c; RNA_POLYMERASE is "DNA-directed RNA polymerase";
  species RNA_POLYMERASE_HOLOENZYME in c = 0; RNA_POLYMERASE_HOLOENZYME is "DNA-directed RNA polymerase holoenzyme";

  // Parameters:
  k_tRnaAa_MG471 = 7.6;
  k_tRnaAa_MG472 = 4.2627;
  k_tRnaAa_MG475 = 7.6;
  k_tRnaAa_MG479 = 90;
  k_tRnaAa_MG483 = 141.9;
  k_tRnaAa_MG484 = 14;
  k_tRnaAa_MG485 = 3.2;
  k_tRnaAa_MG486 = 4.2627;
  k_tRnaAa_MG487 = 7.6;
  k_tRnaAa_MG488 = 10.8;
  k_tRnaAa_MG489 = 7.6;
  k_tRnaAa_MG490 = 5.4;
  k_tRnaAa_MG492 = 2.8;
  k_tRnaAa_MG493 = 7.6;
  k_tRnaAa_MG495 = 2.8;
  k_tRnaAa_MG496 = 7.6;
  k_tRnaAa_MG497 = 2.8;
  k_tRnaAa_MG499 = 7.6;
  k_tRnaAa_MG500 = 5.1;
  k_tRnaAa_MG501 = 7.6;
  k_tRnaAa_MG502 = 5.36;
  k_tRnaAa_MG503 = 0.74;
  k_tRnaAa_MG504 = 7.6;
  k_tRnaAa_MG506 = 7.6;
  k_tRnaAa_MG507 = 7.6;
  k_tRnaAa_MG508 = 5.1;
  k_tRnaAa_MG509 = 7.6;
  k_tRnaAa_MG510 = 90;
  k_tRnaAa_MG511 = 7.6;
  k_tRnaAa_MG512 = 90;
  k_tRnaAa_MG513 = 4.4;
  k_tRnaAa_MG514 = 27;
  k_tRnaAa_MG518 = 142;
  k_tRnaAa_MG519 = 5.1;
  k_tRnaAa_MG520 = 5.1;
  k_tRnaAa_MG523 = 2.8;

  // Reactions:
  Aminoacylation_MG471: MG471 + ALA + ATP -> MG471_aa + AMP + PPI; k_tRnaAa_MG471*MG471*ALA*ATP*MG_292_TETRAMER*(1 + MG471*Aminoacylation_MG471_KM1^(-1) + ALA*Aminoacylation_MG471_KM2^(-1) + ATP*Aminoacylation_MG471_KM3^(-1))^(-1); Aminoacylation_MG471 is "Aminoacylation (MG471)";  // modifiers: MG_292_TETRAMER
    Aminoacylation_MG471_KM1 = 1; Aminoacylation_MG471_KM2 = 1; Aminoacylation_MG471_KM3 = 1;
  Aminoacylation_MG472: MG472 + ATP + ILE -> MG472_aa + AMP + PPI; k_tRnaAa_MG472*MG472*ATP*ILE*MG_345_MONOMER*(1 + MG472*Aminoacylation_MG472_KM1^(-1) + ATP*Aminoacylation_MG472_KM2^(-1) + ILE*Aminoacylation_MG472_KM3^(-1))^(-1); Aminoacylation_MG472 is "Aminoacylation (MG472)";  // modifiers: MG_345_MONOMER
    Aminoacylation_MG472_KM1 = 1; Aminoacylation_MG472_KM2 = 1; Aminoacylation_MG472_KM3 = 1;
  Aminoacylation_MG475: MG475 + ATP + SER -> MG475_aa + AMP + PPI; k_tRnaAa_MG475*MG475*ATP*SER*MG_005_DIMER*(1 + MG475*Aminoacylation_MG475_KM1^(-1) + ATP*Aminoacylation_MG475_KM2^(-1) + SER*Aminoacylation_MG475_KM3^(-1))^(-1); Aminoacylation_MG475 is "Aminoacylation (MG475)";  // modifiers: MG_005_DIMER
    Aminoacylation_MG475_KM1 = 1; Aminoacylation_MG475_KM2 = 1; Aminoacylation_MG475_KM3 = 1;
  Aminoacylation_MG479: MG479 + ATP + THR -> MG479_aa + AMP + PPI; k_tRnaAa_MG479*MG479*ATP*THR*MG_375_DIMER*(1 + MG479*Aminoacylation_MG479_KM1^(-1) + ATP*Aminoacylation_MG479_KM2^(-1) + THR*Aminoacylation_MG479_KM3^(-1))^(-1); Aminoacylation_MG479 is "Aminoacylation (MG479)";  // modifiers: MG_375_DIMER
    Aminoacylation_MG479_KM1 = 1; Aminoacylation_MG479_KM2 = 1; Aminoacylation_MG479_KM3 = 1;
  Aminoacylation_MG483: MG483 + ATP + CYS -> MG483_aa + AMP + PPI; k_tRnaAa_MG483*MG483*ATP*CYS*MG_253_MONOMER*(1 + MG483*Aminoacylation_MG483_KM1^(-1) + ATP*Aminoacylation_MG483_KM2^(-1) + CYS*Aminoacylation_MG483_KM3^(-1))^(-1); Aminoacylation_MG483 is "Aminoacylation (MG483)";  // modifiers: MG_253_MONOMER
    Aminoacylation_MG483_KM1 = 1; Aminoacylation_MG483_KM2 = 1; Aminoacylation_MG483_KM3 = 1;
  Aminoacylation_MG484: MG484 + ATP + PRO -> MG484_aa + AMP + PPI; k_tRnaAa_MG484*MG484*ATP*PRO*MG_283_DIMER*(1 + MG484*Aminoacylation_MG484_KM1^(-1) + ATP*Aminoacylation_MG484_KM2^(-1) + PRO*Aminoacylation_MG484_KM3^(-1))^(-1); Aminoacylation_MG484 is "Aminoacylation (MG484)";  // modifiers: MG_283_DIMER
    Aminoacylation_MG484_KM1 = 1; Aminoacylation_MG484_KM2 = 1; Aminoacylation_MG484_KM3 = 1;
  Aminoacylation_MG485: MG485 + ATP + MET -> MG485_aa + AMP + PPI; k_tRnaAa_MG485*MG485*ATP*MET*MG_021_DIMER*(1 + MG485*Aminoacylation_MG485_KM1^(-1) + ATP*Aminoacylation_MG485_KM2^(-1) + MET*Aminoacylation_MG485_KM3^(-1))^(-1); Aminoacylation_MG485 is "Aminoacylation (MG485)";  // modifiers: MG_021_DIMER
    Aminoacylation_MG485_KM1 = 1; Aminoacylation_MG485_KM2 = 1; Aminoacylation_MG485_KM3 = 1;
  Aminoacylation_MG486: MG486 + ATP + ILE -> MG486_aa + AMP + PPI; k_tRnaAa_MG486*MG486*ATP*ILE*MG_345_MONOMER*(1 + MG486*Aminoacylation_MG486_KM1^(-1) + ATP*Aminoacylation_MG486_KM2^(-1) + ILE*Aminoacylation_MG486_KM3^(-1))^(-1); Aminoacylation_MG486 is "Aminoacylation (MG486)";  // modifiers: MG_345_MONOMER
    Aminoacylation_MG486_KM1 = 1; Aminoacylation_MG486_KM2 = 1; Aminoacylation_MG486_KM3 = 1;
  Aminoacylation_MG487: MG487 + ATP + SER -> MG487_aa + AMP + PPI; k_tRnaAa_MG487*MG487*ATP*SER*MG_005_DIMER*(1 + MG487*Aminoacylation_MG487_KM1^(-1) + ATP*Aminoacylation_MG487_KM2^(-1) + SER*Aminoacylation_MG487_KM3^(-1))^(-1); Aminoacylation_MG487 is "Aminoacylation (MG487)";  // modifiers: MG_005_DIMER
    Aminoacylation_MG487_KM1 = 1; Aminoacylation_MG487_KM2 = 1; Aminoacylation_MG487_KM3 = 1;
  Aminoacylation_MG488: MG488 + ATP + FTHF10 + MET -> MG488_aa + AMP + PPI + THF; k_tRnaAa_MG488*MG488*ATP*FTHF10*MET*MG_365_MONOMER*MG_021_DIMER*(1 + MG488*Aminoacylation_MG488_KM1^(-1) + ATP*Aminoacylation_MG488_KM2^(-1) + FTHF10*Aminoacylation_MG488_KM3^(-1) + MET*Aminoacylation_MG488_KM4^(-1))^(-1); Aminoacylation_MG488 is "Aminoacylation (MG488)";  // modifiers: MG_365_MONOMER, MG_021_DIMER
    Aminoacylation_MG488_KM1 = 1; Aminoacylation_MG488_KM2 = 1; Aminoacylation_MG488_KM3 = 1; Aminoacylation_MG488_KM4 = 1;
  Aminoacylation_MG489: MG489 + ASP + ATP -> MG489_aa + AMP + PPI; k_tRnaAa_MG489*MG489*ASP*ATP*MG_036_DIMER*(1 + MG489*Aminoacylation_MG489_KM1^(-1) + ASP*Aminoacylation_MG489_KM2^(-1) + ATP*Aminoacylation_MG489_KM3^(-1))^(-1); Aminoacylation_MG489 is "Aminoacylation (MG489)";  // modifiers: MG_036_DIMER
    Aminoacylation_MG489_KM1 = 1; Aminoacylation_MG489_KM2 = 1; Aminoacylation_MG489_KM3 = 1;
  Aminoacylation_MG490: MG490 + ATP + PHE -> MG490_aa + AMP + PPI; k_tRnaAa_MG490*MG490*ATP*PHE*MG_194_195_TETRAMER*(1 + MG490*Aminoacylation_MG490_KM1^(-1) + ATP*Aminoacylation_MG490_KM2^(-1) + PHE*Aminoacylation_MG490_KM3^(-1))^(-1); Aminoacylation_MG490 is "Aminoacylation (MG490)";  // modifiers: MG_194_195_TETRAMER
    Aminoacylation_MG490_KM1 = 1; Aminoacylation_MG490_KM2 = 1; Aminoacylation_MG490_KM3 = 1;
  Aminoacylation_MG492: MG492 + ARG + ATP -> MG492_aa + AMP + PPI; k_tRnaAa_MG492*MG492*ARG*ATP*MG_378_MONOMER*(1 + MG492*Aminoacylation_MG492_KM1^(-1) + ARG*Aminoacylation_MG492_KM2^(-1) + ATP*Aminoacylation_MG492_KM3^(-1))^(-1); Aminoacylation_MG492 is "Aminoacylation (MG492)";  // modifiers: MG_378_MONOMER
    Aminoacylation_MG492_KM1 = 1; Aminoacylation_MG492_KM2 = 1; Aminoacylation_MG492_KM3 = 1;
  Aminoacylation_MG493: MG493 + ATP + GLY -> MG493_aa + AMP + PPI; k_tRnaAa_MG493*MG493*ATP*GLY*MG_251_DIMER*(1 + MG493*Aminoacylation_MG493_KM1^(-1) + ATP*Aminoacylation_MG493_KM2^(-1) + GLY*Aminoacylation_MG493_KM3^(-1))^(-1); Aminoacylation_MG493 is "Aminoacylation (MG493)";  // modifiers: MG_251_DIMER
    Aminoacylation_MG493_KM1 = 1; Aminoacylation_MG493_KM2 = 1; Aminoacylation_MG493_KM3 = 1;
  Aminoacylation_MG495: MG495 + ARG + ATP -> MG495_aa + AMP + PPI; k_tRnaAa_MG495*MG495*ARG*ATP*MG_378_MONOMER*(1 + MG495*Aminoacylation_MG495_KM1^(-1) + ARG*Aminoacylation_MG495_KM2^(-1) + ATP*Aminoacylation_MG495_KM3^(-1))^(-1); Aminoacylation_MG495 is "Aminoacylation (MG495)";  // modifiers: MG_378_MONOMER
    Aminoacylation_MG495_KM1 = 1; Aminoacylation_MG495_KM2 = 1; Aminoacylation_MG495_KM3 = 1;
  Aminoacylation_MG496: MG496 + ATP + TRP -> MG496_aa + AMP + PPI; k_tRnaAa_MG496*MG496*ATP*TRP*MG_126_DIMER*(1 + MG496*Aminoacylation_MG496_KM1^(-1) + ATP*Aminoacylation_MG496_KM2^(-1) + TRP*Aminoacylation_MG496_KM3^(-1))^(-1); Aminoacylation_MG496 is "Aminoacylation (MG496)";  // modifiers: MG_126_DIMER
    Aminoacylation_MG496_KM1 = 1; Aminoacylation_MG496_KM2 = 1; Aminoacylation_MG496_KM3 = 1;
  Aminoacylation_MG497: MG497 + ARG + ATP -> MG497_aa + AMP + PPI; k_tRnaAa_MG497*MG497*ARG*ATP*MG_378_MONOMER*(1 + MG497*Aminoacylation_MG497_KM1^(-1) + ARG*Aminoacylation_MG497_KM2^(-1) + ATP*Aminoacylation_MG497_KM3^(-1))^(-1); Aminoacylation_MG497 is "Aminoacylation (MG497)";  // modifiers: MG_378_MONOMER
    Aminoacylation_MG497_KM1 = 1; Aminoacylation_MG497_KM2 = 1; Aminoacylation_MG497_KM3 = 1;
  Aminoacylation_MG499: MG499 + ATP + GLY -> MG499_aa + AMP + PPI; k_tRnaAa_MG499*MG499*ATP*GLY*MG_251_DIMER*(1 + MG499*Aminoacylation_MG499_KM1^(-1) + ATP*Aminoacylation_MG499_KM2^(-1) + GLY*Aminoacylation_MG499_KM3^(-1))^(-1); Aminoacylation_MG499 is "Aminoacylation (MG499)";  // modifiers: MG_251_DIMER
    Aminoacylation_MG499_KM1 = 1; Aminoacylation_MG499_KM2 = 1; Aminoacylation_MG499_KM3 = 1;
  Aminoacylation_MG500: MG500 + ATP + LEU -> MG500_aa + AMP + PPI; k_tRnaAa_MG500*MG500*ATP*LEU*MG_266_MONOMER*(1 + MG500*Aminoacylation_MG500_KM1^(-1) + ATP*Aminoacylation_MG500_KM2^(-1) + LEU*Aminoacylation_MG500_KM3^(-1))^(-1); Aminoacylation_MG500 is "Aminoacylation (MG500)";  // modifiers: MG_266_MONOMER
    Aminoacylation_MG500_KM1 = 1; Aminoacylation_MG500_KM2 = 1; Aminoacylation_MG500_KM3 = 1;
  Aminoacylation_MG501: MG501 + ATP + LYS -> MG501_aa + AMP + PPI; k_tRnaAa_MG501*MG501*ATP*LYS*MG_136_DIMER*(1 + MG501*Aminoacylation_MG501_KM1^(-1) + ATP*Aminoacylation_MG501_KM2^(-1) + LYS*Aminoacylation_MG501_KM3^(-1))^(-1); Aminoacylation_MG501 is "Aminoacylation (MG501)";  // modifiers: MG_136_DIMER
    Aminoacylation_MG501_KM1 = 1; Aminoacylation_MG501_KM2 = 1; Aminoacylation_MG501_KM3 = 1;
  Aminoacylation_MG502: MG502 + 2 ATP + H2O + GLN -> MG502_aa + ADP + AMP + H + PI + PPI; k_tRnaAa_MG502*MG502*ATP*H2O*GLN*MG_462_MONOMER*MG_098_099_100_TRIMER*(1 + MG502*Aminoacylation_MG502_KM1^(-1) + ATP*Aminoacylation_MG502_KM2^(-1) + H2O*Aminoacylation_MG502_KM3^(-1) + GLN*Aminoacylation_MG502_KM4^(-1))^(-1); Aminoacylation_MG502 is "Aminoacylation (MG502)";  // modifiers: MG_462_MONOMER, MG_098_099_100_TRIMER
    Aminoacylation_MG502_KM1 = 1; Aminoacylation_MG502_KM2 = 1; Aminoacylation_MG502_KM3 = 1; Aminoacylation_MG502_KM4 = 1;
  Aminoacylation_MG503: MG503 + ATP + TYR -> MG503_aa + AMP + PPI; k_tRnaAa_MG503*MG503*ATP*TYR*MG_455_DIMER*(1 + MG503*Aminoacylation_MG503_KM1^(-1) + ATP*Aminoacylation_MG503_KM2^(-1) + TYR*Aminoacylation_MG503_KM3^(-1))^(-1); Aminoacylation_MG503 is "Aminoacylation (MG503)";  // modifiers: MG_455_DIMER
    Aminoacylation_MG503_KM1 = 1; Aminoacylation_MG503_KM2 = 1; Aminoacylation_MG503_KM3 = 1;
  Aminoacylation_MG504: MG504 + ATP + TRP -> MG504_aa + AMP + PPI; k_tRnaAa_MG504*MG504*ATP*TRP*MG_126_DIMER*(1 + MG504*Aminoacylation_MG504_KM1^(-1) + ATP*Aminoacylation_MG504_KM2^(-1) + TRP*Aminoacylation_MG504_KM3^(-1))^(-1); Aminoacylation_MG504 is "Aminoacylation (MG504)";  // modifiers: MG_126_DIMER
    Aminoacylation_MG504_KM1 = 1; Aminoacylation_MG504_KM2 = 1; Aminoacylation_MG504_KM3 = 1;
  Aminoacylation_MG506: MG506 + ATP + SER -> MG506_aa + AMP + PPI; k_tRnaAa_MG506*MG506*ATP*SER*MG_005_DIMER*(1 + MG506*Aminoacylation_MG506_KM1^(-1) + ATP*Aminoacylation_MG506_KM2^(-1) + SER*Aminoacylation_MG506_KM3^(-1))^(-1); Aminoacylation_MG506 is "Aminoacylation (MG506)";  // modifiers: MG_005_DIMER
    Aminoacylation_MG506_KM1 = 1; Aminoacylation_MG506_KM2 = 1; Aminoacylation_MG506_KM3 = 1;
  Aminoacylation_MG507: MG507 + ATP + SER -> MG507_aa + AMP + PPI; k_tRnaAa_MG507*MG507*ATP*SER*MG_005_DIMER*(1 + MG507*Aminoacylation_MG507_KM1^(-1) + ATP*Aminoacylation_MG507_KM2^(-1) + SER*Aminoacylation_MG507_KM3^(-1))^(-1); Aminoacylation_MG507 is "Aminoacylation (MG507)";  // modifiers: MG_005_DIMER
    Aminoacylation_MG507_KM1 = 1; Aminoacylation_MG507_KM2 = 1; Aminoacylation_MG507_KM3 = 1;
  Aminoacylation_MG508: MG508 + ATP + LEU -> MG508_aa + AMP + PPI; k_tRnaAa_MG508*MG508*ATP*LEU*MG_266_MONOMER*(1 + MG508*Aminoacylation_MG508_KM1^(-1) + ATP*Aminoacylation_MG508_KM2^(-1) + LEU*Aminoacylation_MG508_KM3^(-1))^(-1); Aminoacylation_MG508 is "Aminoacylation (MG508)";  // modifiers: MG_266_MONOMER
    Aminoacylation_MG508_KM1 = 1; Aminoacylation_MG508_KM2 = 1; Aminoacylation_MG508_KM3 = 1;
  Aminoacylation_MG509: MG509 + ATP + LYS -> MG509_aa + AMP + PPI; k_tRnaAa_MG509*MG509*ATP*LYS*MG_136_DIMER*(1 + MG509*Aminoacylation_MG509_KM1^(-1) + ATP*Aminoacylation_MG509_KM2^(-1) + LYS*Aminoacylation_MG509_KM3^(-1))^(-1); Aminoacylation_MG509 is "Aminoacylation (MG509)";  // modifiers: MG_136_DIMER
    Aminoacylation_MG509_KM1 = 1; Aminoacylation_MG509_KM2 = 1; Aminoacylation_MG509_KM3 = 1;
  Aminoacylation_MG510: MG510 + ATP + THR -> MG510_aa + AMP + PPI; k_tRnaAa_MG510*MG510*ATP*THR*MG_375_DIMER*(1 + MG510*Aminoacylation_MG510_KM1^(-1) + ATP*Aminoacylation_MG510_KM2^(-1) + THR*Aminoacylation_MG510_KM3^(-1))^(-1); Aminoacylation_MG510 is "Aminoacylation (MG510)";  // modifiers: MG_375_DIMER
    Aminoacylation_MG510_KM1 = 1; Aminoacylation_MG510_KM2 = 1; Aminoacylation_MG510_KM3 = 1;
  Aminoacylation_MG511: MG511 + ATP + VAL -> MG511_aa + AMP + PPI; k_tRnaAa_MG511*MG511*ATP*VAL*MG_334_MONOMER*(1 + MG511*Aminoacylation_MG511_KM1^(-1) + ATP*Aminoacylation_MG511_KM2^(-1) + VAL*Aminoacylation_MG511_KM3^(-1))^(-1); Aminoacylation_MG511 is "Aminoacylation (MG511)";  // modifiers: MG_334_MONOMER
    Aminoacylation_MG511_KM1 = 1; Aminoacylation_MG511_KM2 = 1; Aminoacylation_MG511_KM3 = 1;
  Aminoacylation_MG512: MG512 + ATP + THR -> MG512_aa + AMP + PPI; k_tRnaAa_MG512*MG512*ATP*THR*MG_375_DIMER*(1 + MG512*Aminoacylation_MG512_KM1^(-1) + ATP*Aminoacylation_MG512_KM2^(-1) + THR*Aminoacylation_MG512_KM3^(-1))^(-1); Aminoacylation_MG512 is "Aminoacylation (MG512)";  // modifiers: MG_375_DIMER
    Aminoacylation_MG512_KM1 = 1; Aminoacylation_MG512_KM2 = 1; Aminoacylation_MG512_KM3 = 1;
  Aminoacylation_MG513: MG513 + ATP + GLU -> MG513_aa + AMP + PPI; k_tRnaAa_MG513*MG513*ATP*GLU*MG_462_MONOMER*(1 + MG513*Aminoacylation_MG513_KM1^(-1) + ATP*Aminoacylation_MG513_KM2^(-1) + GLU*Aminoacylation_MG513_KM3^(-1))^(-1); Aminoacylation_MG513 is "Aminoacylation (MG513)";  // modifiers: MG_462_MONOMER
    Aminoacylation_MG513_KM1 = 1; Aminoacylation_MG513_KM2 = 1; Aminoacylation_MG513_KM3 = 1;
  Aminoacylation_MG514: MG514 + ASN + ATP -> MG514_aa + AMP + PPI; k_tRnaAa_MG514*MG514*ASN*ATP*MG_113_DIMER*(1 + MG514*Aminoacylation_MG514_KM1^(-1) + ASN*Aminoacylation_MG514_KM2^(-1) + ATP*Aminoacylation_MG514_KM3^(-1))^(-1); Aminoacylation_MG514 is "Aminoacylation (MG514)";  // modifiers: MG_113_DIMER
    Aminoacylation_MG514_KM1 = 1; Aminoacylation_MG514_KM2 = 1; Aminoacylation_MG514_KM3 = 1;
  Aminoacylation_MG518: MG518 + ATP + HIS -> MG518_aa + AMP + PPI; k_tRnaAa_MG518*MG518*ATP*HIS*MG_035_DIMER*(1 + MG518*Aminoacylation_MG518_KM1^(-1) + ATP*Aminoacylation_MG518_KM2^(-1) + HIS*Aminoacylation_MG518_KM3^(-1))^(-1); Aminoacylation_MG518 is "Aminoacylation (MG518)";  // modifiers: MG_035_DIMER
    Aminoacylation_MG518_KM1 = 1; Aminoacylation_MG518_KM2 = 1; Aminoacylation_MG518_KM3 = 1;
  Aminoacylation_MG519: MG519 + ATP + LEU -> MG519_aa + AMP + PPI; k_tRnaAa_MG519*MG519*ATP*LEU*MG_266_MONOMER*(1 + MG519*Aminoacylation_MG519_KM1^(-1) + ATP*Aminoacylation_MG519_KM2^(-1) + LEU*Aminoacylation_MG519_KM3^(-1))^(-1); Aminoacylation_MG519 is "Aminoacylation (MG519)";  // modifiers: MG_266_MONOMER
    Aminoacylation_MG519_KM1 = 1; Aminoacylation_MG519_KM2 = 1; Aminoacylation_MG519_KM3 = 1;
  Aminoacylation_MG520: MG520 + ATP + LEU -> MG520_aa + AMP + PPI; k_tRnaAa_MG520*MG520*ATP*LEU*MG_266_MONOMER*(1 + MG520*Aminoacylation_MG520_KM1^(-1) + ATP*Aminoacylation_MG520_KM2^(-1) + LEU*Aminoacylation_MG520_KM3^(-1))^(-1); Aminoacylation_MG520 is "Aminoacylation (MG520)";  // modifiers: MG_266_MONOMER
    Aminoacylation_MG520_KM1 = 1; Aminoacylation_MG520_KM2 = 1; Aminoacylation_MG520_KM3 = 1;
  Aminoacylation_MG523: MG523 + ARG + ATP -> MG523_aa + AMP + PPI; k_tRnaAa_MG523*MG523*ARG*ATP*MG_378_MONOMER*(1 + MG523*Aminoacylation_MG523_KM1^(-1) + ARG*Aminoacylation_MG523_KM2^(-1) + ATP*Aminoacylation_MG523_KM3^(-1))^(-1); Aminoacylation_MG523 is "Aminoacylation (MG523)";  // modifiers: MG_378_MONOMER
    Aminoacylation_MG523_KM1 = 1; Aminoacylation_MG523_KM2 = 1; Aminoacylation_MG523_KM3 = 1;
end
